<?xml version="1.0"?>
<!--
  Name:     RR-AVON-114
  Author:   Richard Harrison (rjh@zaretto.com)
  Date:     09 09 19
  Description:
  Refs:     https://www.thunder-and-lightnings.co.uk/swift/history.php

-->

<turbine_engine name="RR-AVON-114">

    <milthrust>8175</milthrust>
    <maxthrust>11450</maxthrust>
    <bypassratio>     0 </bypassratio>
    <tsfc>            0.932 </tsfc>
    <atsfc>           1.853  </atsfc>
    <bleed>           0.03</bleed>
    <idlen1>         30.0 </idlen1>
    <idlen2>         60.0 </idlen2>
    <maxn1>         100.0 </maxn1>
    <maxn2>         100.0 </maxn2>
    <augmented>         1 </augmented>
    <augmethod>         2 </augmethod>
    <!-- acceleration from 0 -> 15% (at which point the start logic takes over in FGTurbine using 1.2 and 2.0 for N1/N2 acceleration rate) -->
    <n1spinup>1</n1spinup>
    <n2spinup>3</n2spinup>

    <injected>          0 </injected>

    <function name="IdleThrust">
        <table>
            <independentVar lookup="row">velocities/mach</independentVar>
            <independentVar lookup="column">atmosphere/density-altitude</independentVar>
            <tableData>
                            0	5000	10000	15000	20000	25000	30000	35000	40000	45000	50000	55000	60000	65000	70000	75000
                0.000	0.029	0.025	0.021	0.018	0.015	0.013	0.011	0.009	0.007	0.005	0.004	0.003	0.003	0.002	0.002	0.001
                0.282	0.029	0.025	0.021	0.018	0.015	0.013	0.011	0.009	0.007	0.005	0.004	0.003	0.003	0.002	0.002	0.001
                0.300	0.029	0.025	0.021	0.018	0.015	0.013	0.010	0.009	0.007	0.005	0.004	0.003	0.003	0.002	0.002	0.001
                0.308	0.028	0.024	0.021	0.018	0.015	0.013	0.010	0.009	0.007	0.005	0.004	0.003	0.003	0.002	0.002	0.001
                0.601	0.043	0.037	0.031	0.027	0.023	0.019	0.016	0.013	0.010	0.008	0.006	0.005	0.004	0.003	0.002	0.002
                0.603	0.043	0.037	0.031	0.027	0.022	0.019	0.016	0.013	0.010	0.008	0.006	0.005	0.004	0.003	0.002	0.002
                0.605	0.043	0.037	0.031	0.027	0.022	0.019	0.016	0.013	0.010	0.008	0.006	0.005	0.004	0.003	0.002	0.002
                0.793	0.055	0.047	0.040	0.034	0.029	0.024	0.020	0.016	0.013	0.010	0.008	0.006	0.005	0.004	0.003	0.002
                0.804	0.056	0.048	0.041	0.035	0.029	0.024	0.020	0.017	0.013	0.010	0.008	0.006	0.005	0.004	0.003	0.002
                0.814	0.056	0.048	0.041	0.035	0.029	0.025	0.020	0.017	0.013	0.010	0.008	0.006	0.005	0.004	0.003	0.002
                0.946	0.065	0.056	0.048	0.041	0.034	0.029	0.024	0.019	0.015	0.012	0.010	0.007	0.006	0.005	0.004	0.003
                0.955	0.066	0.057	0.049	0.041	0.035	0.029	0.024	0.020	0.016	0.012	0.010	0.008	0.006	0.005	0.004	0.003
                1.200	0.066	0.057	0.049	0.041	0.035	0.029	0.024	0.020	0.016	0.012	0.010	0.008	0.006	0.005	0.004	0.003
                1.800	0.066	0.057	0.049	0.041	0.035	0.029	0.024	0.020	0.016	0.012	0.010	0.008	0.006	0.005	0.004	0.003
            </tableData>
        </table>
    </function>

    <function name="MilThrust">
        <table>
            <independentVar lookup="row">velocities/mach</independentVar>
            <independentVar lookup="column">atmosphere/density-altitude</independentVar>
            <tableData>
                0	10000	20000	30000	40000	50000	60000	70000
                0.00	0.6908	0.5260	0.3491	0.2313	0.1294	0.0791	0.0396	0.0198
                0.25	0.7773	0.5971	0.4077	0.2612	0.1522	0.0927	0.0464	0.0232
                0.50	0.8438	0.6683	0.4798	0.3056	0.1806	0.1064	0.0532	0.0266
                0.80	0.9017	0.7394	0.5521	0.3736	0.2230	0.1249	0.0624	0.0312
                1.00	1.0286	0.8645	0.6826	0.4959	0.3043	0.1821	0.0911	0.0455
                1.25	1.0457	0.9799	0.7840	0.5980	0.4044	0.2329	0.1165	0.0582
                1.50	1.0578	1.0920	0.9210	0.7302	0.5013	0.2785	0.1392	0.0696
                1.75	1.0699	1.2042	1.0580	0.8571	0.5982	0.3449	0.1724	0.0862
                2.00	1.0820	1.3164	1.1950	0.9737	0.6882	0.4030	0.2015	0.1008
                2.25	1.0942	1.4285	1.3319	1.0903	0.7456	0.4335	0.2168	0.1084
                2.50	1.1063	1.5407	1.4689	1.2069	0.7105	0.4248	0.2124	0.1062

            </tableData>
        </table>
    </function>
    <function name="AugThrust">
        <table>
            <independentVar lookup="row">velocities/mach</independentVar>
            <independentVar lookup="column">atmosphere/density-altitude</independentVar>
            <tableData>
                0	10000	20000	30000	40000	50000	60000	70000
                0.00	0.7737	0.5049	0.3351	0.2313	0.1615	0.1071	0.0535	0.0268
                0.25	0.8705	0.5732	0.3914	0.2612	0.1899	0.1255	0.0628	0.0314
                0.50	0.9451	0.6416	0.4606	0.3056	0.2253	0.1439	0.0720	0.0360
                0.80	1.0099	0.7099	0.5300	0.3736	0.2782	0.1690	0.0845	0.0422
                1.00	1.1520	0.8299	0.6553	0.4959	0.3796	0.2465	0.1232	0.0616
                1.25	1.1711	0.9407	0.7526	0.5980	0.5044	0.3152	0.1576	0.0788
                1.50	1.1847	1.0484	0.8842	0.7302	0.6253	0.3768	0.1884	0.0942
                1.75	1.1983	1.1560	1.0157	0.8571	0.7462	0.4667	0.2333	0.1167
                2.00	1.2119	1.2637	1.1472	0.9737	0.8585	0.5453	0.2727	0.1363
                2.25	1.2255	1.3714	1.2787	1.0903	0.9301	0.5867	0.2933	0.1467
                2.50	1.2390	1.4790	1.4102	1.2069	0.8863	0.5748	0.2874	0.1437
            </tableData>
        </table>
    </function>

</turbine_engine>
