<?xml version="1.0"?>
<?xml-stylesheet type="text/xsl" href="http://raw.githubusercontent.com/JSBSim-Team/jsbsim/master/JSBSimScript.xsl"?>
<fdm_config name="swift" version="2.0" release=""
   xmlns:xsi="http://www.w3.org/2001/XMLSchema-instance"
   xsi:noNamespaceSchemaLocation="http://raw.githubusercontent.com/JSBSim-Team/jsbsim/master/JSBSim.xsd">

    <fileheader>
        <author>Richard Harrison</author>
        <filecreationdate>2021-08-07</filecreationdate>
        <version>1.0</version>
        <copyright>Copyright (C) 2021 Richard Harrison, All rights reserved</copyright>
        <description></description>
        <note>
        Supermarine swift
    </note>
        <note>Built with AeroTool 1.0.0.0: Options: AeroDetail=High, ExternalTanks, Flaps, Gear, GroundEffect, Mach, WakeIterations=3</note>
        <limitation></limitation>
        <reference
            refID="ZDAT/AED/2019/09-09"
            author="Richard Harrison, rjh@zaretto.com"
            title="swift Aerodynamic data built from vspaero; CG (5.8, 0, -0.02)M"
            date="09 Sep 2019"
            URL="http://www.zaretto.com/sites/zaretto.com/files/swift-data/rjh-zaretto-swift-aerodynamic-data-vspaero.pdf"
        />
        <reference
            refID="Reports and Memorandum 3078 (17,946), A.R.C Technical report"
            author="D. A. Kirby and A. Spence"
            title="Low-Speed-Tunnel Model Tests on the Flow Structure behind a Delta-Wing Aircraft and a 40 deg Swept-Wing-Aircraft at High-Incidences"
            date="1956"
            URL="http://naca.central.cranfield.ac.uk/reports/arc/rm/3078.pdf"
        />
    </fileheader>
<metrics>
  <wingarea unit="M2">21.40</wingarea>
  <wingspan unit="M">7.97</wingspan>
  <wing_incidence>0.00</wing_incidence>
  <chord unit="M">2.59</chord>
  <htailarm>0</htailarm>
  <location unit="M" name="EYEPOINT">
    <x>-6.116</x>
    <y>0</y>
    <z>0.2254</z>
  </location>
  <location unit="M" name="VRP">
    <x>6.116</x>
    <y>0</y>
    <z>0</z>
  </location>
  <location unit="M" name="AERORP">
    <x>6</x>
    <y>0</y>
    <z>-0.02</z>
  </location>
</metrics>

<mass_balance>
  <ixx unit="SLUG*FT2">14382.50</ixx>
  <iyy unit="SLUG*FT2">62830.10</iyy>
  <izz unit="SLUG*FT2">74666.90</izz>
  <ixz unit="SLUG*FT2">413.20</ixz>
  <emptywt unit="LBS">13758.00</emptywt>
  <location unit="M" name="CG">
    <x>5.8</x>
    <y>0</y>
    <z>-0.02</z>
  </location>
</mass_balance>

<ground_reactions>
  <contact type="BOGEY" name="NoseGear">
    <!--0: NoseGear-->
    <location unit="M">
      <x>2.512</x>
      <y>0</y>
      <z>-1.8923</z>
    </location>
    <static_friction>0.6</static_friction>
    <dynamic_friction>0.4</dynamic_friction>
    <rolling_friction>0.02</rolling_friction>
    <spring_coeff unit="LBS/FT">34001</spring_coeff>
    <damping_coeff unit="LBS/FT/SEC">6000</damping_coeff>
    <max_steer>12.5</max_steer>
    <brake_group>NOSE</brake_group>
    <retractable>1</retractable>
  </contact>
  <contact type="BOGEY" name="LeftMainGear">
    <!--1: LeftMainGear-->
    <location unit="M">
      <x>6.394</x>
      <y>-2.47</y>
      <z>-1.797</z>
    </location>
    <static_friction>0.6</static_friction>
    <dynamic_friction>0.4</dynamic_friction>
    <rolling_friction>0.02</rolling_friction>
    <spring_coeff unit="LBS/FT">34001</spring_coeff>
    <damping_coeff unit="LBS/FT/SEC">5000</damping_coeff>
    <brake_group>LEFT</brake_group>
    <retractable>1</retractable>
  </contact>
  <contact type="BOGEY" name="RightMainGear">
    <!--2: RightMainGear-->
    <location unit="M">
      <x>6.394</x>
      <y>2.47</y>
      <z>-1.797</z>
    </location>
    <static_friction>0.6</static_friction>
    <dynamic_friction>0.4</dynamic_friction>
    <rolling_friction>0.02</rolling_friction>
    <spring_coeff unit="LBS/FT">34001</spring_coeff>
    <damping_coeff unit="LBS/FT/SEC">5000</damping_coeff>
    <brake_group>RIGHT</brake_group>
    <retractable>1</retractable>
  </contact>
  <contact type="STRUCTURE" name="LeftWingTip">
    <!--3: LeftWingTip-->
    <location unit="M">
      <x>8.543</x>
      <y>-4.7447</y>
      <z>-0.3619</z>
    </location>
    <static_friction>1.2</static_friction>
    <dynamic_friction>1.212</dynamic_friction>
    <rolling_friction>1.413</rolling_friction>
    <spring_coeff unit="LBS/FT">12382.2</spring_coeff>
    <damping_coeff unit="LBS/FT/SEC">2751.6</damping_coeff>
  </contact>
  <contact type="STRUCTURE" name="RightWingTip">
    <!--4: RightWingTip-->
    <location unit="M">
      <x>8.543</x>
      <y>4.7447</y>
      <z>-0.3619</z>
    </location>
    <static_friction>1.2</static_friction>
    <dynamic_friction>1.212</dynamic_friction>
    <rolling_friction>1.413</rolling_friction>
    <spring_coeff unit="LBS/FT">12382.2</spring_coeff>
    <damping_coeff unit="LBS/FT/SEC">2751.6</damping_coeff>
  </contact>
  <contact type="STRUCTURE" name="LeftHtailTip">
    <!--5: LeftHtailTip-->
    <location unit="M">
      <x>12.3732</x>
      <y>-1.8898</y>
      <z>0.5495</z>
    </location>
    <static_friction>1.2</static_friction>
    <dynamic_friction>1.212</dynamic_friction>
    <rolling_friction>1.413</rolling_friction>
    <spring_coeff unit="LBS/FT">12382.2</spring_coeff>
    <damping_coeff unit="LBS/FT/SEC">2751.6</damping_coeff>
  </contact>
  <contact type="STRUCTURE" name="RightHtailTip">
    <!--6: RightHtailTip-->
    <location unit="M">
      <x>12.3732</x>
      <y>1.8898</y>
      <z>0.5495</z>
    </location>
    <static_friction>1.2</static_friction>
    <dynamic_friction>1.212</dynamic_friction>
    <rolling_friction>1.413</rolling_friction>
    <spring_coeff unit="LBS/FT">12382.2</spring_coeff>
    <damping_coeff unit="LBS/FT/SEC">2751.6</damping_coeff>
  </contact>
  <contact type="STRUCTURE" name="VtailTop">
    <!--7: VtailTop-->
    <location unit="M">
      <x>11.5669</x>
      <y>0</y>
      <z>2.1177</z>
    </location>
    <static_friction>1.2</static_friction>
    <dynamic_friction>1.212</dynamic_friction>
    <rolling_friction>1.413</rolling_friction>
    <spring_coeff unit="LBS/FT">12382.2</spring_coeff>
    <damping_coeff unit="LBS/FT/SEC">2751.6</damping_coeff>
  </contact>
  <contact type="STRUCTURE" name="CentreFuselageTop">
    <!--8: CentreFuselageTop-->
    <location unit="M">
      <x>6.7752</x>
      <y>0</y>
      <z>0.7908</z>
    </location>
    <static_friction>1.2</static_friction>
    <dynamic_friction>1.212</dynamic_friction>
    <rolling_friction>1.413</rolling_friction>
    <spring_coeff unit="LBS/FT">12382.2</spring_coeff>
    <damping_coeff unit="LBS/FT/SEC">2751.6</damping_coeff>
  </contact>
  <contact type="STRUCTURE" name="CentreFuselageBottom">
    <!--9: CentreFuselageBottom-->
    <location unit="M">
      <x>6.7752</x>
      <y>0</y>
      <z>-0.7774</z>
    </location>
    <static_friction>1.2</static_friction>
    <dynamic_friction>1.212</dynamic_friction>
    <rolling_friction>1.413</rolling_friction>
    <spring_coeff unit="LBS/FT">12382.2</spring_coeff>
    <damping_coeff unit="LBS/FT/SEC">2751.6</damping_coeff>
  </contact>
  <contact type="STRUCTURE" name="CanopyTop">
    <!--10: CanopyTop-->
    <location unit="M">
      <x>3.3412</x>
      <y>0</y>
      <z>1.0732</z>
    </location>
    <static_friction>1.2</static_friction>
    <dynamic_friction>1.212</dynamic_friction>
    <rolling_friction>1.413</rolling_friction>
    <spring_coeff unit="LBS/FT">12382.2</spring_coeff>
    <damping_coeff unit="LBS/FT/SEC">2751.6</damping_coeff>
  </contact>
  <contact type="STRUCTURE" name="Fuse0">
    <!--11: Fuse0-->
    <location unit="M">
      <x>0</x>
      <y>0</y>
      <z>0</z>
    </location>
    <static_friction>1.2</static_friction>
    <dynamic_friction>1.212</dynamic_friction>
    <rolling_friction>1.413</rolling_friction>
    <spring_coeff unit="LBS/FT">12382.2</spring_coeff>
    <damping_coeff unit="LBS/FT/SEC">2751.6</damping_coeff>
  </contact>
  <contact type="STRUCTURE" name="Fuse1">
    <!--12: Fuse1-->
    <location unit="M">
      <x>0.9918</x>
      <y>0</y>
      <z>-0.4155</z>
    </location>
    <static_friction>1.2</static_friction>
    <dynamic_friction>1.212</dynamic_friction>
    <rolling_friction>1.413</rolling_friction>
    <spring_coeff unit="LBS/FT">12382.2</spring_coeff>
    <damping_coeff unit="LBS/FT/SEC">2751.6</damping_coeff>
  </contact>
  <contact type="STRUCTURE" name="Fuse1Top">
    <!--13: Fuse1Top-->
    <location unit="M">
      <x>0.9918</x>
      <y>0</y>
      <z>0.4155</z>
    </location>
    <static_friction>1.2</static_friction>
    <dynamic_friction>1.212</dynamic_friction>
    <rolling_friction>1.413</rolling_friction>
    <spring_coeff unit="LBS/FT">12382.2</spring_coeff>
    <damping_coeff unit="LBS/FT/SEC">2751.6</damping_coeff>
  </contact>
  <contact type="STRUCTURE" name="Fuse36">
    <!--14: Fuse36-->
    <location unit="M">
      <x>3.6054</x>
      <y>0</y>
      <z>-0.7238</z>
    </location>
    <static_friction>1.2</static_friction>
    <dynamic_friction>1.212</dynamic_friction>
    <rolling_friction>1.413</rolling_friction>
    <spring_coeff unit="LBS/FT">12382.2</spring_coeff>
    <damping_coeff unit="LBS/FT/SEC">2751.6</damping_coeff>
  </contact>
  <contact type="STRUCTURE" name="Fuse83">
    <!--15: Fuse83-->
    <location unit="M">
      <x>8.3616</x>
      <y>0</y>
      <z>-0.7056</z>
    </location>
    <static_friction>1.2</static_friction>
    <dynamic_friction>1.212</dynamic_friction>
    <rolling_friction>1.413</rolling_friction>
    <spring_coeff unit="LBS/FT">12382.2</spring_coeff>
    <damping_coeff unit="LBS/FT/SEC">2751.6</damping_coeff>
  </contact>
  <contact type="STRUCTURE" name="Fuse106">
    <!--16: Fuse106-->
    <location unit="M">
      <x>10.615</x>
      <y>0</y>
      <z>-0.6568</z>
    </location>
    <static_friction>1.2</static_friction>
    <dynamic_friction>1.212</dynamic_friction>
    <rolling_friction>1.413</rolling_friction>
    <spring_coeff unit="LBS/FT">12382.2</spring_coeff>
    <damping_coeff unit="LBS/FT/SEC">2751.6</damping_coeff>
  </contact>
  <contact type="STRUCTURE" name="Fuse127">
    <!--17: Fuse127-->
    <location unit="M">
      <x>12.7732</x>
      <y>0</y>
      <z>-0.3485</z>
    </location>
    <static_friction>1.2</static_friction>
    <dynamic_friction>1.212</dynamic_friction>
    <rolling_friction>1.413</rolling_friction>
    <spring_coeff unit="LBS/FT">12382.2</spring_coeff>
    <damping_coeff unit="LBS/FT/SEC">2751.6</damping_coeff>
  </contact>
</ground_reactions>

<propulsion>
  <engine file="RR-AVON-114">
    <location unit="M">
      <x>12</x>
      <y>0</y>
      <z>0</z>
    </location>
    <feed>4</feed>
    <feed>3</feed>
    <feed>2</feed>
    <feed>1</feed>
    <feed>0</feed>
    <thruster file="direct">
      <location unit="M">
        <x>12</x>
        <y>0</y>
        <z>0</z>
      </location>
    </thruster>
  </engine>
  <tank number="0" type="FUEL">
    <!--0: RightWing-->
    <location unit="M">
      <x>5.92</x>
      <y>1.59</y>
      <z>-0.031</z>
    </location>
    <capacity unit="LBS">739</capacity>
    <standpipe unit="LBS">10</standpipe>
    <contents unit="LBS">739</contents>
    <priority>1</priority>
  </tank>
  <tank number="1" type="FUEL">
    <!--1: LeftWing-->
    <location unit="M">
      <x>5.92</x>
      <y>-1.59</y>
      <z>-0.031</z>
    </location>
    <capacity unit="LBS">739</capacity>
    <standpipe unit="LBS">10</standpipe>
    <contents unit="LBS">739</contents>
    <priority>1</priority>
  </tank>
  <tank number="2" type="FUEL">
    <!--2: RearTank-->
    <location unit="M">
      <x>6.53</x>
      <y>0</y>
      <z>-0.031</z>
    </location>
    <capacity unit="LBS">801</capacity>
    <standpipe unit="LBS">10</standpipe>
    <contents unit="LBS">801</contents>
    <priority>2</priority>
  </tank>
  <tank number="3" type="FUEL">
    <!--3: CenterTank-->
    <location unit="M">
      <x>5.6435</x>
      <y>0</y>
      <z>-0.031</z>
    </location>
    <capacity unit="LBS">755</capacity>
    <standpipe unit="LBS">10</standpipe>
    <contents unit="LBS">755</contents>
    <priority>4</priority>
  </tank>
  <tank number="4" type="FUEL">
    <!--4: FrontTank-->
    <location unit="M">
      <x>4.77</x>
      <y>0</y>
      <z>-0.031</z>
    </location>
    <capacity unit="LBS">862</capacity>
    <standpipe unit="LBS">10</standpipe>
    <contents unit="LBS">862</contents>
    <priority>3</priority>
  </tank>
</propulsion>

<system file="swift-flight-controls"/>
<system file="swift-hydraulics"/>
<system file="swift-engines"/>
<system file="swift-ecs"/>
<system file="swift-electrics"/>


<flight_control name="swift-FCS">
  <channel name="extra-aero">
        <!-- need %Cg in chord for moments [Xcg - Xref)/100] -->
        <summer name="cg-x-offset-chord-in">
            <input> inertia/cg-x-in</input>
            <input> -metrics/aero-rp-x-in</input>
            <output>inertia/cg-x-offset-chord-in</output>
        </summer>

        <!-- figure out the factor for the fuel tank aero -->
        <pure_gain name="cg-x-chord-percent">
            <description>Percent offset of the CoP from the CG</description>
            <input>inertia/cg-x-offset-chord-in</input>
            <gain> -0.01</gain>
            <clipto>
                <min> -1 </min>
                <max> 1 </max>
            </clipto>
            <output> inertia/cg-x-mac-percent </output>
        </pure_gain>

        <fcs_function name="pb">
            <description>PB Denormalization</description>
            <function>
                    <product>
                        <property>aero/bi2vel</property>
                        <property>velocities/p-aero-rad_sec</property>
                    </product>
            </function>
            <output>aero/pb</output>
        </fcs_function>

        <fcs_function name="cbarq-2vo">
            <description>For denormalization</description>
            <function>
                    <product>
                        <property>aero/ci2vel</property>
                        <property>velocities/q-aero-rad_sec</property>
                    </product>
            </function>
            <output>aero/qb</output>
        </fcs_function>

        <fcs_function name="rb-2vo">
            <description>For denormalization</description>
            <function>
                <product>
                        <property>aero/bi2vel</property>
                        <property>velocities/r-aero-rad_sec</property>
                    </product>
            </function>
            <output>aero/rb</output>
        </fcs_function>


        <fcs_function name="aero-cos-alpha">
            <function>
                <cos>
                    <property>aero/alpha-rad</property>
                </cos>
            </function>
            <output>aero/cos-alpha</output>
        </fcs_function>

        <fcs_function name="aero-sin-alpha">
            <function>
                <sin>
                    <property>aero/alpha-rad</property>
                </sin>
            </function>
            <output>aero/sin-alpha</output>
        </fcs_function>
        <fcs_function name="position/h-agl-m">
            <description>Height above ground (meters)</description>
            <function>
                    <product>
                        <property>position/h-agl-ft</property>
                        <value>0.3048</value>
                    </product>
            </function>
            <output>position/h-agl-m</output>
        </fcs_function>

       </channel>
</flight_control>
<aerodynamics>
    <function name="aero/c/CFXB">
    <description>BASE DRAG</description>
          <table>
            <independentVar lookup="row">aero/alpha-deg</independentVar>
            <independentVar lookup="column">aero/beta-deg</independentVar>
            <tableData>
                                -20	        -10	         -5	         -2	          0	          2	          5	         10	         20
                    -20	   0.15932	   0.15729	   0.15662	   0.15638	   0.15667	   0.15640	   0.15660	   0.15729	   0.15935
                    -10	   0.07361	   0.06169	   0.05869	   0.05791	   0.05780	   0.05791	   0.05869	   0.06169	   0.07361
                     -8	   0.06289	   0.05019	   0.04709	   0.04625	   0.04609	   0.04625	   0.04708	   0.05019	   0.06290
                     -6	   0.05479	   0.04147	   0.03827	   0.03737	   0.03718	   0.03737	   0.03827	   0.04147	   0.05479
                     -4	   0.04923	   0.03552	   0.03223	   0.03129	   0.03111	   0.03130	   0.03223	   0.03552	   0.04923
                     -2	   0.04625	   0.03244	   0.02904	   0.02810	   0.02792	   0.02810	   0.02904	   0.03244	   0.04626
                      0	   0.04595	   0.03218	   0.02879	   0.02783	   0.02765	   0.02783	   0.02879	   0.03218	   0.04595
                      2	   0.04838	   0.03478	   0.03149	   0.03058	   0.03039	   0.03058	   0.03149	   0.03478	   0.04838
                      4	   0.05353	   0.04033	   0.03719	   0.03635	   0.03623	   0.03635	   0.03719	   0.04033	   0.05353
                      6	   0.06140	   0.04864	   0.04588	   0.04519	   0.04502	   0.04519	   0.04588	   0.04864	   0.06142
                      8	   0.07175	   0.05947	   0.05759	   0.05714	   0.05692	   0.05714	   0.05759	   0.05948	   0.07179
                     10	   0.08387	   0.07247	   0.07313	   0.07297	   0.07302	   0.07297	   0.07314	   0.07249	   0.08389
                     12	   0.10207	   0.08889	   0.09025	   0.09033	   0.09065	   0.09032	   0.09022	   0.08890	   0.10211
                     14	   0.12219	   0.11178	   0.11156	   0.11371	   0.11318	   0.11374	   0.11153	   0.11178	   0.12220
                     16	   0.14182	   0.13746	   0.13578	   0.13786	   0.13824	   0.13789	   0.13577	   0.13745	   0.14238
                     18	   0.16601	   0.16220	   0.16276	   0.16515	   0.16561	   0.16512	   0.16272	   0.16222	   0.16600
                     20	   0.18800	   0.18830	   0.19241	   0.19458	   0.19572	   0.19460	   0.19241	   0.18871	   0.18801
                     22	   0.21188	   0.21126	   0.22463	   0.22722	   0.22894	   0.22716	   0.22467	   0.21128	   0.21192
                     24	   0.23996	   0.23718	   0.25645	   0.26218	   0.26305	   0.26214	   0.25643	   0.23715	   0.23995
                     26	   0.26770	   0.27237	   0.29019	   0.29639	   0.29864	   0.29501	   0.29021	   0.27223	   0.26754
                     28	   0.29785	   0.30345	   0.32576	   0.33214	   0.33398	   0.33215	   0.32576	   0.30335	   0.29780
                     30	   0.32260	   0.33349	   0.36206	   0.36905	   0.37006	   0.36896	   0.36199	   0.33357	   0.32232
                     35	   0.42826	   0.44934	   0.46564	   0.47121	   0.47222	   0.47120	   0.46543	   0.44916	   0.42807
                     40	   0.53997	   0.56750	   0.58377	   0.59090	   0.59573	   0.59131	   0.58397	   0.56749	   0.53973
                     45	   0.66123	   0.70184	   0.72956	   0.73842	   0.74190	   0.73893	   0.72968	   0.70235	   0.66134
                     50	   0.78780	   0.84269	   0.87207	   0.88888	   0.89315	   0.88885	   0.87224	   0.84288	   0.78672
                     55	   0.90643	   0.99270	   1.02005	   1.02627	   1.03197	   1.02688	   1.02015	   0.99322	   0.90634
                     60	   1.05022	   1.15043	   1.17104	   1.17817	   1.18314	   1.17879	   1.17106	   1.15066	   1.05032
            </tableData>
          </table>
    </function>
    <function name="aero/c/CFXDAD">
    <description>DRAG INCREMENT DUE TO AILERON DEFLECTION</description>
    <product>
          <property>fcs/aileron-pos-deg</property>
          <table>
            <independentVar lookup="row">aero/alpha-deg</independentVar>
            <independentVar lookup="column">aero/beta-deg</independentVar>
            <tableData>
                                -20	        -10	         -5	         -2	          0	          2	          5	         10	         20
                    -20	   0.00004	  -0.00007	  -0.00004	  -0.00002	   0.00000	   0.00002	   0.00005	   0.00007	  -0.00004
                    -10	   0.00021	   0.00012	   0.00006	   0.00003	   0.00000	  -0.00003	  -0.00006	  -0.00012	  -0.00021
                     -8	   0.00017	   0.00009	   0.00005	   0.00002	   0.00000	  -0.00002	  -0.00005	  -0.00009	  -0.00017
                     -6	   0.00013	   0.00007	   0.00003	   0.00001	   0.00000	  -0.00002	  -0.00003	  -0.00007	  -0.00013
                     -4	   0.00008	   0.00004	   0.00003	   0.00001	   0.00000	  -0.00001	  -0.00003	  -0.00004	  -0.00008
                     -2	   0.00003	   0.00001	   0.00001	   0.00000	   0.00000	   0.00000	  -0.00001	  -0.00002	  -0.00003
                      0	  -0.00003	  -0.00001	  -0.00001	   0.00000	   0.00000	   0.00000	   0.00001	   0.00001	   0.00003
                      2	  -0.00008	  -0.00004	  -0.00003	  -0.00001	   0.00000	   0.00001	   0.00002	   0.00004	   0.00008
                      4	  -0.00013	  -0.00006	  -0.00004	  -0.00002	   0.00000	   0.00002	   0.00004	   0.00006	   0.00014
                      6	  -0.00016	  -0.00009	  -0.00006	  -0.00003	   0.00000	   0.00003	   0.00006	   0.00009	   0.00016
                      8	  -0.00021	  -0.00011	  -0.00007	  -0.00004	   0.00000	   0.00004	   0.00007	   0.00010	   0.00020
                     10	  -0.00026	  -0.00011	  -0.00011	  -0.00006	   0.00000	   0.00006	   0.00011	   0.00011	   0.00026
                     12	  -0.00025	  -0.00011	  -0.00012	  -0.00004	   0.00000	   0.00004	   0.00012	   0.00010	   0.00025
                     14	  -0.00022	  -0.00011	  -0.00008	  -0.00004	   0.00000	   0.00004	   0.00008	   0.00010	   0.00022
                     16	  -0.00013	  -0.00006	  -0.00004	  -0.00003	   0.00000	   0.00003	   0.00004	   0.00006	   0.00014
                     18	  -0.00001	   0.00004	   0.00001	   0.00000	   0.00000	   0.00000	  -0.00001	  -0.00004	   0.00001
                     20	   0.00015	   0.00023	   0.00012	   0.00005	   0.00000	  -0.00006	  -0.00012	  -0.00023	  -0.00015
                     22	   0.00029	   0.00041	   0.00027	   0.00012	   0.00000	  -0.00011	  -0.00027	  -0.00041	  -0.00029
                     24	   0.00034	   0.00052	   0.00040	   0.00018	   0.00000	  -0.00018	  -0.00040	  -0.00052	  -0.00034
                     26	   0.00056	   0.00065	   0.00048	   0.00024	   0.00000	  -0.00024	  -0.00048	  -0.00065	  -0.00056
                     28	   0.00062	   0.00073	   0.00050	   0.00027	   0.00000	  -0.00027	  -0.00049	  -0.00072	  -0.00062
                     30	   0.00075	   0.00084	   0.00057	   0.00028	   0.00000	  -0.00028	  -0.00056	  -0.00084	  -0.00076
                     35	   0.00073	   0.00090	   0.00069	   0.00030	   0.00001	  -0.00028	  -0.00067	  -0.00087	  -0.00073
                     40	   0.00074	   0.00105	   0.00074	   0.00037	   0.00004	  -0.00032	  -0.00071	  -0.00100	  -0.00081
                     45	   0.00052	   0.00094	   0.00099	   0.00058	   0.00002	  -0.00055	  -0.00098	  -0.00091	  -0.00049
                     50	   0.00091	   0.00099	   0.00053	   0.00038	   0.00001	  -0.00037	  -0.00052	  -0.00099	  -0.00091
                     55	  -0.00001	   0.00057	   0.00007	  -0.00008	   0.00002	   0.00015	  -0.00003	  -0.00054	   0.00005
                     60	   0.00003	  -0.00060	  -0.00032	  -0.00012	   0.00004	   0.00015	   0.00036	   0.00061	   0.00014
            </tableData>
          </table>
       </product>
    </function>
    <function name="aero/c/CFXDGE">
    <description>DRAG INCREMENT DUE TO GROUND EFFECT</description>
          <table>
            <independentVar lookup="row">position/h-agl-m</independentVar>
            <independentVar lookup="column">aero/alpha-deg</independentVar>
            <tableData>
                                  0	          2	          4	          8	         10	         15	         20
                      1	   0.00006	   0.00027	   0.00053	  -0.00003	  -0.00210	  -0.01655	  -0.03777
                      2	   0.00002	   0.00009	   0.00021	   0.00022	   0.00016	  -0.00238	  -0.01155
                      3	   0.00001	   0.00004	   0.00009	   0.00007	   0.00006	  -0.00122	  -0.00524
                      8	   0.00000	   0.00000	   0.00000	  -0.00011	  -0.00023	  -0.00117	  -0.00338
                     10	   0.00000	   0.00000	  -0.00001	  -0.00011	  -0.00023	  -0.00112	  -0.00320
                     30	   0.00000	   0.00000	   0.00000	   0.00000	   0.00000	   0.00000	   0.00000
            </tableData>
          </table>
    </function>
    <function name="aero/c/CFXDRD">
    <description>DRAG INCREMENT DUE TO RUDDER DEFLECTION</description>
    <product>
          <property>fcs/rudder-pos-deg</property>
          <table>
            <independentVar lookup="row">aero/alpha-deg</independentVar>
            <independentVar lookup="column">aero/beta-deg</independentVar>
            <tableData>
                                -20	        -10	         -5	         -2	          0	          2	          5	         10	         20
                    -20	  -0.00105	  -0.00056	  -0.00028	  -0.00011	   0.00000	   0.00011	   0.00028	   0.00056	   0.00106
                    -10	  -0.00092	  -0.00047	  -0.00023	  -0.00010	   0.00000	   0.00010	   0.00024	   0.00047	   0.00092
                     -8	  -0.00089	  -0.00046	  -0.00023	  -0.00009	   0.00000	   0.00009	   0.00023	   0.00046	   0.00089
                     -6	  -0.00087	  -0.00045	  -0.00022	  -0.00009	   0.00000	   0.00009	   0.00022	   0.00045	   0.00087
                     -4	  -0.00085	  -0.00044	  -0.00022	  -0.00009	   0.00000	   0.00009	   0.00022	   0.00044	   0.00085
                     -2	  -0.00083	  -0.00042	  -0.00021	  -0.00009	   0.00000	   0.00009	   0.00021	   0.00042	   0.00083
                      0	  -0.00081	  -0.00041	  -0.00021	  -0.00008	   0.00000	   0.00008	   0.00021	   0.00041	   0.00081
                      2	  -0.00079	  -0.00040	  -0.00020	  -0.00008	   0.00000	   0.00008	   0.00020	   0.00040	   0.00079
                      4	  -0.00078	  -0.00040	  -0.00019	  -0.00007	   0.00000	   0.00007	   0.00019	   0.00040	   0.00078
                      6	  -0.00077	  -0.00039	  -0.00019	  -0.00007	   0.00000	   0.00007	   0.00019	   0.00039	   0.00077
                      8	  -0.00076	  -0.00038	  -0.00019	  -0.00007	   0.00000	   0.00007	   0.00019	   0.00038	   0.00076
                     10	  -0.00077	  -0.00041	  -0.00019	  -0.00006	   0.00000	   0.00006	   0.00019	   0.00041	   0.00077
                     12	  -0.00078	  -0.00044	  -0.00020	  -0.00007	   0.00000	   0.00007	   0.00020	   0.00044	   0.00078
                     14	  -0.00078	  -0.00050	  -0.00020	  -0.00008	   0.00000	   0.00007	   0.00019	   0.00050	   0.00078
                     16	  -0.00073	  -0.00053	  -0.00019	  -0.00007	   0.00002	   0.00007	   0.00019	   0.00053	   0.00073
                     18	  -0.00070	  -0.00046	  -0.00017	  -0.00006	   0.00000	   0.00006	   0.00017	   0.00045	   0.00071
                     20	  -0.00063	  -0.00040	  -0.00014	  -0.00006	   0.00000	   0.00006	   0.00014	   0.00040	   0.00064
                     22	  -0.00055	  -0.00017	  -0.00010	  -0.00004	   0.00000	   0.00004	   0.00011	   0.00017	   0.00056
                     24	  -0.00056	   0.00007	  -0.00008	  -0.00004	   0.00000	   0.00004	   0.00008	  -0.00002	   0.00057
                     26	  -0.00047	  -0.00003	  -0.00004	  -0.00003	   0.00000	   0.00004	   0.00005	   0.00003	   0.00047
                     28	  -0.00041	   0.00006	  -0.00002	  -0.00002	   0.00000	   0.00001	   0.00003	  -0.00005	   0.00042
                     30	  -0.00026	   0.00008	   0.00000	  -0.00001	   0.00000	   0.00001	   0.00001	  -0.00008	   0.00025
                     35	  -0.00038	  -0.00009	   0.00003	   0.00002	   0.00001	   0.00001	   0.00000	   0.00013	   0.00037
                     40	  -0.00036	  -0.00011	  -0.00001	   0.00002	   0.00001	   0.00006	   0.00009	   0.00017	   0.00029
                     45	  -0.00022	  -0.00008	  -0.00003	   0.00000	   0.00003	   0.00005	   0.00007	   0.00012	   0.00024
                     50	  -0.00008	  -0.00005	  -0.00001	   0.00001	   0.00001	   0.00004	   0.00004	   0.00004	   0.00010
                     55	   0.00008	   0.00003	   0.00002	   0.00001	   0.00002	  -0.00001	   0.00001	   0.00001	  -0.00002
                     60	   0.00020	   0.00010	   0.00008	   0.00005	   0.00002	   0.00001	  -0.00001	  -0.00008	  -0.00017
            </tableData>
          </table>
       </product>
    </function>
    <function name="aero/c/CFXFLAPS">
    <description>DRAG INCREMENT DUE TO FLAPS</description>
    <product>
          <property>fcs/flap-pos-deg</property>
          <table>
            <independentVar lookup="row">aero/alpha-deg</independentVar>
            <independentVar lookup="column">aero/beta-deg</independentVar>
            <tableData>
                                -20	        -10	         -5	         -2	          0	          2	          5	         10	         20
                    -20	  -0.00074	  -0.00089	  -0.00092	  -0.00091	  -0.00092	  -0.00091	  -0.00092	  -0.00089	  -0.00074
                    -10	   0.00027	   0.00026	   0.00025	   0.00025	   0.00025	   0.00025	   0.00025	   0.00026	   0.00027
                     -8	   0.00048	   0.00050	   0.00049	   0.00049	   0.00049	   0.00049	   0.00049	   0.00050	   0.00048
                     -6	   0.00069	   0.00073	   0.00073	   0.00073	   0.00073	   0.00073	   0.00073	   0.00073	   0.00069
                     -4	   0.00091	   0.00096	   0.00097	   0.00097	   0.00097	   0.00097	   0.00097	   0.00096	   0.00091
                     -2	   0.00112	   0.00119	   0.00120	   0.00120	   0.00120	   0.00120	   0.00120	   0.00119	   0.00112
                      0	   0.00134	   0.00141	   0.00144	   0.00145	   0.00144	   0.00145	   0.00144	   0.00141	   0.00134
                      2	   0.00155	   0.00162	   0.00166	   0.00167	   0.00167	   0.00167	   0.00166	   0.00162	   0.00155
                      4	   0.00175	   0.00181	   0.00186	   0.00188	   0.00188	   0.00188	   0.00186	   0.00181	   0.00175
                      6	   0.00191	   0.00197	   0.00203	   0.00206	   0.00208	   0.00206	   0.00203	   0.00198	   0.00191
                      8	   0.00208	   0.00209	   0.00214	   0.00220	   0.00222	   0.00220	   0.00214	   0.00208	   0.00208
                     10	   0.00231	   0.00214	   0.00221	   0.00229	   0.00228	   0.00229	   0.00221	   0.00214	   0.00230
                     12	   0.00239	   0.00237	   0.00241	   0.00246	   0.00246	   0.00246	   0.00241	   0.00236	   0.00239
                     14	   0.00261	   0.00254	   0.00259	   0.00263	   0.00264	   0.00263	   0.00259	   0.00254	   0.00261
                     16	   0.00270	   0.00268	   0.00269	   0.00275	   0.00274	   0.00275	   0.00269	   0.00268	   0.00270
                     18	   0.00272	   0.00266	   0.00277	   0.00278	   0.00279	   0.00278	   0.00277	   0.00265	   0.00272
                     20	   0.00276	   0.00271	   0.00275	   0.00277	   0.00278	   0.00277	   0.00275	   0.00270	   0.00276
                     22	   0.00280	   0.00264	   0.00271	   0.00270	   0.00271	   0.00271	   0.00271	   0.00264	   0.00280
                     24	   0.00285	   0.00260	   0.00267	   0.00260	   0.00262	   0.00260	   0.00267	   0.00260	   0.00286
                     26	   0.00293	   0.00262	   0.00261	   0.00256	   0.00254	   0.00259	   0.00260	   0.00262	   0.00292
                     28	   0.00297	   0.00259	   0.00256	   0.00251	   0.00247	   0.00251	   0.00255	   0.00259	   0.00297
                     30	   0.00295	   0.00260	   0.00256	   0.00252	   0.00248	   0.00252	   0.00257	   0.00258	   0.00295
                     35	   0.00292	   0.00279	   0.00263	   0.00252	   0.00257	   0.00253	   0.00262	   0.00279	   0.00292
                     40	   0.00305	   0.00274	   0.00283	   0.00281	   0.00269	   0.00281	   0.00282	   0.00273	   0.00306
                     45	   0.00279	   0.00287	   0.00277	   0.00276	   0.00270	   0.00271	   0.00279	   0.00286	   0.00279
                     50	   0.00238	   0.00255	   0.00240	   0.00238	   0.00242	   0.00235	   0.00241	   0.00250	   0.00242
                     55	   0.00195	   0.00217	   0.00221	   0.00227	   0.00224	   0.00226	   0.00221	   0.00216	   0.00194
                     60	   0.00147	   0.00167	   0.00175	   0.00183	   0.00176	   0.00181	   0.00173	   0.00169	   0.00145
            </tableData>
          </table>
       </product>
    </function>
    <function name="aero/c/CFXGEAR">
    <description>DRAG INCREMENT DUE TO GEAR</description>
    <product>
          <property>gear/gear-pos-norm</property>
          <table>
            <independentVar lookup="row">aero/alpha-deg</independentVar>
            <independentVar lookup="column">aero/beta-deg</independentVar>
            <tableData>
                                -20	        -10	         -5	         -2	          0	          2	          5	         10	         20
                    -20	   0.00003	   0.00008	   0.00010	   0.00015	   0.00016	   0.00011	   0.00012	   0.00011	   0.00005
                    -10	   0.00032	   0.00040	   0.00045	   0.00045	   0.00046	   0.00046	   0.00045	   0.00041	   0.00034
                     -8	   0.00027	   0.00037	   0.00040	   0.00041	   0.00043	   0.00042	   0.00042	   0.00038	   0.00034
                     -6	   0.00025	   0.00032	   0.00037	   0.00038	   0.00038	   0.00038	   0.00037	   0.00033	   0.00027
                     -4	   0.00022	   0.00032	   0.00033	   0.00034	   0.00034	   0.00033	   0.00034	   0.00033	   0.00024
                     -2	   0.00024	   0.00037	   0.00033	   0.00029	   0.00029	   0.00029	   0.00033	   0.00037	   0.00024
                      0	   0.00027	   0.00048	   0.00037	   0.00026	   0.00024	   0.00026	   0.00037	   0.00048	   0.00027
                      2	   0.00042	   0.00067	   0.00047	   0.00019	   0.00016	   0.00019	   0.00048	   0.00067	   0.00039
                      4	   0.00068	   0.00085	   0.00054	   0.00004	  -0.00001	   0.00004	   0.00054	   0.00084	   0.00063
                      6	   0.00104	   0.00016	  -0.00034	  -0.00029	  -0.00035	  -0.00028	  -0.00033	   0.00014	   0.00096
                      8	   0.00160	  -0.00320	  -0.00169	  -0.00160	  -0.00106	  -0.00158	  -0.00167	  -0.00330	   0.00141
                     10	   0.00233	   0.00233	  -0.00336	  -0.00300	  -0.00245	  -0.00299	  -0.00339	   0.00217	   0.00214
                     12	   0.00313	   0.00242	  -0.00520	  -0.00361	  -0.00334	  -0.00362	  -0.00514	   0.00224	   0.00294
                     14	   0.00331	   0.00167	  -0.00301	  -0.00416	  -0.00745	  -0.00423	  -0.00296	   0.00164	   0.00312
                     16	   0.00428	   0.00139	  -0.00190	  -0.00460	  -0.00491	  -0.00462	  -0.00186	   0.00141	   0.00358
                     18	   0.00375	   0.00261	  -0.00204	  -0.00829	  -0.00064	  -0.00846	  -0.00204	   0.00264	   0.00374
                     20	   0.00602	   0.00395	  -0.00139	  -0.00385	  -0.00365	  -0.00405	  -0.00143	   0.00358	   0.00602
                     22	   0.00748	   0.00325	   0.00161	  -0.00321	  -0.00377	  -0.00304	   0.00162	   0.00290	   0.00750
                     24	   0.00997	  -0.00504	  -0.00112	   0.00249	  -0.00121	   0.00244	  -0.00115	  -0.00499	   0.01013
                     26	   0.00749	   0.00216	   0.00560	   0.00463	   0.00488	   0.00596	   0.00576	   0.00240	   0.00764
                     28	   0.01019	   0.00927	   0.00611	   0.00440	   0.00479	   0.00437	   0.00645	   0.01120	   0.01031
                     30	   0.01215	   0.00872	   0.00409	   0.00428	   0.00387	   0.00410	   0.00415	   0.00862	   0.01236
                     35	   0.01538	   0.00815	   0.00395	   0.00272	   0.00318	   0.00249	   0.00391	   0.00864	   0.01659
                     40	   0.02124	   0.01994	   0.01066	   0.01212	   0.01426	   0.01188	   0.01043	   0.01976	   0.02159
                     45	   0.03318	   0.01969	   0.01528	   0.01339	   0.01195	   0.01282	   0.01488	   0.01905	   0.03362
                     50	   0.01864	   0.01995	   0.01724	   0.01628	   0.01539	   0.01553	   0.01725	   0.02059	   0.01889
                     55	   0.01252	   0.01426	   0.01284	   0.01424	   0.01187	   0.01344	   0.01311	   0.01379	   0.01306
                     60	   0.00995	   0.00894	   0.01185	   0.01214	   0.01075	   0.01097	   0.01178	   0.01003	   0.00951
            </tableData>
          </table>
       </product>
    </function>
    <function name="aero/c/CFXMN">
    <description>DRAG INCREMENT DUE TO MACH</description>
          <table>
            <independentVar lookup="row">velocities/mach</independentVar>
            <independentVar lookup="column">aero/alpha-deg</independentVar>
            <tableData>
                                -10	         -5	         -2	       0.01	          1	          2	          6	          7	         10
                    0.2	  -0.00317	  -0.00066	  -0.00010	  -0.00009	  -0.00019	  -0.00036	  -0.00168	  -0.00223	  -0.00435
                    0.4	  -0.00210	  -0.00042	  -0.00007	  -0.00006	  -0.00012	  -0.00024	  -0.00108	  -0.00151	  -0.00284
                    0.6	   0.00000	   0.00004	   0.00000	   0.00000	   0.00000	   0.00000	   0.00000	  -0.00007	   0.00000
                    0.8	   0.00381	   0.00088	   0.00011	   0.00010	   0.00024	   0.00046	   0.00213	   0.00261	   0.00481
                   0.86	   0.00564	   0.00129	   0.00017	   0.00016	   0.00036	   0.00069	   0.00315	   0.00395	   0.00700
                   0.88	   0.00642	   0.00146	   0.00019	   0.00018	   0.00041	   0.00079	   0.00359	   0.00453	   0.00785
                   0.91	   0.00784	   0.00178	   0.00023	   0.00023	   0.00051	   0.00097	   0.00442	   0.00563	   0.00949
                  0.955	   0.01162	   0.00264	   0.00035	   0.00035	   0.00078	   0.00147	   0.00669	   0.00850	   0.01428
                   0.98	   0.01783	   0.00405	   0.00058	   0.00058	   0.00124	   0.00233	   0.01034	   0.01305	   0.02128
                   0.99	   0.02360	   0.00548	   0.00086	   0.00086	   0.00175	   0.00321	   0.01386	   0.01738	   0.02750
                    1.4	   0.02303	   0.00840	   0.00132	   0.00184	   0.00438	   0.00877	   0.04949	   0.06642	   0.13465
            </tableData>
          </table>
    </function>
    <function name="aero/c/CFXNWDOOR">
    <description>DRAG INCREMENT DUE TO NOSE DOOR</description>
    <product>
          <property>gear/gear-pos-norm</property>
          <table>
            <independentVar lookup="row">aero/alpha-deg</independentVar>
            <independentVar lookup="column">aero/beta-deg</independentVar>
            <tableData>
                                -20	        -10	         -5	         -2	          0	          2	          5	         10	         20
                    -20	   0.00440	   0.00094	   0.00020	   0.00005	   0.00013	   0.00041	   0.00113	   0.00262	   0.00744
                    -10	   0.00283	   0.00039	   0.00001	   0.00011	   0.00028	   0.00064	   0.00125	   0.00294	   0.00734
                     -8	   0.00259	   0.00033	  -0.00001	   0.00014	   0.00035	   0.00071	   0.00136	   0.00304	   0.00771
                     -6	   0.00236	   0.00025	   0.00000	   0.00015	   0.00043	   0.00077	   0.00144	   0.00318	   0.00815
                     -4	   0.00227	   0.00021	   0.00001	   0.00020	   0.00046	   0.00082	   0.00151	   0.00310	   0.00833
                     -2	   0.00213	   0.00016	   0.00002	   0.00022	   0.00049	   0.00087	   0.00163	   0.00305	   0.00793
                      0	   0.00179	  -0.00002	   0.00002	   0.00024	   0.00052	   0.00096	   0.00182	   0.00290	   0.00649
                      2	   0.00211	   0.00007	   0.00011	   0.00034	   0.00063	   0.00104	   0.00195	   0.00127	   0.00787
                      4	   0.00240	   0.00005	   0.00021	   0.00055	   0.00074	   0.00120	   0.00152	   0.00165	   0.00875
                      6	   0.00233	   0.00006	   0.00016	   0.00047	   0.00101	   0.00121	   0.00086	   0.00281	   0.00927
                      8	   0.00217	  -0.00001	   0.00020	   0.00062	   0.00095	   0.00126	   0.00158	   0.00368	   0.00957
                     10	   0.00203	   0.00010	   0.00018	   0.00047	   0.00082	   0.00100	   0.00196	   0.00404	   0.00976
                     12	   0.00174	  -0.00005	   0.00031	   0.00054	   0.00098	   0.00123	   0.00267	   0.00384	   0.00975
                     14	   0.00133	   0.00008	   0.00024	   0.00011	   0.00110	   0.00083	   0.00263	   0.00418	   0.00957
                     16	   0.00194	   0.00001	   0.00026	   0.00075	   0.00113	   0.00149	   0.00248	   0.00440	   0.00984
                     18	   0.00116	  -0.00002	   0.00035	   0.00087	   0.00117	   0.00172	   0.00281	   0.00448	   0.00906
                     20	   0.00114	   0.00035	   0.00036	   0.00068	   0.00111	   0.00189	   0.00300	   0.00531	   0.00932
                     22	   0.00114	   0.00005	   0.00044	   0.00092	   0.00152	   0.00195	   0.00318	   0.00544	   0.00882
                     24	   0.00118	   0.00017	   0.00083	   0.00147	   0.00149	   0.00258	   0.00348	   0.00531	   0.00936
                     26	   0.00111	   0.00028	   0.00141	   0.00112	   0.00160	   0.00383	   0.00357	   0.00525	   0.00862
                     28	   0.00087	   0.00062	   0.00130	   0.00120	   0.00183	   0.00276	   0.00346	   0.00554	   0.00766
                     30	   0.00032	   0.00021	   0.00124	   0.00194	   0.00247	   0.00288	   0.00408	   0.00558	   0.00727
                     35	  -0.00004	   0.00206	   0.00204	   0.00277	   0.00325	   0.00352	   0.00524	   0.00719	   0.00660
                     40	  -0.00386	   0.00302	   0.00557	   0.00648	   0.00265	   0.00700	   0.00809	   0.00697	   0.00262
                     45	   0.00099	   0.00305	   0.00372	   0.00412	   0.00384	   0.00519	   0.00566	   0.00678	   0.00658
                     50	   0.00163	   0.00053	   0.00186	   0.00400	   0.00389	   0.00464	   0.00406	   0.00480	   0.00668
                     55	   0.00312	   0.00268	   0.00229	   0.00341	   0.00323	   0.00475	   0.00440	   0.00608	   0.00768
                     60	   0.00079	   0.00178	   0.00483	   0.00527	   0.00625	   0.00583	   0.00676	   0.00460	   0.00556
            </tableData>
          </table>
       </product>
    </function>
    <function name="aero/c/CFZB">
    <description>BASE LIFT</description>
          <table>
            <independentVar lookup="row">aero/alpha-deg</independentVar>
            <independentVar lookup="column">fcs/elevator-pos-deg</independentVar>
            <tableData>
                                -30	        -20	        -10	          0	         10	         20	         30
                    -20	  -0.82849	  -0.86776	  -0.91782	  -0.97235	  -1.01729	  -1.04048	  -1.05119
                    -10	  -0.35923	  -0.39836	  -0.44794	  -0.50230	  -0.55382	  -0.59735	  -0.62280
                     -8	  -0.25068	  -0.28892	  -0.33769	  -0.39166	  -0.44332	  -0.48750	  -0.51815
                     -6	  -0.14318	  -0.18056	  -0.22872	  -0.28199	  -0.33361	  -0.37766	  -0.41032
                     -4	  -0.03346	  -0.07003	  -0.11702	  -0.16949	  -0.22082	  -0.26524	  -0.29845
                     -2	   0.07402	   0.03821	  -0.00798	  -0.05975	  -0.11086	  -0.15542	  -0.18911
                      0	   0.18094	   0.14567	   0.10010	   0.04878	  -0.00222	  -0.04690	  -0.08108
                      2	   0.28922	   0.25453	   0.20933	   0.15834	   0.10732	   0.06218	   0.02771
                      4	   0.40109	   0.36696	   0.32179	   0.26891	   0.21593	   0.16912	   0.13372
                      6	   0.50542	   0.47212	   0.42940	   0.37796	   0.32609	   0.27979	   0.24449
                      8	   0.61376	   0.57962	   0.53700	   0.48754	   0.43544	   0.39083	   0.35402
                     10	   0.71522	   0.68586	   0.64240	   0.59360	   0.54272	   0.49574	   0.45876
                     12	   0.81884	   0.78700	   0.74600	   0.69799	   0.64636	   0.59910	   0.56302
                     14	   0.91810	   0.88898	   0.84828	   0.79738	   0.74399	   0.69589	   0.65665
                     16	   0.99961	   0.97314	   0.93294	   0.88243	   0.82832	   0.77666	   0.73663
                     18	   1.05784	   1.04272	   1.00446	   0.95590	   0.90226	   0.85208	   0.81056
                     20	   1.10573	   1.09523	   1.06291	   1.01756	   0.96623	   0.91746	   0.87744
                     22	   1.14980	   1.14221	   1.11700	   1.07149	   1.02136	   0.97278	   0.93311
                     24	   1.17364	   1.16762	   1.14853	   1.10671	   1.05901	   1.01242	   0.97321
                     26	   1.19200	   1.18664	   1.17377	   1.13546	   1.08878	   1.04393	   1.00638
                     28	   1.19413	   1.18722	   1.17728	   1.14262	   1.09830	   1.05442	   1.01663
                     30	   1.18876	   1.18447	   1.17541	   1.14708	   1.10388	   1.06171	   1.02378
                     35	   1.15380	   1.14664	   1.13945	   1.11929	   1.07976	   1.04170	   1.01209
                     40	   1.10560	   1.10044	   1.09248	   1.07227	   1.04036	   1.00733	   0.97548
                     45	   1.03117	   1.02970	   1.01948	   1.00247	   0.97729	   0.94954	   0.92106
                     50	   0.93839	   0.93491	   0.92778	   0.91603	   0.89947	   0.87697	   0.85522
                     55	   0.79718	   0.78808	   0.78448	   0.78090	   0.76514	   0.74880	   0.73360
                     60	   0.64242	   0.64279	   0.64136	   0.63610	   0.62902	   0.61859	   0.60652
            </tableData>
          </table>
    </function>
    <function name="aero/c/CFZDAD">
    <description>LIFT INCREMENT DUE TO AILERON DEFLECTION</description>
    <product>
          <property>fcs/aileron-pos-deg</property>
          <table>
            <independentVar lookup="row">aero/alpha-deg</independentVar>
            <independentVar lookup="column">aero/beta-deg</independentVar>
            <tableData>
                                -20	        -10	         -5	         -2	          0	          2	          5	         10	         20
                    -20	   0.00105	   0.00082	   0.00026	   0.00016	   0.00000	  -0.00015	  -0.00026	  -0.00083	  -0.00104
                    -10	  -0.00230	  -0.00139	  -0.00071	  -0.00033	   0.00000	   0.00033	   0.00071	   0.00140	   0.00230
                     -8	  -0.00244	  -0.00137	  -0.00075	  -0.00028	   0.00000	   0.00029	   0.00075	   0.00137	   0.00243
                     -6	  -0.00249	  -0.00143	  -0.00072	  -0.00033	   0.00000	   0.00033	   0.00072	   0.00143	   0.00249
                     -4	  -0.00252	  -0.00145	  -0.00083	  -0.00035	   0.00000	   0.00035	   0.00083	   0.00145	   0.00252
                     -2	  -0.00257	  -0.00148	  -0.00084	  -0.00035	   0.00000	   0.00035	   0.00084	   0.00148	   0.00257
                      0	  -0.00258	  -0.00150	  -0.00085	  -0.00035	   0.00000	   0.00035	   0.00085	   0.00150	   0.00258
                      2	  -0.00253	  -0.00149	  -0.00084	  -0.00037	   0.00000	   0.00037	   0.00084	   0.00149	   0.00253
                      4	  -0.00246	  -0.00149	  -0.00080	  -0.00038	   0.00000	   0.00038	   0.00080	   0.00149	   0.00246
                      6	  -0.00232	  -0.00144	  -0.00079	  -0.00033	   0.00000	   0.00033	   0.00079	   0.00144	   0.00232
                      8	  -0.00204	  -0.00135	  -0.00077	  -0.00034	   0.00000	   0.00035	   0.00079	   0.00134	   0.00204
                     10	  -0.00156	  -0.00122	  -0.00087	  -0.00037	   0.00000	   0.00037	   0.00086	   0.00121	   0.00159
                     12	  -0.00117	  -0.00094	  -0.00082	  -0.00034	   0.00000	   0.00035	   0.00081	   0.00094	   0.00116
                     14	  -0.00029	  -0.00066	  -0.00052	  -0.00031	   0.00000	   0.00030	   0.00051	   0.00063	   0.00029
                     16	   0.00088	  -0.00015	  -0.00017	  -0.00022	  -0.00001	   0.00022	   0.00014	   0.00017	  -0.00083
                     18	   0.00179	   0.00070	   0.00020	   0.00000	   0.00000	  -0.00002	  -0.00020	  -0.00069	  -0.00179
                     20	   0.00254	   0.00185	   0.00087	   0.00032	   0.00000	  -0.00032	  -0.00089	  -0.00181	  -0.00254
                     22	   0.00297	   0.00256	   0.00158	   0.00059	  -0.00001	  -0.00060	  -0.00158	  -0.00257	  -0.00294
                     24	   0.00297	   0.00283	   0.00207	   0.00098	  -0.00001	  -0.00099	  -0.00210	  -0.00285	  -0.00300
                     26	   0.00317	   0.00309	   0.00240	   0.00119	   0.00000	  -0.00118	  -0.00240	  -0.00313	  -0.00317
                     28	   0.00298	   0.00305	   0.00233	   0.00130	   0.00000	  -0.00128	  -0.00231	  -0.00306	  -0.00300
                     30	   0.00296	   0.00314	   0.00235	   0.00122	   0.00000	  -0.00122	  -0.00236	  -0.00314	  -0.00294
                     35	   0.00242	   0.00285	   0.00207	   0.00115	  -0.00001	  -0.00113	  -0.00211	  -0.00276	  -0.00243
                     40	   0.00197	   0.00235	   0.00214	   0.00109	   0.00003	  -0.00105	  -0.00208	  -0.00239	  -0.00194
                     45	   0.00147	   0.00190	   0.00172	   0.00102	   0.00001	  -0.00100	  -0.00177	  -0.00193	  -0.00147
                     50	   0.00105	   0.00138	   0.00130	   0.00056	   0.00004	  -0.00051	  -0.00130	  -0.00135	  -0.00105
                     55	   0.00066	   0.00085	   0.00023	  -0.00001	  -0.00001	   0.00003	  -0.00012	  -0.00083	  -0.00070
                     60	   0.00019	   0.00020	  -0.00001	  -0.00001	   0.00000	  -0.00002	   0.00003	  -0.00020	  -0.00018
            </tableData>
          </table>
       </product>
    </function>
    <function name="aero/c/CFZDGE">
    <description>LIFT INCREMENT DUE TO GROUND EFFECT</description>
          <table>
            <independentVar lookup="row">position/h-agl-m</independentVar>
            <independentVar lookup="column">aero/alpha-deg</independentVar>
            <tableData>
                                  0	          2	          4	          8	         10	         15	         20
                      1	   0.01946	   0.04678	   0.07412	   0.11025	   0.22620	   0.12065	   0.00885
                      2	   0.00622	   0.01455	   0.02276	   0.03010	   0.03500	   0.02722	  -0.03782
                      3	   0.00321	   0.00761	   0.01167	   0.01300	   0.01509	   0.00678	  -0.01469
                      8	   0.00050	   0.00113	   0.00169	  -0.00150	  -0.00086	  -0.00718	  -0.01561
                     10	   0.00031	   0.00066	   0.00094	  -0.00246	  -0.00236	  -0.00800	  -0.01544
                     30	   0.00000	   0.00000	   0.00000	   0.00000	   0.00000	   0.00000	   0.00000
            </tableData>
          </table>
    </function>
    <function name="aero/c/CFZDRD">
    <description>LIFT INCREMENT DUE TO RUDDER DEFLECTION</description>
    <product>
          <property>fcs/rudder-pos-deg</property>
          <table>
            <independentVar lookup="row">aero/alpha-deg</independentVar>
            <independentVar lookup="column">aero/beta-deg</independentVar>
            <tableData>
                                -20	        -10	         -5	         -2	          0	          2	          5	         10	         20
                    -20	  -0.00027	  -0.00013	  -0.00015	  -0.00003	   0.00002	   0.00006	   0.00015	   0.00015	   0.00028
                    -10	  -0.00041	  -0.00020	  -0.00012	  -0.00005	   0.00000	   0.00005	   0.00011	   0.00019	   0.00042
                     -8	  -0.00041	  -0.00019	  -0.00012	  -0.00004	   0.00000	   0.00004	   0.00011	   0.00019	   0.00042
                     -6	  -0.00041	  -0.00020	  -0.00012	  -0.00004	   0.00000	   0.00004	   0.00012	   0.00020	   0.00041
                     -4	  -0.00039	  -0.00018	  -0.00012	  -0.00004	   0.00000	   0.00004	   0.00012	   0.00018	   0.00039
                     -2	  -0.00038	  -0.00018	  -0.00010	  -0.00004	   0.00000	   0.00004	   0.00010	   0.00018	   0.00038
                      0	  -0.00038	  -0.00019	  -0.00009	  -0.00003	   0.00000	   0.00003	   0.00009	   0.00019	   0.00038
                      2	  -0.00036	  -0.00019	  -0.00008	  -0.00002	   0.00000	   0.00002	   0.00008	   0.00019	   0.00037
                      4	  -0.00037	  -0.00019	  -0.00006	   0.00000	   0.00000	   0.00000	   0.00005	   0.00019	   0.00036
                      6	  -0.00032	  -0.00028	  -0.00006	   0.00002	  -0.00001	  -0.00003	   0.00006	   0.00027	   0.00032
                      8	  -0.00034	  -0.00012	  -0.00003	   0.00002	   0.00000	  -0.00002	   0.00004	   0.00011	   0.00036
                     10	  -0.00035	  -0.00020	  -0.00004	  -0.00005	   0.00000	   0.00004	   0.00004	   0.00019	   0.00035
                     12	  -0.00038	  -0.00004	  -0.00007	  -0.00004	   0.00000	   0.00004	   0.00006	   0.00003	   0.00036
                     14	  -0.00034	  -0.00004	  -0.00007	  -0.00004	   0.00001	   0.00002	   0.00006	   0.00004	   0.00033
                     16	  -0.00039	  -0.00010	  -0.00004	   0.00000	   0.00002	  -0.00002	   0.00004	   0.00010	   0.00044
                     18	  -0.00025	  -0.00013	  -0.00013	  -0.00004	  -0.00001	   0.00005	   0.00011	   0.00014	   0.00025
                     20	  -0.00021	  -0.00013	  -0.00002	   0.00001	  -0.00001	  -0.00002	   0.00001	   0.00011	   0.00024
                     22	  -0.00012	  -0.00017	  -0.00006	  -0.00006	   0.00001	   0.00004	   0.00005	   0.00018	   0.00011
                     24	  -0.00004	  -0.00011	  -0.00003	   0.00003	  -0.00001	  -0.00003	   0.00002	   0.00006	   0.00004
                     26	  -0.00017	  -0.00009	  -0.00011	  -0.00005	  -0.00001	   0.00006	   0.00011	   0.00008	   0.00016
                     28	  -0.00006	  -0.00014	  -0.00003	  -0.00001	  -0.00001	   0.00001	   0.00006	   0.00013	   0.00005
                     30	  -0.00003	  -0.00002	  -0.00001	  -0.00004	   0.00000	   0.00003	   0.00002	   0.00001	   0.00003
                     35	  -0.00008	  -0.00007	   0.00002	  -0.00006	   0.00000	   0.00003	   0.00002	   0.00004	   0.00008
                     40	   0.00000	  -0.00012	  -0.00001	  -0.00001	  -0.00002	   0.00002	   0.00004	   0.00018	   0.00002
                     45	  -0.00008	  -0.00004	  -0.00005	  -0.00003	   0.00002	   0.00002	  -0.00001	   0.00006	   0.00002
                     50	   0.00000	  -0.00004	   0.00000	   0.00000	  -0.00001	   0.00002	  -0.00002	   0.00001	  -0.00001
                     55	   0.00000	   0.00001	  -0.00005	   0.00001	  -0.00002	   0.00015	  -0.00010	  -0.00001	  -0.00001
                     60	   0.00000	  -0.00002	   0.00000	   0.00004	   0.00000	  -0.00002	  -0.00001	  -0.00001	   0.00002
            </tableData>
          </table>
       </product>
    </function>
    <function name="aero/c/CFZFLAPS">
    <description>LIFT INCREMENT DUE TO FLAPS</description>
    <product>
          <property>fcs/flap-pos-deg</property>
          <table>
            <independentVar lookup="row">aero/alpha-deg</independentVar>
            <independentVar lookup="column">aero/beta-deg</independentVar>
            <tableData>
                                -20	        -10	         -5	         -2	          0	          2	          5	         10	         20
                    -20	   0.00675	   0.00743	   0.00741	   0.00736	   0.00729	   0.00736	   0.00741	   0.00743	   0.00674
                    -10	   0.00632	   0.00718	   0.00749	   0.00755	   0.00758	   0.00755	   0.00749	   0.00718	   0.00632
                     -8	   0.00624	   0.00706	   0.00741	   0.00750	   0.00748	   0.00750	   0.00741	   0.00707	   0.00625
                     -6	   0.00625	   0.00696	   0.00725	   0.00738	   0.00742	   0.00738	   0.00725	   0.00695	   0.00625
                     -4	   0.00623	   0.00686	   0.00706	   0.00717	   0.00715	   0.00717	   0.00707	   0.00686	   0.00623
                     -2	   0.00621	   0.00679	   0.00694	   0.00699	   0.00697	   0.00699	   0.00693	   0.00678	   0.00623
                      0	   0.00617	   0.00673	   0.00676	   0.00683	   0.00683	   0.00684	   0.00676	   0.00672	   0.00616
                      2	   0.00602	   0.00663	   0.00668	   0.00672	   0.00668	   0.00671	   0.00667	   0.00663	   0.00603
                      4	   0.00569	   0.00641	   0.00647	   0.00652	   0.00648	   0.00653	   0.00648	   0.00640	   0.00569
                      6	   0.00538	   0.00629	   0.00629	   0.00630	   0.00633	   0.00630	   0.00629	   0.00630	   0.00538
                      8	   0.00501	   0.00576	   0.00598	   0.00595	   0.00601	   0.00594	   0.00598	   0.00575	   0.00502
                     10	   0.00464	   0.00534	   0.00551	   0.00556	   0.00545	   0.00555	   0.00551	   0.00535	   0.00465
                     12	   0.00400	   0.00487	   0.00490	   0.00489	   0.00484	   0.00489	   0.00490	   0.00486	   0.00398
                     14	   0.00323	   0.00419	   0.00426	   0.00421	   0.00422	   0.00421	   0.00425	   0.00418	   0.00325
                     16	   0.00262	   0.00344	   0.00350	   0.00356	   0.00347	   0.00356	   0.00351	   0.00342	   0.00258
                     18	   0.00191	   0.00251	   0.00277	   0.00283	   0.00277	   0.00283	   0.00276	   0.00249	   0.00190
                     20	   0.00149	   0.00172	   0.00199	   0.00217	   0.00214	   0.00217	   0.00197	   0.00172	   0.00148
                     22	   0.00120	   0.00140	   0.00133	   0.00138	   0.00139	   0.00138	   0.00132	   0.00138	   0.00123
                     24	   0.00086	   0.00105	   0.00086	   0.00070	   0.00079	   0.00070	   0.00087	   0.00099	   0.00086
                     26	   0.00049	   0.00067	   0.00045	   0.00034	   0.00028	   0.00032	   0.00045	   0.00067	   0.00045
                     28	   0.00031	   0.00043	   0.00016	   0.00008	   0.00007	   0.00008	   0.00014	   0.00041	   0.00032
                     30	   0.00011	   0.00020	   0.00006	  -0.00009	  -0.00018	  -0.00010	   0.00005	   0.00021	   0.00011
                     35	  -0.00021	  -0.00003	  -0.00024	  -0.00031	  -0.00020	  -0.00032	  -0.00031	  -0.00002	  -0.00022
                     40	  -0.00023	  -0.00023	  -0.00005	  -0.00020	  -0.00027	  -0.00018	  -0.00009	  -0.00022	  -0.00023
                     45	  -0.00010	  -0.00009	  -0.00004	  -0.00032	  -0.00028	  -0.00036	  -0.00004	  -0.00009	  -0.00010
                     50	  -0.00020	  -0.00026	  -0.00024	  -0.00041	  -0.00037	  -0.00045	  -0.00021	  -0.00027	  -0.00024
                     55	  -0.00033	  -0.00036	  -0.00005	   0.00002	  -0.00003	   0.00002	  -0.00006	  -0.00033	  -0.00035
                     60	  -0.00022	  -0.00014	  -0.00012	  -0.00003	   0.00003	  -0.00003	  -0.00012	  -0.00019	  -0.00022
            </tableData>
          </table>
       </product>
    </function>
    <function name="aero/c/CFZGEAR">
    <description>LIFT INCREMENT DUE TO GEAR</description>
    <product>
          <property>gear/gear-pos-norm</property>
          <table>
            <independentVar lookup="row">aero/alpha-deg</independentVar>
            <independentVar lookup="column">aero/beta-deg</independentVar>
            <tableData>
                                -20	        -10	         -5	         -2	          0	          2	          5	         10	         20
                    -20	  -0.04873	  -0.04799	  -0.04714	  -0.04691	  -0.04624	  -0.04637	  -0.04750	  -0.04808	  -0.04872
                    -10	  -0.02553	  -0.02858	  -0.02988	  -0.03024	  -0.03032	  -0.03045	  -0.03034	  -0.02958	  -0.02716
                     -8	  -0.02056	  -0.02357	  -0.02492	  -0.02512	  -0.02514	  -0.02530	  -0.02537	  -0.02446	  -0.02209
                     -6	  -0.01568	  -0.01812	  -0.01935	  -0.01964	  -0.01968	  -0.01979	  -0.01985	  -0.01900	  -0.01742
                     -4	  -0.01023	  -0.01246	  -0.01360	  -0.01387	  -0.01399	  -0.01405	  -0.01406	  -0.01335	  -0.01214
                     -2	  -0.00530	  -0.00659	  -0.00776	  -0.00797	  -0.00808	  -0.00816	  -0.00824	  -0.00752	  -0.00709
                      0	   0.00007	  -0.00074	  -0.00183	  -0.00198	  -0.00208	  -0.00218	  -0.00232	  -0.00171	  -0.00182
                      2	   0.00549	   0.00500	   0.00402	   0.00392	   0.00382	   0.00371	   0.00352	   0.00399	   0.00364
                      4	   0.01084	   0.01083	   0.00974	   0.00965	   0.00957	   0.00947	   0.00920	   0.00961	   0.00895
                      6	   0.01634	   0.01635	   0.01556	   0.01512	   0.01512	   0.01495	   0.01500	   0.01535	   0.01448
                      8	   0.02023	   0.02093	   0.02068	   0.02092	   0.02024	   0.02068	   0.02012	   0.01962	   0.01854
                     10	   0.02584	   0.02536	   0.02469	   0.02488	   0.02503	   0.02482	   0.02402	   0.02457	   0.02363
                     12	   0.02868	   0.02930	   0.02840	   0.02937	   0.02950	   0.02915	   0.02753	   0.02813	   0.02652
                     14	   0.03308	   0.03335	   0.03231	   0.03347	   0.03395	   0.03309	   0.03183	   0.03198	   0.03086
                     16	   0.03859	   0.03953	   0.03605	   0.03617	   0.03554	   0.03616	   0.03628	   0.03912	   0.03479
                     18	   0.03759	   0.04077	   0.03918	   0.03853	   0.03778	   0.03827	   0.03932	   0.04115	   0.03736
                     20	   0.04058	   0.04563	   0.04261	   0.04014	   0.03999	   0.03973	   0.04189	   0.04497	   0.04014
                     22	   0.04243	   0.04673	   0.04695	   0.04255	   0.04254	   0.04255	   0.04673	   0.04690	   0.04156
                     24	   0.04269	   0.04729	   0.04663	   0.04738	   0.04588	   0.04763	   0.04711	   0.04714	   0.04298
                     26	   0.04407	   0.05137	   0.05041	   0.04795	   0.04871	   0.04745	   0.05025	   0.05074	   0.04371
                     28	   0.04233	   0.05331	   0.05100	   0.05089	   0.05127	   0.04981	   0.05086	   0.05122	   0.04214
                     30	   0.04363	   0.05331	   0.05430	   0.05243	   0.05110	   0.05150	   0.05369	   0.05345	   0.04462
                     35	   0.04711	   0.05166	   0.05594	   0.05159	   0.05128	   0.05045	   0.05341	   0.05492	   0.04890
                     40	   0.05007	   0.05219	   0.04835	   0.04959	   0.04975	   0.05006	   0.04873	   0.05270	   0.05042
                     45	   0.05150	   0.04990	   0.04908	   0.04286	   0.04728	   0.04492	   0.05153	   0.05054	   0.05076
                     50	   0.04592	   0.04733	   0.04905	   0.04892	   0.04736	   0.04701	   0.04876	   0.04854	   0.04499
                     55	   0.04198	   0.04125	   0.04266	   0.04327	   0.04303	   0.04429	   0.04356	   0.04161	   0.04160
                     60	   0.03776	   0.03561	   0.03288	   0.03554	   0.03766	   0.03624	   0.03280	   0.03509	   0.03566
            </tableData>
          </table>
       </product>
    </function>
    <function name="aero/c/CFZMN">
    <description>LIFT INCREMENT DUE TO MACH</description>
          <table>
            <independentVar lookup="row">velocities/mach</independentVar>
            <independentVar lookup="column">aero/alpha-deg</independentVar>
            <tableData>
                                -10	         -5	         -2	       0.01	          1	          2	          6	          7	         10
                    0.2	   0.01974	   0.00856	   0.00226	  -0.00227	  -0.00448	  -0.00677	  -0.01610	  -0.01648	  -0.02602
                    0.4	   0.01284	   0.00541	   0.00146	  -0.00149	  -0.00293	  -0.00442	  -0.01034	  -0.01051	  -0.01710
                    0.6	  -0.00001	  -0.00038	   0.00000	   0.00000	   0.00000	   0.00000	  -0.00001	   0.00088	  -0.00004
                    0.8	  -0.02009	  -0.01022	  -0.00247	   0.00261	   0.00501	   0.00748	   0.01713	   0.02046	   0.02814
                   0.86	  -0.02841	  -0.01463	  -0.00358	   0.00375	   0.00722	   0.01073	   0.02444	   0.02888	   0.03926
                   0.88	  -0.03189	  -0.01641	  -0.00403	   0.00421	   0.00811	   0.01203	   0.02728	   0.03227	   0.04334
                   0.91	  -0.03760	  -0.01970	  -0.00486	   0.00504	   0.00972	   0.01434	   0.03221	   0.03816	   0.05070
                  0.955	  -0.05329	  -0.02812	  -0.00715	   0.00721	   0.01408	   0.02079	   0.04575	   0.05348	   0.07221
                   0.98	  -0.08167	  -0.04193	  -0.01103	   0.01061	   0.02101	   0.03128	   0.06908	   0.07942	   0.10508
                   0.99	  -0.10970	  -0.05500	  -0.01503	   0.01344	   0.02717	   0.04080	   0.09217	   0.10540	   0.13807
                    1.4	  -0.08805	  -0.04102	  -0.00097	   0.03025	   0.04600	   0.06197	   0.12491	   0.14060	   0.17374
            </tableData>
          </table>
    </function>
    <function name="aero/c/CFZNWDOOR">
    <description>LIFT INCREMENT DUE TO NOSE DOOR</description>
    <product>
          <property>gear/gear-pos-norm</property>
          <table>
            <independentVar lookup="row">aero/alpha-deg</independentVar>
            <independentVar lookup="column">aero/beta-deg</independentVar>
            <tableData>
                                -20	        -10	         -5	         -2	          0	          2	          5	         10	         20
                    -20	  -0.00282	  -0.00095	   0.00008	   0.00046	   0.00320	   0.00096	   0.00082	   0.00219	   0.00168
                    -10	   0.00326	   0.00007	   0.00000	   0.00019	   0.00002	  -0.00039	  -0.00101	  -0.00168	   0.00574
                     -8	   0.00280	  -0.00002	   0.00020	  -0.00001	  -0.00016	  -0.00092	  -0.00158	  -0.00290	   0.00515
                     -6	   0.00475	   0.00005	   0.00023	   0.00000	  -0.00038	  -0.00098	  -0.00218	  -0.00444	   0.00323
                     -4	   0.00513	   0.00018	   0.00036	   0.00005	  -0.00043	  -0.00104	  -0.00262	  -0.00648	   0.00095
                     -2	   0.00376	   0.00045	   0.00054	   0.00013	  -0.00057	  -0.00115	  -0.00384	  -0.00769	  -0.00239
                      0	   0.00618	   0.00098	   0.00085	   0.00051	  -0.00024	  -0.00172	  -0.00506	  -0.00676	  -0.00082
                      2	   0.00834	   0.00146	   0.00059	   0.00058	  -0.00044	  -0.00236	  -0.00514	  -0.00618	   0.00523
                      4	   0.01022	   0.00192	  -0.00016	  -0.00085	  -0.00123	  -0.00268	  -0.00379	  -0.00215	   0.00875
                      6	   0.01074	   0.00272	  -0.00070	  -0.00160	  -0.00298	  -0.00364	   0.00087	   0.00158	   0.00684
                      8	   0.00919	   0.00270	   0.00005	  -0.00121	  -0.00263	  -0.00233	   0.00184	   0.00021	   0.00335
                     10	   0.00974	   0.00291	  -0.00016	  -0.00164	  -0.00252	  -0.00246	   0.00030	   0.00017	   0.00140
                     12	   0.00752	   0.00208	   0.00107	  -0.00042	  -0.00170	  -0.00075	   0.00129	  -0.00322	  -0.00194
                     14	   0.00737	   0.00272	   0.00079	  -0.00262	  -0.00027	  -0.00336	  -0.00157	  -0.00516	  -0.00164
                     16	   0.01197	   0.00332	   0.00105	  -0.00009	  -0.00130	  -0.00089	  -0.00264	  -0.00460	  -0.00135
                     18	   0.00574	   0.00307	   0.00090	  -0.00010	  -0.00113	  -0.00184	  -0.00411	  -0.00497	  -0.00735
                     20	   0.00601	   0.00534	   0.00060	  -0.00037	  -0.00083	  -0.00137	  -0.00342	  -0.00303	  -0.00844
                     22	   0.00655	   0.00193	   0.00080	  -0.00025	  -0.00040	  -0.00154	  -0.00343	  -0.00403	  -0.00954
                     24	   0.00632	   0.00430	   0.00117	   0.00055	   0.00013	  -0.00050	  -0.00259	  -0.00447	  -0.01045
                     26	   0.00699	   0.00284	   0.00244	  -0.00001	  -0.00004	  -0.00217	  -0.00210	  -0.00625	  -0.01481
                     28	   0.00630	   0.00452	   0.00406	   0.00174	  -0.00014	   0.00006	  -0.00305	  -0.00633	  -0.01241
                     30	   0.00788	   0.00413	   0.00254	   0.00199	  -0.00051	  -0.00040	  -0.00286	  -0.00485	  -0.01531
                     35	   0.00639	   0.00533	   0.00695	  -0.00038	  -0.00319	  -0.00241	  -0.00136	  -0.00145	  -0.01270
                     40	   0.00926	   0.00706	   0.00358	   0.00155	  -0.00084	  -0.00154	  -0.00208	  -0.00451	  -0.00835
                     45	   0.00546	   0.00329	  -0.00141	  -0.00122	   0.00203	  -0.00309	  -0.00537	  -0.00597	  -0.01374
                     50	   0.00486	   0.00393	   0.00258	   0.00479	  -0.00088	  -0.00044	  -0.00269	  -0.00646	  -0.01106
                     55	   0.00353	   0.00545	  -0.00231	   0.00204	   0.00173	  -0.00258	  -0.00702	  -0.00354	  -0.00987
                     60	   0.00715	   0.00222	   0.00134	  -0.00080	   0.00031	  -0.00212	  -0.00497	  -0.00472	  -0.00785
            </tableData>
          </table>
       </product>
    </function>
    <function name="aero/c/CMM1">
    <description>BASE PITCHING MOMENT</description>
          <table>
            <independentVar lookup="row">aero/alpha-deg</independentVar>
            <independentVar lookup="column">fcs/elevator-pos-deg</independentVar>
            <tableData>
                                -30	        -20	        -10	          0	         10	         20	         30
                    -20	  -0.02186	   0.04858	   0.13629	   0.22982	   0.31403	   0.35547	   0.37119
                    -10	  -0.14344	  -0.07289	   0.01700	   0.11614	   0.21146	   0.29238	   0.33940
                     -8	  -0.16146	  -0.09216	  -0.00328	   0.09533	   0.19123	   0.27294	   0.32994
                     -6	  -0.17896	  -0.11087	  -0.02340	   0.07422	   0.16988	   0.25241	   0.31445
                     -4	  -0.19331	  -0.12633	  -0.03981	   0.05725	   0.15290	   0.23595	   0.29834
                     -2	  -0.20611	  -0.14017	  -0.05481	   0.04129	   0.13666	   0.22010	   0.28338
                      0	  -0.21839	  -0.15338	  -0.06897	   0.02626	   0.12127	   0.20492	   0.26906
                      2	  -0.22789	  -0.16453	  -0.08157	   0.01251	   0.10671	   0.19017	   0.25418
                      4	  -0.23085	  -0.17070	  -0.09065	   0.00101	   0.09422	   0.17769	   0.24204
                      6	  -0.25307	  -0.19053	  -0.10781	  -0.01229	   0.08442	   0.17020	   0.23538
                      8	  -0.26119	  -0.19851	  -0.11877	  -0.02576	   0.07074	   0.15788	   0.22584
                     10	  -0.26910	  -0.21112	  -0.13118	  -0.04063	   0.05427	   0.14107	   0.21021
                     12	  -0.28703	  -0.22804	  -0.15193	  -0.06070	   0.03490	   0.12246	   0.19237
                     14	  -0.30976	  -0.25614	  -0.18054	  -0.08844	   0.00818	   0.09625	   0.16788
                     16	  -0.32796	  -0.28251	  -0.20781	  -0.11519	  -0.01756	   0.07411	   0.14644
                     18	  -0.32523	  -0.30004	  -0.22912	  -0.13798	  -0.04026	   0.05064	   0.12442
                     20	  -0.31929	  -0.30019	  -0.24067	  -0.15560	  -0.06074	   0.02934	   0.10188
                     22	  -0.31619	  -0.30213	  -0.25559	  -0.17036	  -0.07765	   0.01189	   0.08412
                     24	  -0.30034	  -0.28976	  -0.25448	  -0.17453	  -0.08593	  -0.00019	   0.07122
                     26	  -0.30091	  -0.28990	  -0.26656	  -0.19296	  -0.10618	  -0.02268	   0.04702
                     28	  -0.29425	  -0.28236	  -0.26375	  -0.19856	  -0.11442	  -0.03277	   0.03634
                     30	  -0.28989	  -0.28195	  -0.26452	  -0.20932	  -0.12880	  -0.05027	   0.01860
                     35	  -0.27851	  -0.26697	  -0.25233	  -0.21288	  -0.13929	  -0.06834	  -0.01160
                     40	  -0.30080	  -0.29075	  -0.27360	  -0.23224	  -0.17242	  -0.11101	  -0.05674
                     45	  -0.32763	  -0.32139	  -0.29946	  -0.26389	  -0.21545	  -0.16269	  -0.11242
                     50	  -0.34135	  -0.33660	  -0.32031	  -0.29130	  -0.26055	  -0.21696	  -0.17161
                     55	  -0.36766	  -0.35485	  -0.34478	  -0.32943	  -0.29786	  -0.26362	  -0.23189
                     60	  -0.37123	  -0.37043	  -0.36514	  -0.34989	  -0.32835	  -0.30370	  -0.28004
            </tableData>
          </table>
    </function>
    <function name="aero/c/CMMALPHADOT">
    <description>PITCH MOMENT DERIVATIVE FOR ALPHA DOT</description>
    <product>
          <property>aero/alphadot-rad_sec-limited</property>
          <table>
            <independentVar lookup="row">aero/alpha-deg</independentVar>
            <independentVar lookup="column">aero/beta-deg</independentVar>
            <tableData>
                                -20	        -10	         -5	         -2	          0	          2	          5	         10	         20
                    -20	  -0.50358	  -0.37931	  -0.73116	  -0.76884	  -0.75745	  -0.76809	  -0.72814	  -0.38243	  -0.50654
                     -2	  -0.27761	  -0.37328	  -0.40859	  -0.43027	  -0.44210	  -0.43016	  -0.40886	  -0.37322	  -0.27795
                      8	  -0.15791	  -0.54044	  -0.51752	  -0.56267	  -0.32173	  -0.56514	  -0.51855	  -0.56692	  -0.16853
                     18	  -0.08142	  -0.13291	  -0.28566	  -0.37525	  -0.49575	  -0.37678	  -0.28230	  -0.13362	  -0.09665
                     28	   0.15722	  -0.10795	  -0.06229	  -0.04889	  -0.42228	  -0.09093	  -0.05148	  -0.09835	   0.15309
                     50	  -0.49340	   0.28269	   0.44960	   0.21745	  -0.51384	   0.25337	   0.30207	   0.22728	  -0.54725
                     60	  -0.15104	   0.04445	   0.64901	  -0.16285	  -0.83224	  -0.20556	   0.67267	   0.05392	  -0.24296
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            </tableData>
          </table>
       </product>
    </function>
    <function name="aero/c/CMMDAD">
    <description>PITCH MOMENT DUE TO AILERON DEFLECTION</description>
    <product>
          <property>fcs/aileron-pos-deg</property>
          <table>
            <independentVar lookup="row">aero/alpha-deg</independentVar>
            <independentVar lookup="column">aero/beta-deg</independentVar>
            <tableData>
                                -20	        -10	         -5	         -2	          0	          2	          5	         10	         20
                    -20	  -0.00107	  -0.00084	  -0.00018	  -0.00008	   0.00000	   0.00008	   0.00018	   0.00083	   0.00108
                     -2	   0.00114	   0.00080	   0.00046	   0.00022	   0.00000	  -0.00022	  -0.00046	  -0.00080	  -0.00114
                      8	   0.00041	   0.00063	   0.00052	   0.00012	   0.00000	  -0.00012	  -0.00051	  -0.00063	  -0.00043
                     18	  -0.00213	  -0.00049	   0.00001	   0.00007	   0.00001	  -0.00004	  -0.00001	   0.00048	   0.00211
                     28	  -0.00217	  -0.00162	  -0.00109	  -0.00075	  -0.00001	   0.00072	   0.00105	   0.00159	   0.00218
                     50	  -0.00059	  -0.00092	  -0.00075	  -0.00006	  -0.00006	   0.00000	   0.00081	   0.00087	   0.00059
                     60	  -0.00012	  -0.00061	  -0.00031	  -0.00010	   0.00001	   0.00016	   0.00028	   0.00060	   0.00021
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            </tableData>
          </table>
       </product>
    </function>
    <function name="aero/c/CMMDGE">
    <description>PITCHING MOMENT INCREMENT DUE TO GROUND EFFECT</description>
          <table>
            <independentVar lookup="row">position/h-agl-m</independentVar>
            <independentVar lookup="column">aero/alpha-deg</independentVar>
            <tableData>
                                  0	          2	          4	          8	         10	         15	         20
                      1	  -0.00567	  -0.01587	  -0.02735	  -0.04370	  -0.31374	  -0.11987	  -0.16853
                      2	  -0.00156	  -0.00406	  -0.00674	  -0.01328	  -0.01968	  -0.03956	   0.02856
                      3	  -0.00083	  -0.00233	  -0.00351	  -0.00555	  -0.00886	  -0.01848	  -0.01861
                      8	  -0.00014	  -0.00037	  -0.00045	   0.00094	  -0.00030	  -0.00175	  -0.00370
                     10	  -0.00008	  -0.00023	  -0.00024	   0.00136	   0.00057	  -0.00055	  -0.00273
                     30	   0.00000	   0.00000	   0.00000	   0.00000	   0.00000	   0.00000	   0.00000
            </tableData>
          </table>
    </function>
    <function name="aero/c/CMMDRD">
    <description>PITCH MOMENT DUE TO RUDDER DEFLECTION</description>
    <product>
          <property>fcs/rudder-pos-deg</property>
          <table>
            <independentVar lookup="row">aero/alpha-deg</independentVar>
            <independentVar lookup="column">aero/beta-deg</independentVar>
            <tableData>
                                -20	        -10	         -5	         -2	          0	          2	          5	         10	         20
                    -20	   0.00088	   0.00056	   0.00040	   0.00017	  -0.00001	  -0.00018	  -0.00041	  -0.00056	  -0.00088
                     -2	   0.00098	   0.00048	   0.00026	   0.00010	   0.00000	  -0.00010	  -0.00026	  -0.00048	  -0.00098
                      8	   0.00072	   0.00030	   0.00002	   0.00008	   0.00001	  -0.00007	  -0.00004	  -0.00030	  -0.00072
                     18	   0.00041	   0.00011	   0.00015	   0.00004	   0.00001	  -0.00005	  -0.00012	  -0.00014	  -0.00042
                     28	   0.00002	   0.00009	   0.00003	   0.00000	   0.00001	  -0.00001	  -0.00007	  -0.00011	  -0.00001
                     50	  -0.00002	   0.00007	   0.00001	  -0.00002	  -0.00001	  -0.00004	   0.00005	  -0.00005	   0.00004
                     60	   0.00004	   0.00008	   0.00003	  -0.00007	   0.00005	   0.00005	   0.00003	  -0.00001	   0.00000
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            </tableData>
          </table>
       </product>
    </function>
    <function name="aero/c/CMMFLAPS">
    <description>PITCHING MOMENT INCREMENT DUE TO FLAPS</description>
    <product>
          <property>fcs/flap-pos-deg</property>
          <table>
            <independentVar lookup="row">aero/alpha-deg</independentVar>
            <independentVar lookup="column">aero/beta-deg</independentVar>
            <tableData>
                                -20	        -10	         -5	         -2	          0	          2	          5	         10	         20
                    -20	  -0.00194	  -0.00221	  -0.00201	  -0.00204	  -0.00203	  -0.00204	  -0.00201	  -0.00221	  -0.00193
                     -2	  -0.00146	  -0.00154	  -0.00154	  -0.00156	  -0.00151	  -0.00155	  -0.00153	  -0.00152	  -0.00143
                      8	  -0.00109	  -0.00103	  -0.00069	  -0.00050	  -0.00059	  -0.00050	  -0.00068	  -0.00102	  -0.00111
                     18	  -0.00007	  -0.00005	   0.00020	   0.00020	   0.00027	   0.00021	   0.00022	  -0.00004	  -0.00006
                     28	   0.00027	   0.00034	   0.00050	   0.00036	   0.00033	   0.00039	   0.00051	   0.00037	   0.00026
                     50	  -0.00023	   0.00003	  -0.00002	   0.00043	   0.00031	   0.00049	  -0.00006	   0.00003	  -0.00017
                     60	  -0.00012	  -0.00017	  -0.00002	  -0.00023	  -0.00051	  -0.00024	  -0.00002	  -0.00012	  -0.00012
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            </tableData>
          </table>
       </product>
    </function>
    <function name="aero/c/CMMGEAR">
    <description>PITCHING MOMENT INCREMENT DUE TO GEAR</description>
    <product>
          <property>gear/gear-pos-norm</property>
          <table>
            <independentVar lookup="row">aero/alpha-deg</independentVar>
            <independentVar lookup="column">aero/beta-deg</independentVar>
            <tableData>
                                -20	        -10	         -5	         -2	          0	          2	          5	         10	         20
                    -20	  -0.01061	  -0.01363	  -0.01379	  -0.01520	  -0.01552	  -0.01549	  -0.01343	  -0.01405	  -0.01013
                     -2	   0.00356	   0.00034	  -0.00156	  -0.00252	  -0.00282	  -0.00284	  -0.00232	  -0.00114	   0.00098
                      8	   0.02163	   0.02119	   0.02057	   0.02038	   0.01922	   0.01995	   0.01969	   0.01935	   0.01785
                     18	   0.03636	   0.03653	   0.03626	   0.03627	   0.03650	   0.03605	   0.03593	   0.03598	   0.03557
                     28	   0.03914	   0.03480	   0.03479	   0.03612	   0.03581	   0.03779	   0.03511	   0.03591	   0.03936
                     50	   0.04011	   0.03650	   0.03536	   0.03328	   0.03406	   0.03674	   0.03547	   0.03382	   0.03946
                     60	   0.02056	   0.02823	   0.03504	   0.03165	   0.02550	   0.02895	   0.03382	   0.02682	   0.01793
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            </tableData>
          </table>
       </product>
    </function>
    <function name="aero/c/CMMMN">
    <description>PITCHING MOMENT INCREMENT DUE TO MACH</description>
          <table>
            <independentVar lookup="row">velocities/mach</independentVar>
            <independentVar lookup="column">aero/alpha-deg</independentVar>
            <tableData>
                                -10	         -5	         -2	       0.01	          1	          2	          6	          7	         10
                    0.2	  -0.00707	  -0.00448	  -0.00286	  -0.00056	   0.00061	   0.00199	   0.00675	   0.00664	   0.00999
                    0.4	  -0.00465	  -0.00267	  -0.00184	  -0.00033	   0.00043	   0.00133	   0.00430	   0.00382	   0.00650
                    0.6	   0.00000	   0.00065	   0.00000	   0.00002	  -0.00003	   0.00000	   0.00000	  -0.00091	   0.00003
                    0.8	   0.00618	   0.00633	   0.00294	   0.00041	  -0.00096	  -0.00238	  -0.00578	  -0.00727	  -0.00962
                   0.86	   0.00941	   0.00886	   0.00412	   0.00054	  -0.00142	  -0.00340	  -0.00804	  -0.01015	  -0.01289
                   0.88	   0.01118	   0.00997	   0.00459	   0.00058	  -0.00161	  -0.00387	  -0.00920	  -0.01155	  -0.01447
                   0.91	   0.01432	   0.01207	   0.00544	   0.00059	  -0.00207	  -0.00485	  -0.01189	  -0.01476	  -0.01843
                  0.955	   0.02761	   0.01904	   0.00810	   0.00008	  -0.00442	  -0.00911	  -0.02413	  -0.02870	  -0.03802
                   0.98	   0.05684	   0.03352	   0.01363	  -0.00068	  -0.00849	  -0.01641	  -0.04630	  -0.05383	  -0.07100
                   0.99	   0.08239	   0.04743	   0.01991	   0.00009	  -0.01056	  -0.02095	  -0.06275	  -0.07309	  -0.09642
                    1.4	   0.16025	   0.07897	   0.02303	  -0.01494	  -0.03468	  -0.05523	  -0.14487	  -0.16759	  -0.22852
            </tableData>
          </table>
    </function>
    <function name="aero/c/CMMNWDOOR">
    <description>PITCHING MOMENT INCREMENT DUE TO NOSE DOOR</description>
    <product>
          <property>gear/gear-pos-norm</property>
          <table>
            <independentVar lookup="row">aero/alpha-deg</independentVar>
            <independentVar lookup="column">aero/beta-deg</independentVar>
            <tableData>
                                -20	        -10	         -5	         -2	          0	          2	          5	         10	         20
                    -20	  -0.00752	  -0.00328	  -0.00031	   0.00041	  -0.00030	   0.00142	   0.00260	   0.00131	   0.00144
                     -2	   0.00265	   0.00195	   0.00079	  -0.00026	  -0.00057	  -0.00067	   0.00103	  -0.00128	  -0.00081
                      8	   0.00359	   0.00445	   0.00235	   0.00136	   0.00279	   0.00050	  -0.00466	  -0.00600	  -0.01277
                     18	   0.00904	   0.00482	   0.00352	   0.00052	  -0.00079	  -0.00128	   0.00003	  -0.00556	  -0.01531
                     28	   0.01021	   0.00712	   0.00084	   0.00033	   0.00151	  -0.00143	  -0.00351	  -0.00897	  -0.01225
                     50	   0.01643	   0.00672	   0.00802	  -0.00405	  -0.00085	  -0.00236	  -0.00362	  -0.01101	  -0.01895
                     60	   0.00751	   0.00865	   0.00536	   0.00535	  -0.00174	  -0.00006	   0.00083	  -0.00904	  -0.01879
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            </tableData>
          </table>
       </product>
    </function>
    <function name="aero/c/CMMQ">
    <description>PITCH DAMPING DERIVATIVE</description>
    <product>
          <property>aero/qb</property>
          <table>
            <independentVar lookup="row">aero/alpha-deg</independentVar>
            <independentVar lookup="column">aero/beta-deg</independentVar>
            <tableData>
                                -20	        -10	         -5	         -2	          0	          2	          5	         10	         20
                    -20	  -4.14677	  -4.89710	  -5.29156	  -5.45455	  -5.38469	  -5.45319	  -5.28665	  -4.92648	  -4.15570
                     -2	  -4.81692	  -5.23704	  -5.34014	  -5.37642	  -5.39603	  -5.37720	  -5.34084	  -5.23690	  -4.82530
                      8	  -4.73786	  -5.78679	  -5.72176	  -5.96255	  -5.43225	  -5.96514	  -5.71502	  -5.81899	  -4.73067
                     18	  -4.10590	  -4.84098	  -5.33716	  -5.38911	  -5.41993	  -5.39163	  -5.32640	  -4.83438	  -4.12347
                     28	  -3.11183	  -3.46878	  -3.66623	  -4.05280	  -4.37428	  -4.05909	  -3.67056	  -3.45656	  -3.21397
                     50	  -2.84131	  -1.76043	  -1.99182	  -2.05409	  -3.20992	  -1.98087	  -2.33053	  -1.84061	  -2.82549
                     60	  -3.14801	  -2.62283	  -1.23705	  -1.76847	  -3.74171	  -1.75556	  -1.10059	  -2.56704	  -3.15815
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            </tableData>
          </table>
       </product>
    </function>
    <function name="aero/c/CML1">
    <description>BASE ROLLING MOMENT</description>
          <table>
            <independentVar lookup="row">aero/alpha-deg</independentVar>
            <independentVar lookup="column">aero/beta-deg</independentVar>
            <tableData>
                                -20	        -10	         -5	         -2	          0	          2	          5	         10	         20
                    -20	  -0.06125	  -0.03302	  -0.01722	  -0.00723	   0.00002	   0.00722	   0.01718	   0.03304	   0.06127
                     -2	   0.01094	   0.00601	   0.00302	   0.00122	   0.00000	  -0.00122	  -0.00302	  -0.00601	  -0.01094
                      8	   0.05893	   0.02950	   0.01464	   0.00578	   0.00000	  -0.00579	  -0.01464	  -0.02951	  -0.05899
                     18	   0.08707	   0.04843	   0.02508	   0.01068	   0.00000	  -0.01073	  -0.02510	  -0.04847	  -0.08709
                     28	   0.07883	   0.03438	   0.01611	   0.00662	   0.00000	  -0.00665	  -0.01617	  -0.03447	  -0.07883
                     50	   0.05689	   0.02273	   0.01292	   0.00536	  -0.00007	  -0.00538	  -0.01292	  -0.02278	  -0.05706
                     60	   0.03991	   0.01498	   0.00607	   0.00206	  -0.00003	  -0.00230	  -0.00604	  -0.01514	  -0.03970
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            </tableData>
          </table>
    </function>
    <function name="aero/c/CMLBETADOT">
    <description>ROLL MOMENT DERIVATIVE FOR BETA DOT</description>
    <product>
          <property>aero/betadot-rad_sec-limited</property>
          <table>
            <independentVar lookup="row">aero/alpha-deg</independentVar>
            <independentVar lookup="column">aero/beta-deg</independentVar>
            <tableData>
                                -20	        -10	         -5	         -2	          0	          2	          5	         10	         20
                    -20	   0.13925	   0.17572	   0.17406	   0.20306	   0.21244	   0.20952	   0.18081	   0.21155	   0.14954
                     -2	  -0.02339	  -0.03387	  -0.03451	  -0.03518	  -0.03457	  -0.03562	  -0.03218	  -0.03254	  -0.02148
                      8	  -0.16201	  -0.18914	  -0.18611	  -0.17062	  -0.16723	  -0.17782	  -0.17517	  -0.17379	  -0.14114
                     18	  -0.22005	  -0.22577	  -0.25641	  -0.28308	  -0.30128	  -0.31002	  -0.25750	  -0.31517	  -0.20683
                     28	  -0.23257	  -0.23041	  -0.15631	  -0.17907	  -0.19787	  -0.16857	  -0.17786	  -0.22962	  -0.24042
                     50	  -0.24794	  -0.06725	  -0.12488	  -0.14087	  -0.17338	  -0.13954	  -0.09938	  -0.18186	  -0.23644
                     60	  -0.17942	  -0.09729	  -0.07705	  -0.09978	  -0.03375	  -0.04238	  -0.09795	  -0.07284	  -0.23432
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            </tableData>
          </table>
       </product>
    </function>
    <function name="aero/c/CMLDAD">
    <description>ROLLING MOMENT DUE TO AILERON DEFLECTION</description>
          <table>
            <independentVar lookup="row">aero/alpha-deg</independentVar>
            <independentVar lookup="column">aero/beta-deg</independentVar>
            <tableData>
                                -20	        -10	         -5	         -2	          0	          2	          5	         10	         20
                    -20	  -0.00007	   0.00006	   0.00001	   0.00004	   0.00002	  -0.00003	  -0.00001	  -0.00003	   0.00009
                     -2	   0.00001	   0.00000	   0.00000	   0.00000	   0.00000	   0.00000	   0.00000	   0.00000	  -0.00001
                      8	   0.00000	   0.00015	   0.00003	   0.00000	   0.00000	   0.00000	  -0.00003	  -0.00010	  -0.00004
                     18	  -0.00003	  -0.00001	  -0.00004	   0.00000	   0.00001	  -0.00002	   0.00003	   0.00000	   0.00002
                     28	   0.00003	  -0.00008	   0.00007	   0.00009	   0.00002	  -0.00009	  -0.00006	   0.00002	   0.00004
                     50	  -0.00026	   0.00005	   0.00026	   0.00041	  -0.00004	  -0.00035	  -0.00017	  -0.00008	   0.00015
                     60	  -0.00030	  -0.00070	  -0.00006	  -0.00024	  -0.00001	   0.00013	   0.00015	   0.00060	   0.00052
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            </tableData>
          </table>
    </function>
    <function name="aero/c/CMLDADMN">
    <description>ROLLING MOMENT CHANGE DUE TO MACH DUE TO AILERON DEFLECTION</description>
    <product>
          <property>fcs/aileron-pos-deg</property>
          <table>
            <independentVar lookup="row">velocities/mach</independentVar>
            <independentVar lookup="column">aero/alpha-deg</independentVar>
            <tableData>
                                -10	         -5	         -2	       0.01	          1	          2	          6	          7	         10
                    0.2	   0.00455	   0.00446	   0.00442	   0.00442	   0.00444	   0.00445	   0.00451	   0.00450	   0.00451
                    0.4	   0.00465	   0.00456	   0.00452	   0.00452	   0.00454	   0.00455	   0.00461	   0.00460	   0.00463
                    0.6	   0.00485	   0.00477	   0.00473	   0.00473	   0.00474	   0.00476	   0.00481	   0.00482	   0.00483
                    0.8	   0.00525	   0.00519	   0.00517	   0.00516	   0.00517	   0.00518	   0.00520	   0.00521	   0.00523
                   0.86	   0.00546	   0.00542	   0.00540	   0.00539	   0.00540	   0.00541	   0.00541	   0.00542	   0.00542
                   0.88	   0.00555	   0.00552	   0.00550	   0.00550	   0.00551	   0.00551	   0.00551	   0.00551	   0.00550
                   0.91	   0.00573	   0.00571	   0.00570	   0.00569	   0.00570	   0.00570	   0.00569	   0.00569	   0.00564
                  0.955	   0.00615	   0.00618	   0.00617	   0.00616	   0.00616	   0.00616	   0.00614	   0.00611	   0.00595
                   0.98	   0.00657	   0.00669	   0.00670	   0.00669	   0.00669	   0.00667	   0.00660	   0.00654	   0.00623
                   0.99	   0.00679	   0.00707	   0.00709	   0.00707	   0.00706	   0.00705	   0.00687	   0.00677	   0.00631
                    1.4	   0.00526	   0.00538	   0.00538	   0.00536	   0.00535	   0.00533	   0.00520	   0.00514	   0.00480
            </tableData>
          </table>
       </product>
    </function>
    <function name="aero/c/CMLDRD">
    <description>ROLLING MOMENT DUE TO RUDDER DEFLECTION</description>
          <table>
            <independentVar lookup="row">aero/alpha-deg</independentVar>
            <independentVar lookup="column">aero/beta-deg</independentVar>
            <independentVar lookup="table">fcs/rudder-pos-deg</independentVar>
              <tableData breakPoint="-20">
                              -20	       -10	        -5	        -2	         0	         2	         5	        10	        20
                    -20	  -0.00378	  -0.00701	  -0.00787	  -0.00793	  -0.00800	  -0.00806	  -0.00810	  -0.00819	  -0.00687
                     -2	  -0.00465	  -0.00517	  -0.00516	  -0.00517	  -0.00523	  -0.00525	  -0.00527	  -0.00549	  -0.00550
                      8	  -0.00318	  -0.00334	  -0.00355	  -0.00332	  -0.00343	  -0.00342	  -0.00377	  -0.00359	  -0.00425
                     18	  -0.00205	  -0.00182	  -0.00190	  -0.00176	  -0.00181	  -0.00180	  -0.00187	  -0.00220	  -0.00272
                     28	  -0.00116	  -0.00038	  -0.00003	  -0.00008	  -0.00032	  -0.00018	  -0.00006	  -0.00026	  -0.00140
                     50	   0.00007	  -0.00010	   0.00014	   0.00013	  -0.00010	  -0.00005	   0.00000	  -0.00006	  -0.00047
                     60	   0.00051	   0.00002	  -0.00030	  -0.00036	  -0.00007	   0.00002	   0.00016	  -0.00031	   0.00011
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              </tableData>
              <tableData breakPoint="-12">
                              -20	       -10	        -5	        -2	         0	         2	         5	        10	        20
                    -20	  -0.00284	  -0.00455	  -0.00497	  -0.00485	  -0.00500	  -0.00524	  -0.00506	  -0.00513	  -0.00412
                     -2	  -0.00309	  -0.00332	  -0.00328	  -0.00327	  -0.00329	  -0.00329	  -0.00332	  -0.00342	  -0.00342
                      8	  -0.00233	  -0.00197	  -0.00224	  -0.00210	  -0.00222	  -0.00213	  -0.00237	  -0.00239	  -0.00261
                     18	  -0.00137	  -0.00126	  -0.00123	  -0.00113	  -0.00112	  -0.00113	  -0.00111	  -0.00131	  -0.00157
                     28	  -0.00075	  -0.00020	   0.00011	  -0.00005	  -0.00023	  -0.00020	  -0.00003	   0.00002	  -0.00090
                     50	  -0.00030	   0.00008	   0.00021	   0.00032	   0.00003	  -0.00031	  -0.00024	  -0.00008	  -0.00003
                     60	  -0.00020	  -0.00064	  -0.00008	  -0.00037	  -0.00010	   0.00007	   0.00008	   0.00041	   0.00070
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              </tableData>
              <tableData breakPoint="-4">
                              -20	       -10	        -5	        -2	         0	         2	         5	        10	        20
                    -20	  -0.00126	  -0.00160	  -0.00171	  -0.00168	  -0.00169	  -0.00175	  -0.00173	  -0.00174	  -0.00125
                     -2	  -0.00110	  -0.00115	  -0.00111	  -0.00112	  -0.00112	  -0.00112	  -0.00114	  -0.00115	  -0.00114
                      8	  -0.00082	  -0.00061	  -0.00076	  -0.00074	  -0.00070	  -0.00071	  -0.00083	  -0.00086	  -0.00088
                     18	  -0.00050	  -0.00060	  -0.00046	  -0.00036	  -0.00037	  -0.00039	  -0.00040	  -0.00049	  -0.00049
                     28	  -0.00025	  -0.00013	   0.00004	   0.00005	  -0.00005	  -0.00013	  -0.00006	   0.00003	  -0.00031
                     50	  -0.00028	   0.00007	   0.00022	   0.00024	  -0.00011	  -0.00029	  -0.00020	  -0.00009	   0.00011
                     60	  -0.00026	  -0.00068	  -0.00010	  -0.00033	  -0.00003	   0.00021	   0.00015	   0.00057	   0.00053
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              </tableData>
              <tableData breakPoint="0">
                              -20	       -10	        -5	        -2	         0	         2	         5	        10	        20
                    -20	   0.00000	   0.00000	   0.00000	   0.00000	   0.00000	   0.00000	   0.00000	   0.00000	   0.00000
                     -2	   0.00000	   0.00000	   0.00000	   0.00000	   0.00000	   0.00000	   0.00000	   0.00000	   0.00000
                      8	   0.00000	   0.00000	   0.00000	   0.00000	   0.00000	   0.00000	   0.00000	   0.00000	   0.00000
                     18	   0.00000	   0.00000	   0.00000	   0.00000	   0.00000	   0.00000	   0.00000	   0.00000	   0.00000
                     28	   0.00000	   0.00000	   0.00000	   0.00000	   0.00000	   0.00000	   0.00000	   0.00000	   0.00000
                     50	   0.00000	   0.00000	   0.00000	   0.00000	   0.00000	   0.00000	   0.00000	   0.00000	   0.00000
                     60	   0.00000	   0.00000	   0.00000	   0.00000	   0.00000	   0.00000	   0.00000	   0.00000	   0.00000
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              </tableData>
              <tableData breakPoint="4">
                              -20	       -10	        -5	        -2	         0	         2	         5	        10	        20
                    -20	   0.00127	   0.00177	   0.00172	   0.00176	   0.00173	   0.00167	   0.00169	   0.00163	   0.00129
                     -2	   0.00114	   0.00115	   0.00114	   0.00112	   0.00112	   0.00112	   0.00111	   0.00115	   0.00110
                      8	   0.00083	   0.00085	   0.00084	   0.00070	   0.00072	   0.00074	   0.00074	   0.00060	   0.00077
                     18	   0.00048	   0.00046	   0.00039	   0.00036	   0.00040	   0.00033	   0.00046	   0.00059	   0.00048
                     28	   0.00036	  -0.00010	   0.00006	   0.00013	   0.00011	  -0.00003	  -0.00014	   0.00005	   0.00031
                     50	  -0.00022	   0.00004	   0.00030	   0.00027	  -0.00012	  -0.00034	  -0.00030	  -0.00006	   0.00018
                     60	  -0.00030	  -0.00070	   0.00001	  -0.00027	  -0.00011	   0.00015	   0.00016	   0.00057	   0.00049
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              </tableData>
              <tableData breakPoint="12">
                              -20	       -10	        -5	        -2	         0	         2	         5	        10	        20
                    -20	   0.00415	   0.00516	   0.00504	   0.00524	   0.00505	   0.00486	   0.00496	   0.00454	   0.00287
                     -2	   0.00342	   0.00342	   0.00332	   0.00329	   0.00329	   0.00327	   0.00328	   0.00332	   0.00310
                      8	   0.00250	   0.00237	   0.00237	   0.00211	   0.00222	   0.00209	   0.00222	   0.00194	   0.00228
                     18	   0.00157	   0.00131	   0.00109	   0.00110	   0.00115	   0.00110	   0.00125	   0.00124	   0.00136
                     28	   0.00093	  -0.00008	   0.00003	   0.00020	   0.00027	   0.00001	  -0.00008	   0.00015	   0.00080
                     50	  -0.00008	   0.00005	   0.00034	   0.00041	  -0.00014	  -0.00037	  -0.00015	  -0.00008	   0.00018
                     60	  -0.00034	  -0.00071	  -0.00010	  -0.00018	   0.00001	   0.00015	   0.00016	   0.00058	   0.00049
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              </tableData>
              <tableData breakPoint="20">
                              -20	       -10	        -5	        -2	         0	         2	         5	        10	        20
                    -20	   0.00680	   0.00824	   0.00806	   0.00824	   0.00798	   0.00780	   0.00778	   0.00696	   0.00392
                     -2	   0.00550	   0.00549	   0.00527	   0.00525	   0.00523	   0.00517	   0.00516	   0.00517	   0.00464
                      8	   0.00416	   0.00371	   0.00380	   0.00343	   0.00344	   0.00334	   0.00353	   0.00316	   0.00352
                     18	   0.00266	   0.00202	   0.00182	   0.00177	   0.00172	   0.00171	   0.00192	   0.00195	   0.00204
                     28	   0.00154	   0.00017	   0.00007	   0.00021	   0.00036	   0.00007	  -0.00006	   0.00017	   0.00114
                     50	   0.00014	   0.00005	   0.00039	   0.00034	  -0.00003	  -0.00032	  -0.00026	  -0.00001	   0.00013
                     60	  -0.00043	  -0.00068	  -0.00002	  -0.00022	   0.00014	   0.00030	   0.00028	   0.00063	   0.00037
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              </tableData>
          </table>
    </function>
    <function name="aero/c/CMLDRDMN">
    <description>ROLLING MOMENT CHANGE DUE TO MACH DUE TO RUDDER DEFLECTION</description>
    <product>
          <property>fcs/rudder-pos-deg</property>
          <table>
            <independentVar lookup="row">velocities/mach</independentVar>
            <independentVar lookup="column">aero/alpha-deg</independentVar>
            <tableData>
                                -10	         -5	         -2	       0.01	          1	          2	          6	          7	         10
                    0.2	  -0.00003	  -0.00003	  -0.00003	  -0.00002	  -0.00002	  -0.00002	  -0.00003	  -0.00002	  -0.00002
                    0.4	  -0.00002	  -0.00002	  -0.00002	  -0.00002	  -0.00002	  -0.00001	  -0.00002	  -0.00001	  -0.00001
                    0.6	   0.00000	   0.00000	   0.00000	   0.00000	   0.00000	   0.00000	   0.00000	   0.00000	   0.00000
                    0.8	   0.00004	   0.00004	   0.00003	   0.00003	   0.00003	   0.00003	   0.00004	   0.00003	   0.00003
                   0.86	   0.00006	   0.00006	   0.00005	   0.00005	   0.00004	   0.00004	   0.00006	   0.00004	   0.00004
                   0.88	   0.00007	   0.00006	   0.00006	   0.00005	   0.00005	   0.00005	   0.00006	   0.00005	   0.00004
                   0.91	   0.00008	   0.00007	   0.00007	   0.00006	   0.00006	   0.00006	   0.00007	   0.00006	   0.00006
                  0.955	   0.00010	   0.00009	   0.00009	   0.00008	   0.00008	   0.00008	   0.00008	   0.00008	   0.00009
                   0.98	   0.00012	   0.00012	   0.00012	   0.00011	   0.00010	   0.00011	   0.00011	   0.00011	   0.00013
                   0.99	   0.00016	   0.00015	   0.00015	   0.00014	   0.00013	   0.00015	   0.00014	   0.00014	   0.00016
                    1.4	   0.00001	   0.00002	   0.00003	   0.00004	   0.00004	   0.00005	   0.00004	   0.00003	   0.00004
            </tableData>
          </table>
       </product>
    </function>
    <function name="aero/c/CMLFLAPS">
    <description>ROLLING MOMENT INCREMENT DUE TO FLAPS</description>
    <product>
          <property>fcs/flap-pos-deg</property>
          <table>
            <independentVar lookup="row">aero/alpha-deg</independentVar>
            <independentVar lookup="column">aero/beta-deg</independentVar>
            <tableData>
                                -20	        -10	         -5	         -2	          0	          2	          5	         10	         20
                    -20	  -0.00060	  -0.00037	  -0.00018	  -0.00008	   0.00000	   0.00008	   0.00018	   0.00037	   0.00060
                     -2	  -0.00070	  -0.00032	  -0.00015	  -0.00006	   0.00000	   0.00006	   0.00015	   0.00032	   0.00070
                      8	  -0.00062	  -0.00028	  -0.00012	  -0.00004	   0.00000	   0.00004	   0.00012	   0.00028	   0.00062
                     18	  -0.00002	   0.00020	   0.00010	   0.00004	   0.00000	  -0.00003	  -0.00010	  -0.00020	   0.00002
                     28	  -0.00003	   0.00018	   0.00015	   0.00008	   0.00000	  -0.00008	  -0.00015	  -0.00018	   0.00003
                     50	  -0.00010	  -0.00002	   0.00005	   0.00002	   0.00001	  -0.00002	  -0.00005	   0.00002	   0.00010
                     60	  -0.00007	  -0.00006	  -0.00004	  -0.00002	   0.00000	   0.00001	   0.00003	   0.00005	   0.00006
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            </tableData>
          </table>
       </product>
    </function>
    <function name="aero/c/CMLGEAR">
    <description>ROLLING MOMENT INCREMENT DUE TO GEAR</description>
    <product>
          <property>gear/gear-pos-norm</property>
          <table>
            <independentVar lookup="row">aero/alpha-deg</independentVar>
            <independentVar lookup="column">aero/beta-deg</independentVar>
            <tableData>
                                -20	        -10	         -5	         -2	          0	          2	          5	         10	         20
                    -20	   0.00224	   0.00331	   0.00223	   0.00096	   0.00005	  -0.00095	  -0.00223	  -0.00327	  -0.00218
                     -2	   0.00494	   0.00519	   0.00335	   0.00136	   0.00000	  -0.00135	  -0.00334	  -0.00518	  -0.00488
                      8	   0.00652	   0.00587	   0.00381	   0.00154	   0.00001	  -0.00156	  -0.00379	  -0.00592	  -0.00659
                     18	   0.00705	   0.00582	   0.00341	   0.00134	   0.00001	  -0.00149	  -0.00343	  -0.00580	  -0.00704
                     28	   0.00675	   0.00382	   0.00202	   0.00097	   0.00001	  -0.00095	  -0.00222	  -0.00392	  -0.00672
                     50	   0.00478	   0.00363	   0.00201	   0.00034	  -0.00012	  -0.00041	  -0.00182	  -0.00334	  -0.00499
                     60	   0.00341	   0.00205	   0.00113	   0.00052	   0.00024	  -0.00097	  -0.00116	  -0.00210	  -0.00338
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            </tableData>
          </table>
       </product>
    </function>
    <function name="aero/c/CMLMN">
    <description>ROLLING MOMENT INCREMENT DUE TO MACH</description>
          <table>
            <independentVar lookup="row">velocities/mach</independentVar>
            <independentVar lookup="column">aero/alpha-deg</independentVar>
            <tableData>
                                -10	         -5	         -2	       0.01	          1	          2	          6	          7	         10
                    0.2	   0.00001	   0.00000	   0.00000	   0.00000	   0.00000	   0.00000	   0.00000	   0.00001	  -0.00001
                    0.4	  -0.00001	   0.00000	   0.00000	   0.00000	   0.00000	   0.00000	   0.00000	   0.00001	   0.00001
                    0.6	   0.00000	   0.00000	   0.00000	   0.00000	   0.00000	   0.00000	   0.00000	   0.00000	   0.00001
                    0.8	   0.00000	   0.00000	   0.00000	   0.00000	   0.00000	   0.00000	  -0.00001	   0.00001	   0.00000
                   0.86	   0.00001	   0.00000	   0.00000	   0.00000	   0.00000	   0.00000	   0.00000	   0.00000	   0.00000
                   0.88	   0.00000	   0.00000	   0.00000	   0.00000	   0.00000	   0.00000	   0.00000	   0.00000	   0.00001
                   0.91	   0.00000	   0.00000	   0.00000	   0.00000	   0.00000	   0.00000	   0.00000	  -0.00001	   0.00000
                  0.955	   0.00000	   0.00000	   0.00000	   0.00000	   0.00000	   0.00000	   0.00000	   0.00000	   0.00000
                   0.98	  -0.00001	   0.00000	   0.00000	   0.00000	   0.00000	   0.00000	  -0.00001	  -0.00001	   0.00000
                   0.99	   0.00000	   0.00000	   0.00000	   0.00000	   0.00000	   0.00000	   0.00000	   0.00000	   0.00000
                    1.4	   0.00115	  -0.00002	  -0.00012	  -0.00009	  -0.00005	  -0.00011	  -0.00084	  -0.00108	  -0.00228
            </tableData>
          </table>
    </function>
    <function name="aero/c/CMLNWDOOR">
    <description>ROLLING MOMENT INCREMENT DUE TO NOSE DOOR</description>
    <product>
          <property>gear/gear-pos-norm</property>
          <table>
            <independentVar lookup="row">aero/alpha-deg</independentVar>
            <independentVar lookup="column">aero/beta-deg</independentVar>
            <tableData>
                                -20	        -10	         -5	         -2	          0	          2	          5	         10	         20
                    -20	  -0.00004	   0.00005	  -0.00002	   0.00005	   0.00004	  -0.00002	  -0.00015	  -0.00086	  -0.00215
                     -2	   0.00065	  -0.00015	   0.00009	   0.00024	   0.00016	   0.00011	  -0.00009	  -0.00053	  -0.00241
                      8	   0.00272	   0.00049	  -0.00031	  -0.00063	  -0.00073	  -0.00117	  -0.00245	  -0.00357	  -0.00712
                     18	   0.00061	   0.00009	  -0.00063	  -0.00116	  -0.00170	  -0.00226	  -0.00290	  -0.00407	  -0.00492
                     28	  -0.00024	  -0.00016	  -0.00023	  -0.00052	  -0.00078	  -0.00104	  -0.00146	  -0.00182	  -0.00168
                     50	  -0.00089	   0.00006	   0.00046	  -0.00058	  -0.00096	  -0.00001	  -0.00025	   0.00009	   0.00108
                     60	  -0.00110	  -0.00064	  -0.00017	  -0.00024	   0.00026	   0.00027	   0.00029	   0.00127	   0.00178
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            </tableData>
          </table>
       </product>
    </function>
    <function name="aero/c/CMLP">
    <description>ROLL DAMPING DERIVATIVE</description>
    <product>
          <property>aero/pb</property>
          <table>
            <independentVar lookup="row">aero/alpha-deg</independentVar>
            <independentVar lookup="column">aero/beta-deg</independentVar>
            <tableData>
                                -20	        -10	         -5	         -2	          0	          2	          5	         10	         20
                    -20	  -0.25368	  -0.37697	  -0.40111	  -0.42387	  -0.43536	  -0.42406	  -0.40496	  -0.39290	  -0.28107
                     -2	  -0.45840	  -0.47822	  -0.48266	  -0.48328	  -0.48370	  -0.48349	  -0.48226	  -0.47821	  -0.45943
                      8	  -0.39781	  -0.45062	  -0.46263	  -0.46189	  -0.46392	  -0.46045	  -0.45840	  -0.44795	  -0.37759
                     18	  -0.22690	  -0.31854	  -0.34820	  -0.35354	  -0.35839	  -0.35695	  -0.34126	  -0.33768	  -0.21742
                     28	  -0.16253	  -0.17378	  -0.17979	  -0.17918	  -0.18652	  -0.18046	  -0.18744	  -0.18061	  -0.17261
                     50	  -0.24483	  -0.19570	  -0.24014	  -0.21802	  -0.19018	  -0.21859	  -0.24982	  -0.27076	  -0.21430
                     60	  -0.26584	  -0.24882	  -0.22340	  -0.25110	  -0.22550	  -0.20779	  -0.21974	  -0.24184	  -0.27143
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            </tableData>
          </table>
       </product>
    </function>
    <function name="aero/c/CMLR">
    <description>ROLLING MOMENT DUE TO YAW RATE</description>
    <product>
          <property>aero/rb</property>
          <table>
            <independentVar lookup="row">aero/alpha-deg</independentVar>
            <independentVar lookup="column">aero/beta-deg</independentVar>
            <tableData>
                                -20	        -10	         -5	         -2	          0	          2	          5	         10	         20
                    -20	   0.33001	   0.35307	   0.34297	   0.36036	   0.37003	   0.34284	   0.32955	   0.33253	   0.30599
                     -2	  -0.04748	  -0.05311	  -0.05149	  -0.05093	  -0.05009	  -0.05061	  -0.05106	  -0.05307	  -0.04965
                      8	  -0.29010	  -0.27283	  -0.27306	  -0.26893	  -0.27836	  -0.26582	  -0.26342	  -0.27627	  -0.26023
                     18	  -0.41354	  -0.49707	  -0.46208	  -0.46877	  -0.49667	  -0.46190	  -0.43297	  -0.44309	  -0.43257
                     28	  -0.48311	  -0.53058	  -0.52028	  -0.52709	  -0.55751	  -0.54724	  -0.51615	  -0.52978	  -0.49617
                     50	  -0.39279	  -0.43642	  -0.46756	  -0.43155	  -0.49751	  -0.49198	  -0.41786	  -0.38055	  -0.41260
                     60	  -0.31197	  -0.26404	  -0.41087	  -0.34843	  -0.39883	  -0.38485	  -0.35621	  -0.31995	  -0.28454
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            </tableData>
          </table>
       </product>
    </function>
    <function name="aero/c/CFYB">
    <description>BASE SIDEFORCE</description>
          <table>
            <independentVar lookup="row">aero/alpha-deg</independentVar>
            <independentVar lookup="column">aero/beta-deg</independentVar>
            <independentVar lookup="table">fcs/elevator-pos-deg</independentVar>
              <tableData breakPoint="-30">
                              -20	       -10	        -5	        -2	         0	         2	         5	        10	        20
                    -20	  -0.00843	  -0.00552	  -0.00257	  -0.00090	   0.00066	   0.00137	   0.00287	   0.00563	   0.00852
                     -2	   0.07798	   0.04060	   0.02039	   0.00811	   0.00000	  -0.00811	  -0.02040	  -0.04060	  -0.07796
                      8	   0.04909	   0.02466	   0.00584	   0.00362	   0.00039	  -0.00363	  -0.00608	  -0.02348	  -0.04914
                     18	  -0.01497	  -0.02244	  -0.01335	  -0.00539	  -0.00056	   0.00637	   0.01386	   0.02370	   0.01492
                     28	  -0.07806	  -0.06232	  -0.03554	  -0.01354	   0.00062	   0.01405	   0.03788	   0.06343	   0.07879
                     50	  -0.16905	  -0.11782	  -0.06645	  -0.02767	   0.00477	   0.02807	   0.06823	   0.12340	   0.17139
                     60	  -0.17530	  -0.13478	  -0.07040	  -0.02481	   0.00049	   0.02620	   0.07235	   0.13672	   0.17752
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              </tableData>
              <tableData breakPoint="-20">
                              -20	       -10	        -5	        -2	         0	         2	         5	        10	        20
                    -20	  -0.01264	  -0.00831	  -0.00356	  -0.00186	   0.00060	   0.00219	   0.00393	   0.00849	   0.01278
                     -2	   0.07775	   0.04059	   0.02038	   0.00812	   0.00000	  -0.00812	  -0.02039	  -0.04059	  -0.07775
                      8	   0.05309	   0.02603	   0.00708	   0.00346	   0.00035	  -0.00331	  -0.00695	  -0.02601	  -0.05276
                     18	  -0.01078	  -0.02167	  -0.01187	  -0.00579	   0.00096	   0.00645	   0.01214	   0.02204	   0.01085
                     28	  -0.07398	  -0.06224	  -0.03443	  -0.01343	  -0.00020	   0.01428	   0.03604	   0.06349	   0.07519
                     50	  -0.16634	  -0.12116	  -0.06438	  -0.02506	  -0.00004	   0.02779	   0.06687	   0.12225	   0.16886
                     60	  -0.17518	  -0.13379	  -0.07041	  -0.02530	   0.00685	   0.02674	   0.07321	   0.13580	   0.17731
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              </tableData>
              <tableData breakPoint="-10">
                              -20	       -10	        -5	        -2	         0	         2	         5	        10	        20
                    -20	  -0.01869	  -0.01176	  -0.00519	  -0.00234	   0.00067	   0.00271	   0.00555	   0.01191	   0.01883
                     -2	   0.07672	   0.04024	   0.02026	   0.00807	   0.00000	  -0.00807	  -0.02026	  -0.04024	  -0.07672
                      8	   0.05358	   0.02581	   0.00830	   0.00413	   0.00024	  -0.00404	  -0.00818	  -0.02531	  -0.05317
                     18	  -0.00792	  -0.02071	  -0.01218	  -0.00501	   0.00087	   0.00566	   0.01259	   0.02114	   0.00812
                     28	  -0.06919	  -0.05844	  -0.03365	  -0.01382	   0.00002	   0.01429	   0.03550	   0.06038	   0.07028
                     50	  -0.16445	  -0.11817	  -0.06369	  -0.02507	   0.00012	   0.02766	   0.06600	   0.12062	   0.16675
                     60	  -0.17308	  -0.13332	  -0.07008	  -0.02515	   0.00649	   0.02658	   0.07292	   0.13540	   0.17679
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              </tableData>
              <tableData breakPoint="0">
                              -20	       -10	        -5	        -2	         0	         2	         5	        10	        20
                    -20	  -0.02467	  -0.01548	  -0.00720	  -0.00317	   0.00015	   0.00350	   0.00775	   0.01557	   0.02421
                     -2	   0.07466	   0.03919	   0.01975	   0.00793	   0.00000	  -0.00793	  -0.01974	  -0.03919	  -0.07467
                      8	   0.05258	   0.02372	   0.00909	   0.00457	  -0.00003	  -0.00445	  -0.00929	  -0.02354	  -0.05266
                     18	  -0.00575	  -0.02034	  -0.01221	  -0.00433	   0.00077	   0.00494	   0.01252	   0.02083	   0.00583
                     28	  -0.06427	  -0.05515	  -0.03251	  -0.01300	   0.00014	   0.01427	   0.03458	   0.05746	   0.06591
                     50	  -0.16046	  -0.12156	  -0.06482	  -0.02589	   0.00564	   0.02777	   0.06563	   0.11771	   0.16335
                     60	  -0.17097	  -0.13200	  -0.06992	  -0.02473	   0.00073	   0.02610	   0.07244	   0.13445	   0.17453
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              </tableData>
              <tableData breakPoint="10">
                              -20	       -10	        -5	        -2	         0	         2	         5	        10	        20
                    -20	  -0.03155	  -0.02049	  -0.00913	  -0.00419	   0.00099	   0.00451	   0.00944	   0.02070	   0.03175
                     -2	   0.07166	   0.03765	   0.01921	   0.00772	   0.00000	  -0.00772	  -0.01921	  -0.03765	  -0.07166
                      8	   0.05144	   0.02319	   0.01041	   0.00499	   0.00006	  -0.00481	  -0.01037	  -0.02339	  -0.05139
                     18	  -0.00398	  -0.02011	  -0.01218	  -0.00465	  -0.00042	   0.00516	   0.01255	   0.02045	   0.00413
                     28	  -0.05995	  -0.05468	  -0.03112	  -0.01348	  -0.00008	   0.01395	   0.03284	   0.05675	   0.06115
                     50	  -0.15500	  -0.11227	  -0.06086	  -0.02496	  -0.00067	   0.02737	   0.06282	   0.11600	   0.15707
                     60	  -0.16550	  -0.12904	  -0.06903	  -0.02331	   0.00692	   0.02604	   0.07203	   0.13039	   0.16894
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              </tableData>
              <tableData breakPoint="20">
                              -20	       -10	        -5	        -2	         0	         2	         5	        10	        20
                    -20	  -0.03650	  -0.02377	  -0.01088	  -0.00469	   0.00072	   0.00498	   0.01120	   0.02391	   0.03663
                     -2	   0.06808	   0.03607	   0.01861	   0.00755	   0.00001	  -0.00753	  -0.01860	  -0.03606	  -0.06807
                      8	   0.04976	   0.02273	   0.01149	   0.00556	   0.00024	  -0.00537	  -0.01145	  -0.02286	  -0.04971
                     18	  -0.00344	  -0.01883	  -0.01265	  -0.00438	   0.00054	   0.00492	   0.01270	   0.01933	   0.00364
                     28	  -0.05807	  -0.05412	  -0.03075	  -0.01300	   0.00004	   0.01380	   0.03267	   0.05603	   0.05932
                     50	  -0.14878	  -0.10836	  -0.05958	  -0.02446	  -0.00104	   0.02648	   0.06171	   0.11667	   0.15074
                     60	  -0.15936	  -0.12611	  -0.06737	  -0.02298	   0.00666	   0.02568	   0.07080	   0.12718	   0.16344
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              </tableData>
              <tableData breakPoint="30">
                              -20	       -10	        -5	        -2	         0	         2	         5	        10	        20
                    -20	  -0.03891	  -0.02522	  -0.01241	  -0.00579	   0.00048	   0.00595	   0.01238	   0.02598	   0.03890
                     -2	   0.06526	   0.03464	   0.01801	   0.00746	   0.00000	  -0.00744	  -0.01801	  -0.03466	  -0.06523
                      8	   0.04802	   0.02192	   0.01142	   0.00489	  -0.00003	  -0.00483	  -0.01079	  -0.02154	  -0.04780
                     18	  -0.00357	  -0.01863	  -0.01317	  -0.00438	   0.00025	   0.00492	   0.01342	   0.01902	   0.00386
                     28	  -0.05649	  -0.05330	  -0.03197	  -0.01270	   0.00053	   0.01369	   0.03241	   0.05440	   0.05784
                     50	  -0.14502	  -0.10602	  -0.06072	  -0.02440	   0.00545	   0.02543	   0.06172	   0.10939	   0.14562
                     60	  -0.15345	  -0.12116	  -0.06623	  -0.02236	   0.00101	   0.02526	   0.06912	   0.12400	   0.15782
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              </tableData>
          </table>
    </function>
    <function name="aero/c/CFYFLAPS">
    <description>SIDEFORCE INCREMENT DUE TO FLAPS</description>
    <product>
          <property>fcs/flap-pos-deg</property>
          <table>
            <independentVar lookup="row">aero/alpha-deg</independentVar>
            <independentVar lookup="column">aero/beta-deg</independentVar>
            <tableData>
                                -20	        -10	         -5	         -2	          0	          2	          5	         10	         20
                    -20	   0.00080	   0.00050	   0.00024	   0.00011	  -0.00001	  -0.00011	  -0.00024	  -0.00050	  -0.00079
                     -2	  -0.00036	  -0.00017	  -0.00010	  -0.00004	   0.00000	   0.00005	   0.00010	   0.00017	   0.00037
                      8	  -0.00088	  -0.00056	  -0.00031	  -0.00008	   0.00001	   0.00010	   0.00031	   0.00057	   0.00089
                     18	  -0.00100	  -0.00086	  -0.00047	  -0.00015	  -0.00002	   0.00017	   0.00045	   0.00087	   0.00101
                     28	  -0.00076	  -0.00063	  -0.00031	  -0.00012	   0.00003	   0.00014	   0.00035	   0.00063	   0.00074
                     50	  -0.00038	  -0.00010	  -0.00029	   0.00004	  -0.00009	   0.00006	   0.00035	   0.00016	   0.00041
                     60	  -0.00034	  -0.00032	  -0.00011	  -0.00008	   0.00002	   0.00011	   0.00014	   0.00022	   0.00035
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            </tableData>
          </table>
       </product>
    </function>
    <function name="aero/c/CFYGEAR">
    <description>SIDEFORCE INCREMENT DUE TO GEAR</description>
    <product>
          <property>gear/gear-pos-norm</property>
          <table>
            <independentVar lookup="row">aero/alpha-deg</independentVar>
            <independentVar lookup="column">aero/beta-deg</independentVar>
            <tableData>
                                -20	        -10	         -5	         -2	          0	          2	          5	         10	         20
                    -20	   0.03103	   0.03432	   0.02204	   0.00907	  -0.00072	  -0.00922	  -0.02156	  -0.03400	  -0.03058
                     -2	   0.03657	   0.03674	   0.02414	   0.00974	   0.00001	  -0.00973	  -0.02412	  -0.03673	  -0.03653
                      8	   0.03533	   0.03439	   0.02355	   0.00951	  -0.00005	  -0.00968	  -0.02337	  -0.03462	  -0.03537
                     18	   0.03145	   0.03138	   0.01928	   0.00740	  -0.00060	  -0.00845	  -0.01953	  -0.03164	  -0.03133
                     28	   0.02699	   0.02313	   0.01319	   0.00544	   0.00090	  -0.00629	  -0.01606	  -0.02522	  -0.02870
                     50	   0.01300	   0.01672	   0.00672	   0.00350	  -0.00377	  -0.00324	  -0.00645	  -0.01587	  -0.01212
                     60	   0.00214	   0.01073	   0.00460	   0.00264	   0.00201	  -0.00141	  -0.00750	  -0.01402	  -0.00652
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            </tableData>
          </table>
       </product>
    </function>
    <function name="aero/c/CFYMN">
    <description>SIDEFORCE INCREMENT DUE TO MACH</description>
          <table>
            <independentVar lookup="row">velocities/mach</independentVar>
            <independentVar lookup="column">aero/alpha-deg</independentVar>
            <tableData>
                                -10	         -5	         -2	       0.01	          1	          2	          6	          7	         10
                    0.2	  -0.00010	   0.00001	   0.00000	   0.00000	   0.00000	   0.00001	   0.00011	   0.00000	  -0.00003
                    0.4	  -0.00009	   0.00000	   0.00000	   0.00000	   0.00000	   0.00000	   0.00016	  -0.00001	  -0.00002
                    0.6	   0.00000	   0.00001	   0.00000	   0.00000	   0.00000	   0.00000	   0.00002	   0.00009	  -0.00001
                    0.8	  -0.00002	   0.00000	   0.00000	   0.00000	   0.00000	   0.00000	   0.00005	   0.00007	   0.00001
                   0.86	  -0.00009	   0.00000	   0.00000	   0.00000	   0.00000	   0.00000	   0.00001	   0.00004	   0.00016
                   0.88	  -0.00003	   0.00001	   0.00000	   0.00000	   0.00000	   0.00000	   0.00001	   0.00000	   0.00017
                   0.91	  -0.00002	   0.00000	   0.00000	   0.00000	   0.00000	   0.00000	   0.00001	   0.00006	  -0.00002
                  0.955	  -0.00003	   0.00000	   0.00000	   0.00000	   0.00000	   0.00000	   0.00002	   0.00001	  -0.00008
                   0.98	  -0.00003	  -0.00001	   0.00000	   0.00000	   0.00000	   0.00000	   0.00001	   0.00001	  -0.00004
                   0.99	  -0.00009	  -0.00001	   0.00000	   0.00000	   0.00000	   0.00000	   0.00000	  -0.00002	  -0.00013
                    1.4	   0.02749	   0.00267	   0.00006	   0.00000	  -0.00018	  -0.00072	  -0.01076	  -0.01630	  -0.04335
            </tableData>
          </table>
    </function>
    <function name="aero/c/CFYNWDOOR">
    <description>SIDEFORCE INCREMENT DUE TO NOSE DOOR</description>
    <product>
          <property>gear/gear-pos-norm</property>
          <table>
            <independentVar lookup="row">aero/alpha-deg</independentVar>
            <independentVar lookup="column">aero/beta-deg</independentVar>
            <tableData>
                                -20	        -10	         -5	         -2	          0	          2	          5	         10	         20
                    -20	  -0.00721	  -0.00222	  -0.00142	   0.00022	   0.00094	   0.00132	   0.00176	  -0.00095	  -0.00550
                     -2	  -0.00002	   0.00015	  -0.00054	  -0.00164	  -0.00240	  -0.00325	  -0.00592	  -0.00786	  -0.01697
                      8	  -0.00038	  -0.00028	  -0.00196	  -0.00250	  -0.00238	  -0.00261	  -0.00343	  -0.00933	  -0.01989
                     18	  -0.00017	  -0.00196	  -0.00538	  -0.00707	  -0.00717	  -0.00978	  -0.01503	  -0.01900	  -0.02544
                     28	   0.00040	  -0.00357	  -0.01037	  -0.01190	  -0.01248	  -0.01527	  -0.02087	  -0.02725	  -0.02815
                     50	   0.00128	  -0.00846	  -0.01763	  -0.01751	  -0.02784	  -0.02508	  -0.02662	  -0.03390	  -0.03844
                     60	  -0.00250	  -0.00447	  -0.01499	  -0.02125	  -0.02739	  -0.02422	  -0.03373	  -0.03484	  -0.04244
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            </tableData>
          </table>
       </product>
    </function>
    <function name="aero/c/CFYP">
    <description>SIDE FORCE DUE TO ROLL RATE</description>
    <product>
          <property>aero/pb</property>
          <table>
            <independentVar lookup="row">aero/alpha-deg</independentVar>
            <independentVar lookup="column">aero/beta-deg</independentVar>
            <tableData>
                                -20	        -10	         -5	         -2	          0	          2	          5	         10	         20
                    -20	   0.10617	   0.15899	   0.09462	   0.18693	   0.07901	   0.10763	   0.12936	   0.07876	  -0.09396
                     -2	   0.06805	   0.06634	   0.06094	   0.05854	   0.05844	   0.05819	   0.05869	   0.06225	   0.06256
                      8	   0.06936	   0.07686	   0.06196	   0.07336	   0.07724	   0.07884	   0.07224	   0.06667	   0.08056
                     18	   0.14881	   0.15713	   0.08670	   0.06046	   0.10505	   0.09117	   0.07932	  -0.01124	   0.02750
                     28	   0.15557	   0.05175	   0.08909	   0.04016	   0.05200	   0.05326	   0.03939	   0.09940	   0.15487
                     50	   0.32183	   0.17744	   0.15388	   0.00903	   0.14179	   0.07367	   0.05340	  -0.07233	  -0.04945
                     60	   0.10202	   0.12833	   0.11500	  -0.10066	   0.13437	   0.08989	   0.03048	  -0.09040	   0.04797
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            </tableData>
          </table>
       </product>
    </function>
    <function name="aero/c/CFYR">
    <description>SIDE FORCE DUE TO YAW RATE</description>
    <product>
          <property>aero/rb</property>
          <table>
            <independentVar lookup="row">aero/alpha-deg</independentVar>
            <independentVar lookup="column">aero/beta-deg</independentVar>
            <tableData>
                                -20	        -10	         -5	         -2	          0	          2	          5	         10	         20
                    -20	  -0.11660	  -0.21122	  -0.26251	  -0.22605	  -0.23056	  -0.29385	  -0.21474	  -0.26858	  -0.34781
                     -2	  -0.33609	  -0.33272	  -0.31098	  -0.30776	  -0.30762	  -0.30853	  -0.31000	  -0.32599	  -0.33993
                      8	  -0.34836	  -0.31889	  -0.33911	  -0.27218	  -0.32164	  -0.29031	  -0.27708	  -0.36555	  -0.40192
                     18	  -0.33000	  -0.25727	  -0.23573	  -0.26483	  -0.20745	  -0.21839	  -0.24984	  -0.25423	  -0.40710
                     28	  -0.36985	  -0.32988	  -0.15899	  -0.14375	  -0.19241	  -0.04018	  -0.14847	  -0.24947	  -0.37881
                     50	  -0.23523	  -0.26135	  -0.30370	  -0.05031	  -0.10295	  -0.09135	  -0.28496	  -0.35930	  -0.70856
                     60	  -0.40311	  -0.33849	  -0.15854	  -0.20563	  -0.19490	  -0.21228	  -0.16189	  -0.33011	  -0.53769
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            </tableData>
          </table>
       </product>
    </function>
    <function name="aero/c/CYDAD">
    <description>SIDE FORCE DUE TO AILERON DEFLECTION</description>
    <product>
          <property>fcs/aileron-pos-deg</property>
          <table>
            <independentVar lookup="row">aero/alpha-deg</independentVar>
            <independentVar lookup="column">aero/beta-deg</independentVar>
            <tableData>
                                -20	        -10	         -5	         -2	          0	          2	          5	         10	         20
                    -20	  -0.00102	  -0.00120	  -0.00118	  -0.00112	  -0.00145	  -0.00115	  -0.00118	  -0.00119	  -0.00102
                     -2	  -0.00014	  -0.00012	  -0.00009	  -0.00010	  -0.00011	  -0.00010	  -0.00009	  -0.00012	  -0.00014
                      8	   0.00031	   0.00058	   0.00067	   0.00070	   0.00074	   0.00069	   0.00066	   0.00057	   0.00030
                     18	   0.00113	   0.00127	   0.00140	   0.00150	   0.00151	   0.00151	   0.00140	   0.00128	   0.00112
                     28	   0.00179	   0.00191	   0.00193	   0.00183	   0.00188	   0.00182	   0.00193	   0.00191	   0.00181
                     50	   0.00187	   0.00209	   0.00215	   0.00221	   0.00227	   0.00227	   0.00211	   0.00205	   0.00189
                     60	   0.00145	   0.00179	   0.00187	   0.00209	   0.00201	   0.00197	   0.00188	   0.00180	   0.00148
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            </tableData>
          </table>
       </product>
    </function>
    <function name="aero/c/CYDADMN">
    <description>SIDEFORCE CHANGE DUE TO MACH DUE TO TO AILERON DEFLECTION</description>
    <product>
          <property>fcs/aileron-pos-deg</property>
          <table>
            <independentVar lookup="row">velocities/mach</independentVar>
            <independentVar lookup="column">aero/alpha-deg</independentVar>
            <tableData>
                                -10	         -5	         -2	       0.01	          1	          2	          6	          7	         10
                    0.2	  -0.00058	  -0.00029	  -0.00008	   0.00006	   0.00015	   0.00022	   0.00054	   0.00058	   0.00088
                    0.4	  -0.00060	  -0.00030	  -0.00009	   0.00005	   0.00015	   0.00022	   0.00055	   0.00060	   0.00089
                    0.6	  -0.00064	  -0.00032	  -0.00011	   0.00004	   0.00014	   0.00021	   0.00056	   0.00062	   0.00088
                    0.8	  -0.00070	  -0.00036	  -0.00014	   0.00002	   0.00013	   0.00020	   0.00055	   0.00063	   0.00084
                   0.86	  -0.00074	  -0.00038	  -0.00015	   0.00001	   0.00012	   0.00019	   0.00055	   0.00066	   0.00086
                   0.88	  -0.00075	  -0.00038	  -0.00015	   0.00001	   0.00012	   0.00019	   0.00055	   0.00066	   0.00085
                   0.91	  -0.00075	  -0.00038	  -0.00015	   0.00000	   0.00012	   0.00019	   0.00055	   0.00065	   0.00090
                  0.955	  -0.00075	  -0.00036	  -0.00013	   0.00003	   0.00014	   0.00022	   0.00059	   0.00067	   0.00094
                   0.98	  -0.00071	  -0.00029	  -0.00004	   0.00013	   0.00024	   0.00032	   0.00071	   0.00078	   0.00103
                   0.99	  -0.00069	  -0.00025	   0.00002	   0.00021	   0.00033	   0.00042	   0.00081	   0.00088	   0.00112
                    1.4	  -0.00059	  -0.00017	   0.00010	   0.00027	   0.00036	   0.00044	   0.00076	   0.00083	   0.00098
            </tableData>
          </table>
       </product>
    </function>
    <function name="aero/c/CYDRD">
    <description>SIDE FORCE DUE TO RUDDER DEFLECTION</description>
          <table>
            <independentVar lookup="row">aero/alpha-deg</independentVar>
            <independentVar lookup="column">aero/beta-deg</independentVar>
            <independentVar lookup="table">fcs/rudder-pos-deg</independentVar>
              <tableData breakPoint="-20">
                              -20	       -10	        -5	        -2	         0	         2	         5	        10	        20
                    -20	  -0.01986	  -0.03675	  -0.03886	  -0.04050	  -0.03975	  -0.04125	  -0.04152	  -0.04053	  -0.03666
                     -2	  -0.02921	  -0.03262	  -0.03292	  -0.03351	  -0.03470	  -0.03440	  -0.03472	  -0.03567	  -0.03565
                      8	  -0.02382	  -0.02586	  -0.02617	  -0.02712	  -0.02778	  -0.02823	  -0.02753	  -0.02975	  -0.02940
                     18	  -0.01396	  -0.01917	  -0.01888	  -0.01904	  -0.01713	  -0.02203	  -0.02048	  -0.02109	  -0.02172
                     28	  -0.00866	  -0.00393	  -0.00743	  -0.01044	  -0.00946	  -0.01078	  -0.00971	  -0.00925	  -0.01189
                     50	  -0.00053	   0.00087	  -0.00149	  -0.00088	   0.00099	  -0.00129	  -0.00253	  -0.00324	  -0.00402
                     60	   0.00078	   0.00132	   0.00312	   0.00025	   0.00126	   0.00092	   0.00050	   0.00070	   0.00015
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              </tableData>
              <tableData breakPoint="-12">
                              -20	       -10	        -5	        -2	         0	         2	         5	        10	        20
                    -20	  -0.01424	  -0.02266	  -0.02519	  -0.02510	  -0.02612	  -0.02690	  -0.02615	  -0.02569	  -0.02330
                     -2	  -0.01946	  -0.02095	  -0.02107	  -0.02118	  -0.02180	  -0.02148	  -0.02172	  -0.02218	  -0.02182
                      8	  -0.01552	  -0.01646	  -0.01657	  -0.01721	  -0.01782	  -0.01771	  -0.01778	  -0.01843	  -0.01843
                     18	  -0.00905	  -0.01206	  -0.01259	  -0.01120	  -0.01040	  -0.01314	  -0.01253	  -0.01383	  -0.01309
                     28	  -0.00625	  -0.00142	  -0.00585	  -0.00574	  -0.00620	  -0.00646	  -0.00384	  -0.00576	  -0.00784
                     50	  -0.00172	  -0.00433	  -0.00350	  -0.00364	   0.00035	   0.00114	   0.00003	   0.00059	  -0.00150
                     60	   0.00064	   0.00086	   0.00232	  -0.00007	  -0.00549	   0.00025	  -0.00034	   0.00319	   0.00097
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              </tableData>
              <tableData breakPoint="-4">
                              -20	       -10	        -5	        -2	         0	         2	         5	        10	        20
                    -20	  -0.00545	  -0.00765	  -0.00883	  -0.00886	  -0.00888	  -0.00889	  -0.00910	  -0.00901	  -0.00851
                     -2	  -0.00695	  -0.00731	  -0.00727	  -0.00727	  -0.00743	  -0.00731	  -0.00730	  -0.00742	  -0.00725
                      8	  -0.00556	  -0.00599	  -0.00551	  -0.00569	  -0.00676	  -0.00616	  -0.00640	  -0.00559	  -0.00636
                     18	  -0.00296	  -0.00239	  -0.00412	  -0.00407	  -0.00331	  -0.00467	  -0.00396	  -0.00512	  -0.00377
                     28	  -0.00268	  -0.00069	  -0.00097	  -0.00160	  -0.00142	  -0.00278	  -0.00097	  -0.00197	  -0.00241
                     50	  -0.00134	  -0.00435	  -0.00297	  -0.00303	   0.00152	   0.00147	   0.00080	   0.00020	  -0.00070
                     60	   0.00044	   0.00047	   0.00118	  -0.00084	  -0.00651	  -0.00026	  -0.00067	   0.00348	   0.00059
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              </tableData>
              <tableData breakPoint="0">
                              -20	       -10	        -5	        -2	         0	         2	         5	        10	        20
                    -20	   0.00000	   0.00000	   0.00000	   0.00000	   0.00000	   0.00000	   0.00000	   0.00000	   0.00000
                     -2	   0.00000	   0.00000	   0.00000	   0.00000	   0.00000	   0.00000	   0.00000	   0.00000	   0.00000
                      8	   0.00000	   0.00000	   0.00000	   0.00000	   0.00000	   0.00000	   0.00000	   0.00000	   0.00000
                     18	   0.00000	   0.00000	   0.00000	   0.00000	   0.00000	   0.00000	   0.00000	   0.00000	   0.00000
                     28	   0.00000	   0.00000	   0.00000	   0.00000	   0.00000	   0.00000	   0.00000	   0.00000	   0.00000
                     50	   0.00000	   0.00000	   0.00000	   0.00000	   0.00000	   0.00000	   0.00000	   0.00000	   0.00000
                     60	   0.00000	   0.00000	   0.00000	   0.00000	   0.00000	   0.00000	   0.00000	   0.00000	   0.00000
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              </tableData>
              <tableData breakPoint="4">
                              -20	       -10	        -5	        -2	         0	         2	         5	        10	        20
                    -20	   0.00814	   0.00928	   0.00888	   0.00887	   0.00874	   0.00879	   0.00857	   0.00789	   0.00508
                     -2	   0.00725	   0.00742	   0.00731	   0.00731	   0.00743	   0.00728	   0.00728	   0.00730	   0.00696
                      8	   0.00614	   0.00558	   0.00639	   0.00614	   0.00672	   0.00570	   0.00547	   0.00599	   0.00534
                     18	   0.00379	   0.00558	   0.00409	   0.00427	   0.00446	   0.00395	   0.00409	   0.00258	   0.00292
                     28	   0.00235	   0.00218	   0.00201	   0.00314	   0.00187	   0.00120	   0.00268	   0.00068	   0.00275
                     50	  -0.00104	  -0.00439	  -0.00228	  -0.00260	   0.00151	   0.00188	   0.00150	   0.00061	  -0.00025
                     60	  -0.00083	  -0.00022	  -0.00018	  -0.00051	  -0.00694	  -0.00089	  -0.00157	   0.00294	   0.00048
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              </tableData>
              <tableData breakPoint="12">
                              -20	       -10	        -5	        -2	         0	         2	         5	        10	        20
                    -20	   0.02292	   0.02592	   0.02590	   0.02678	   0.02683	   0.02508	   0.02494	   0.02263	   0.01384
                     -2	   0.02182	   0.02218	   0.02174	   0.02148	   0.02180	   0.02117	   0.02108	   0.02095	   0.01947
                      8	   0.01821	   0.01862	   0.01773	   0.01778	   0.01768	   0.01721	   0.01674	   0.01649	   0.01531
                     18	   0.01292	   0.01414	   0.01252	   0.01279	   0.01203	   0.01163	   0.01250	   0.01229	   0.00902
                     28	   0.00745	   0.00603	   0.00629	   0.00647	   0.00516	   0.00518	   0.00462	   0.00163	   0.00657
                     50	   0.00027	  -0.00455	  -0.00135	  -0.00237	   0.00123	   0.00209	   0.00234	   0.00056	  -0.00014
                     60	  -0.00125	  -0.00125	  -0.00054	  -0.00126	  -0.00601	  -0.00166	  -0.00236	   0.00236	  -0.00076
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              </tableData>
              <tableData breakPoint="20">
                              -20	       -10	        -5	        -2	         0	         2	         5	        10	        20
                    -20	   0.03703	   0.04157	   0.04125	   0.04177	   0.04146	   0.03984	   0.03891	   0.03584	   0.01924
                     -2	   0.03565	   0.03567	   0.03474	   0.03436	   0.03469	   0.03351	   0.03295	   0.03260	   0.02919
                      8	   0.02952	   0.03021	   0.02781	   0.02834	   0.02800	   0.02713	   0.02662	   0.02546	   0.02338
                     18	   0.02130	   0.02270	   0.02000	   0.02041	   0.01885	   0.01835	   0.01926	   0.01815	   0.01344
                     28	   0.01227	   0.01039	   0.00965	   0.00961	   0.00771	   0.00937	   0.00905	   0.00598	   0.00880
                     50	   0.00062	  -0.00388	  -0.00060	  -0.00118	   0.00204	   0.00253	   0.00242	   0.00090	  -0.00033
                     60	  -0.00111	  -0.00050	  -0.00163	  -0.00193	  -0.00491	  -0.00218	  -0.00223	   0.00213	  -0.00150
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              </tableData>
          </table>
    </function>
    <function name="aero/c/CYDRDMN">
    <description>SIDEFORCE CHANGE DUE TO MACH DUE TO TO RUDDER DEFLECTION</description>
    <product>
          <property>fcs/rudder-pos-deg</property>
          <table>
            <independentVar lookup="row">velocities/mach</independentVar>
            <independentVar lookup="column">aero/alpha-deg</independentVar>
            <tableData>
                                -10	         -5	         -2	       0.01	          1	          2	          6	          7	         10
                    0.2	  -0.00013	  -0.00013	  -0.00012	  -0.00011	  -0.00011	  -0.00011	  -0.00007	  -0.00010	  -0.00005
                    0.4	  -0.00009	  -0.00009	  -0.00008	  -0.00008	  -0.00007	  -0.00007	  -0.00005	  -0.00007	  -0.00001
                    0.6	   0.00000	   0.00000	   0.00000	   0.00000	   0.00000	   0.00000	   0.00000	   0.00000	   0.00000
                    0.8	   0.00020	   0.00016	   0.00015	   0.00014	   0.00014	   0.00014	   0.00014	   0.00017	   0.00027
                   0.86	   0.00027	   0.00024	   0.00023	   0.00022	   0.00021	   0.00021	   0.00022	   0.00024	   0.00040
                   0.88	   0.00030	   0.00027	   0.00026	   0.00025	   0.00024	   0.00024	   0.00025	   0.00027	   0.00043
                   0.91	   0.00035	   0.00032	   0.00031	   0.00031	   0.00029	   0.00030	   0.00031	   0.00031	   0.00043
                  0.955	   0.00048	   0.00045	   0.00044	   0.00044	   0.00042	   0.00043	   0.00045	   0.00045	   0.00051
                   0.98	   0.00066	   0.00064	   0.00063	   0.00064	   0.00062	   0.00064	   0.00067	   0.00066	   0.00073
                   0.99	   0.00090	   0.00087	   0.00086	   0.00086	   0.00085	   0.00086	   0.00087	   0.00086	   0.00093
                    1.4	   0.00030	   0.00033	   0.00034	   0.00036	   0.00036	   0.00037	   0.00037	   0.00035	   0.00042
            </tableData>
          </table>
       </product>
    </function>
    <function name="aero/c/CMN1">
    <description>BASE YAWING MOMENT</description>
          <table>
            <independentVar lookup="row">aero/alpha-deg</independentVar>
            <independentVar lookup="column">aero/beta-deg</independentVar>
            <independentVar lookup="table">fcs/elevator-pos-deg</independentVar>
              <tableData breakPoint="-30">
                              -20	       -10	        -5	        -2	         0	         2	         5	        10	        20
                    -20	  -0.04658	  -0.02903	  -0.01557	  -0.00646	   0.00000	   0.00655	   0.01563	   0.02910	   0.04656
                     -2	  -0.02241	  -0.01541	  -0.00824	  -0.00341	   0.00000	   0.00342	   0.00824	   0.01541	   0.02241
                      8	  -0.03707	  -0.02360	  -0.01397	  -0.00585	   0.00000	   0.00577	   0.01393	   0.02354	   0.03692
                     18	  -0.06015	  -0.04457	  -0.02489	  -0.00984	  -0.00041	   0.00993	   0.02489	   0.04499	   0.05994
                     28	  -0.07535	  -0.05363	  -0.02958	  -0.01228	  -0.00019	   0.01211	   0.03079	   0.05318	   0.07521
                     50	  -0.10847	  -0.07922	  -0.04672	  -0.02173	  -0.00056	   0.02056	   0.04658	   0.07928	   0.10789
                     60	  -0.11729	  -0.09049	  -0.04853	  -0.01844	  -0.00032	   0.01853	   0.04834	   0.09005	   0.11672
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              </tableData>
              <tableData breakPoint="-20">
                              -20	       -10	        -5	        -2	         0	         2	         5	        10	        20
                    -20	  -0.04941	  -0.03064	  -0.01640	  -0.00691	  -0.00004	   0.00697	   0.01646	   0.03070	   0.04941
                     -2	  -0.02311	  -0.01575	  -0.00860	  -0.00352	   0.00000	   0.00352	   0.00860	   0.01575	   0.02311
                      8	  -0.03538	  -0.02416	  -0.01375	  -0.00607	  -0.00001	   0.00600	   0.01369	   0.02393	   0.03514
                     18	  -0.05814	  -0.04393	  -0.02413	  -0.01025	   0.00018	   0.01023	   0.02404	   0.04381	   0.05801
                     28	  -0.07323	  -0.05353	  -0.02909	  -0.01182	  -0.00068	   0.01195	   0.02963	   0.05324	   0.07322
                     50	  -0.10692	  -0.08116	  -0.04561	  -0.02103	  -0.00056	   0.02105	   0.04570	   0.07841	   0.10659
                     60	  -0.11785	  -0.09020	  -0.04843	  -0.01862	   0.00027	   0.01883	   0.04871	   0.08980	   0.11688
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              </tableData>
              <tableData breakPoint="-10">
                              -20	       -10	        -5	        -2	         0	         2	         5	        10	        20
                    -20	  -0.05312	  -0.03296	  -0.01746	  -0.00730	  -0.00001	   0.00738	   0.01753	   0.03302	   0.05311
                     -2	  -0.02428	  -0.01634	  -0.00890	  -0.00366	   0.00000	   0.00366	   0.00890	   0.01634	   0.02427
                      8	  -0.03549	  -0.02364	  -0.01345	  -0.00579	  -0.00004	   0.00575	   0.01342	   0.02369	   0.03550
                     18	  -0.05734	  -0.04402	  -0.02425	  -0.01014	   0.00017	   0.01007	   0.02423	   0.04394	   0.05731
                     28	  -0.07103	  -0.05154	  -0.02871	  -0.01201	  -0.00049	   0.01195	   0.02920	   0.05148	   0.07087
                     50	  -0.10620	  -0.07991	  -0.04532	  -0.02108	  -0.00056	   0.02114	   0.04534	   0.07788	   0.10583
                     60	  -0.11717	  -0.09018	  -0.04840	  -0.01862	   0.00021	   0.01881	   0.04871	   0.08959	   0.11659
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              </tableData>
              <tableData breakPoint="0">
                              -20	       -10	        -5	        -2	         0	         2	         5	        10	        20
                    -20	  -0.05664	  -0.03578	  -0.01867	  -0.00778	  -0.00003	   0.00786	   0.01880	   0.03582	   0.05663
                     -2	  -0.02589	  -0.01728	  -0.00940	  -0.00387	   0.00000	   0.00388	   0.00939	   0.01728	   0.02588
                      8	  -0.03650	  -0.02458	  -0.01348	  -0.00565	  -0.00005	   0.00563	   0.01345	   0.02456	   0.03638
                     18	  -0.05694	  -0.04405	  -0.02433	  -0.01010	   0.00015	   0.01005	   0.02423	   0.04401	   0.05685
                     28	  -0.06913	  -0.05024	  -0.02837	  -0.01198	  -0.00043	   0.01212	   0.02919	   0.05036	   0.06926
                     50	  -0.10481	  -0.07975	  -0.04559	  -0.02103	  -0.00021	   0.02032	   0.04509	   0.07688	   0.10473
                     60	  -0.11625	  -0.08947	  -0.04865	  -0.01850	  -0.00032	   0.01863	   0.04857	   0.08919	   0.11584
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              </tableData>
              <tableData breakPoint="10">
                              -20	       -10	        -5	        -2	         0	         2	         5	        10	        20
                    -20	  -0.06031	  -0.03833	  -0.01985	  -0.00835	   0.00002	   0.00840	   0.01992	   0.03839	   0.06032
                     -2	  -0.02768	  -0.01838	  -0.00990	  -0.00410	   0.00000	   0.00410	   0.00989	   0.01838	   0.02768
                      8	  -0.03733	  -0.02501	  -0.01350	  -0.00554	  -0.00004	   0.00550	   0.01348	   0.02483	   0.03730
                     18	  -0.05690	  -0.04447	  -0.02450	  -0.01013	   0.00005	   0.01025	   0.02442	   0.04430	   0.05689
                     28	  -0.06767	  -0.05051	  -0.02819	  -0.01216	  -0.00055	   0.01201	   0.02852	   0.05068	   0.06762
                     50	  -0.10269	  -0.07627	  -0.04407	  -0.02070	  -0.00026	   0.02067	   0.04400	   0.07555	   0.10230
                     60	  -0.11365	  -0.08809	  -0.04805	  -0.01906	   0.00024	   0.01869	   0.04828	   0.08741	   0.11306
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              </tableData>
              <tableData breakPoint="20">
                              -20	       -10	        -5	        -2	         0	         2	         5	        10	        20
                    -20	  -0.06279	  -0.04006	  -0.02074	  -0.00852	   0.00004	   0.00853	   0.02079	   0.04010	   0.06280
                     -2	  -0.02959	  -0.01938	  -0.01031	  -0.00428	   0.00001	   0.00429	   0.01030	   0.01937	   0.02959
                      8	  -0.03843	  -0.02547	  -0.01346	  -0.00554	   0.00003	   0.00549	   0.01347	   0.02520	   0.03836
                     18	  -0.05735	  -0.04417	  -0.02475	  -0.01004	   0.00008	   0.01014	   0.02457	   0.04412	   0.05729
                     28	  -0.06740	  -0.05077	  -0.02822	  -0.01215	  -0.00050	   0.01218	   0.02860	   0.05083	   0.06731
                     50	  -0.09958	  -0.07421	  -0.04344	  -0.02042	  -0.00034	   0.02017	   0.04344	   0.07582	   0.09909
                     60	  -0.11097	  -0.08650	  -0.04723	  -0.01896	   0.00017	   0.01857	   0.04766	   0.08581	   0.11046
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              </tableData>
              <tableData breakPoint="30">
                              -20	       -10	        -5	        -2	         0	         2	         5	        10	        20
                    -20	  -0.06404	  -0.04108	  -0.02147	  -0.00899	  -0.00006	   0.00909	   0.02138	   0.04143	   0.06411
                     -2	  -0.03106	  -0.02017	  -0.01082	  -0.00437	   0.00000	   0.00438	   0.01082	   0.02016	   0.03107
                      8	  -0.03945	  -0.02571	  -0.01362	  -0.00566	  -0.00010	   0.00556	   0.01371	   0.02564	   0.03941
                     18	  -0.05767	  -0.04458	  -0.02509	  -0.01021	   0.00004	   0.01032	   0.02490	   0.04439	   0.05764
                     28	  -0.06665	  -0.05049	  -0.02934	  -0.01216	  -0.00029	   0.01224	   0.02883	   0.05063	   0.06664
                     50	  -0.09780	  -0.07315	  -0.04371	  -0.02014	  -0.00034	   0.01905	   0.04337	   0.07267	   0.09606
                     60	  -0.10806	  -0.08456	  -0.04663	  -0.01872	  -0.00031	   0.01837	   0.04685	   0.08437	   0.10770
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              </tableData>
          </table>
    </function>
    <function name="aero/c/CMNBETADOT">
    <description>YAW MOMENT DERIVATIVE FOR BETADOT</description>
    <product>
          <property>aero/betadot-rad_sec-limited</property>
          <table>
            <independentVar lookup="row">aero/alpha-deg</independentVar>
            <tableData>
                    -20		   0.23990
                    -10		   0.12410
                      0		   0.11530
                     10		   0.19089
                     20		   0.30735
                     30		   0.32523
                     55		   0.62756
                     60		   0.52467
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            </tableData>
          </table>
       </product>
    </function>
    <function name="aero/c/CMNDAD">
    <description>YAWING MOMENT DUE TO AILERON DEFLECTION</description>
          <table>
            <independentVar lookup="row">aero/alpha-deg</independentVar>
            <independentVar lookup="column">aero/beta-deg</independentVar>
            <independentVar lookup="table">fcs/aileron-pos-deg</independentVar>
              <tableData breakPoint="-20">
                              -20	       -10	        -5	        -2	         0	         2	         5	        10	        20
                    -20	   0.00930	   0.01234	   0.01335	   0.01216	   0.01090	   0.00978	   0.00785	   0.00429	   0.00211
                     -2	  -0.00093	   0.00079	   0.00156	   0.00197	   0.00209	   0.00237	   0.00249	   0.00262	   0.00301
                      8	  -0.00560	  -0.00544	  -0.00533	  -0.00446	  -0.00423	  -0.00397	  -0.00411	  -0.00425	  -0.00299
                     18	   0.00002	  -0.00143	  -0.00385	  -0.00460	  -0.00649	  -0.00716	  -0.00805	  -0.00814	  -0.00377
                     28	   0.00275	  -0.00004	   0.00195	  -0.00051	   0.00150	   0.00106	   0.00042	   0.00314	   0.00794
                     50	   0.00806	   0.00523	   0.00618	   0.00693	   0.00309	   0.00120	   0.00543	   0.01056	   0.01065
                     60	   0.01039	   0.00778	   0.00660	   0.00535	   0.00611	   0.00545	   0.00358	   0.00317	   0.00635
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              </tableData>
              <tableData breakPoint="-12">
                              -20	       -10	        -5	        -2	         0	         2	         5	        10	        20
                    -20	   0.00522	   0.00749	   0.00839	   0.00861	   0.00746	   0.00721	   0.00525	   0.00249	   0.00064
                     -2	  -0.00003	   0.00077	   0.00111	   0.00128	   0.00133	   0.00139	   0.00150	   0.00154	   0.00130
                      8	  -0.00327	  -0.00292	  -0.00325	  -0.00267	  -0.00248	  -0.00234	  -0.00256	  -0.00298	  -0.00210
                     18	   0.00108	  -0.00027	  -0.00240	  -0.00351	  -0.00472	  -0.00493	  -0.00518	  -0.00454	  -0.00120
                     28	   0.00211	   0.00166	   0.00268	   0.00165	   0.00240	   0.00308	   0.00260	   0.00505	   0.00558
                     50	   0.00631	   0.00510	   0.00442	   0.00498	   0.00189	   0.00201	   0.00563	   0.00625	   0.00573
                     60	   0.00666	   0.00526	   0.00457	   0.00429	   0.00421	   0.00454	   0.00307	   0.00329	   0.00558
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              </tableData>
              <tableData breakPoint="-4">
                              -20	       -10	        -5	        -2	         0	         2	         5	        10	        20
                    -20	   0.00066	   0.00237	   0.00264	   0.00290	   0.00288	   0.00302	   0.00261	   0.00159	   0.00029
                     -2	   0.00036	   0.00037	   0.00043	   0.00045	   0.00045	   0.00048	   0.00045	   0.00045	   0.00032
                      8	  -0.00095	  -0.00065	  -0.00098	  -0.00086	  -0.00085	  -0.00079	  -0.00084	  -0.00116	  -0.00061
                     18	   0.00048	  -0.00099	  -0.00153	  -0.00158	  -0.00192	  -0.00149	  -0.00166	  -0.00103	   0.00057
                     28	   0.00133	   0.00046	   0.00153	   0.00102	   0.00187	   0.00176	   0.00129	   0.00180	   0.00184
                     50	   0.00325	   0.00157	   0.00304	   0.00148	  -0.00098	   0.00070	   0.00217	   0.00254	   0.00310
                     60	   0.00246	   0.00217	   0.00200	   0.00106	   0.00202	   0.00203	   0.00137	   0.00100	   0.00154
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              </tableData>
              <tableData breakPoint="0">
                              -20	       -10	        -5	        -2	         0	         2	         5	        10	        20
                    -20	   0.00000	   0.00000	   0.00000	   0.00000	   0.00000	   0.00000	   0.00000	   0.00000	   0.00000
                     -2	   0.00000	   0.00000	   0.00000	   0.00000	   0.00000	   0.00000	   0.00000	   0.00000	   0.00000
                      8	   0.00000	   0.00000	   0.00000	   0.00000	   0.00000	   0.00000	   0.00000	   0.00000	   0.00000
                     18	   0.00000	   0.00000	   0.00000	   0.00000	   0.00000	   0.00000	   0.00000	   0.00000	   0.00000
                     28	   0.00000	   0.00000	   0.00000	   0.00000	   0.00000	   0.00000	   0.00000	   0.00000	   0.00000
                     50	   0.00000	   0.00000	   0.00000	   0.00000	   0.00000	   0.00000	   0.00000	   0.00000	   0.00000
                     60	   0.00000	   0.00000	   0.00000	   0.00000	   0.00000	   0.00000	   0.00000	   0.00000	   0.00000
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              </tableData>
              <tableData breakPoint="4">
                              -20	       -10	        -5	        -2	         0	         2	         5	        10	        20
                    -20	  -0.00018	  -0.00152	  -0.00264	  -0.00308	  -0.00290	  -0.00290	  -0.00259	  -0.00231	  -0.00051
                     -2	  -0.00033	  -0.00045	  -0.00044	  -0.00049	  -0.00045	  -0.00046	  -0.00042	  -0.00037	  -0.00037
                      8	   0.00071	   0.00118	   0.00083	   0.00079	   0.00086	   0.00096	   0.00098	   0.00065	   0.00106
                     18	  -0.00057	   0.00093	   0.00168	   0.00170	   0.00158	   0.00165	   0.00150	   0.00079	  -0.00045
                     28	  -0.00195	  -0.00192	  -0.00195	  -0.00193	  -0.00137	  -0.00114	  -0.00189	  -0.00059	  -0.00176
                     50	  -0.00234	  -0.00311	  -0.00162	  -0.00010	   0.00014	  -0.00093	  -0.00234	  -0.00115	  -0.00274
                     60	  -0.00144	  -0.00141	  -0.00106	  -0.00248	  -0.00036	  -0.00145	  -0.00156	  -0.00289	  -0.00257
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              </tableData>
              <tableData breakPoint="12">
                              -20	       -10	        -5	        -2	         0	         2	         5	        10	        20
                    -20	  -0.00052	  -0.00243	  -0.00523	  -0.00726	  -0.00749	  -0.00862	  -0.00835	  -0.00744	  -0.00509
                     -2	  -0.00129	  -0.00154	  -0.00151	  -0.00140	  -0.00132	  -0.00128	  -0.00108	  -0.00077	   0.00004
                      8	   0.00215	   0.00301	   0.00253	   0.00232	   0.00254	   0.00267	   0.00323	   0.00290	   0.00337
                     18	   0.00127	   0.00438	   0.00524	   0.00511	   0.00430	   0.00366	   0.00240	   0.00014	  -0.00106
                     28	  -0.00564	  -0.00559	  -0.00319	  -0.00359	  -0.00216	  -0.00171	  -0.00371	  -0.00176	  -0.00257
                     50	  -0.00548	  -0.00431	  -0.00519	  -0.00125	  -0.00309	  -0.00591	  -0.00397	  -0.00528	  -0.00552
                     60	  -0.00548	  -0.00334	  -0.00216	  -0.00448	  -0.00417	  -0.00430	  -0.00427	  -0.00616	  -0.00678
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              </tableData>
              <tableData breakPoint="20">
                              -20	       -10	        -5	        -2	         0	         2	         5	        10	        20
                    -20	  -0.00206	  -0.00427	  -0.00790	  -0.00982	  -0.01087	  -0.01228	  -0.01331	  -0.01222	  -0.00906
                     -2	  -0.00316	  -0.00265	  -0.00250	  -0.00235	  -0.00208	  -0.00195	  -0.00156	  -0.00079	   0.00097
                      8	   0.00318	   0.00438	   0.00428	   0.00397	   0.00428	   0.00443	   0.00524	   0.00552	   0.00561
                     18	   0.00407	   0.00831	   0.00815	   0.00742	   0.00637	   0.00491	   0.00366	   0.00157	   0.00021
                     28	  -0.00817	  -0.00395	  -0.00147	  -0.00170	  -0.00059	  -0.00004	  -0.00253	  -0.00067	  -0.00233
                     50	  -0.00958	  -0.00915	  -0.00534	  -0.00071	  -0.00375	  -0.00762	  -0.00491	  -0.00731	  -0.00727
                     60	  -0.00598	  -0.00301	  -0.00280	  -0.00546	  -0.00559	  -0.00568	  -0.00644	  -0.00853	  -0.00973
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              </tableData>
          </table>
    </function>
    <function name="aero/c/CMNDADMN">
    <description>YAWING MOMENT CHANGE DUE TO MACH DUE TO AILERON DEFLECTION</description>
    <product>
          <property>fcs/aileron-pos-deg</property>
          <table>
            <independentVar lookup="row">velocities/mach</independentVar>
            <independentVar lookup="column">aero/alpha-deg</independentVar>
            <tableData>
                                -10	         -5	         -2	       0.01	          1	          2	          6	          7	         10
                    0.2	  -0.00040	  -0.00021	  -0.00012	  -0.00005	  -0.00003	   0.00000	   0.00012	   0.00017	   0.00024
                    0.4	  -0.00041	  -0.00021	  -0.00011	  -0.00005	  -0.00003	   0.00000	   0.00012	   0.00018	   0.00024
                    0.6	  -0.00041	  -0.00021	  -0.00011	  -0.00004	  -0.00002	   0.00001	   0.00014	   0.00019	   0.00027
                    0.8	  -0.00044	  -0.00022	  -0.00010	  -0.00002	   0.00000	   0.00004	   0.00019	   0.00023	   0.00033
                   0.86	  -0.00044	  -0.00022	  -0.00009	  -0.00001	   0.00001	   0.00006	   0.00022	   0.00025	   0.00037
                   0.88	  -0.00045	  -0.00023	  -0.00009	   0.00000	   0.00002	   0.00007	   0.00023	   0.00027	   0.00039
                   0.91	  -0.00047	  -0.00024	  -0.00009	   0.00000	   0.00003	   0.00008	   0.00025	   0.00029	   0.00041
                  0.955	  -0.00052	  -0.00027	  -0.00010	   0.00000	   0.00003	   0.00010	   0.00029	   0.00035	   0.00046
                   0.98	  -0.00059	  -0.00034	  -0.00015	  -0.00004	   0.00000	   0.00008	   0.00028	   0.00034	   0.00047
                   0.99	  -0.00064	  -0.00038	  -0.00019	  -0.00007	  -0.00002	   0.00006	   0.00027	   0.00033	   0.00046
                    1.4	   0.00029	   0.00004	  -0.00012	  -0.00022	  -0.00027	  -0.00032	  -0.00050	  -0.00054	  -0.00061
            </tableData>
          </table>
       </product>
    </function>
    <function name="aero/c/CMNDRD">
    <description>YAWING MOMENT DUE TO RUDDER DEFLECTION</description>
          <table>
            <independentVar lookup="row">aero/alpha-deg</independentVar>
            <independentVar lookup="column">aero/beta-deg</independentVar>
            <independentVar lookup="table">fcs/rudder-pos-deg</independentVar>
              <tableData breakPoint="-20">
                              -20	       -10	        -5	        -2	         0	         2	         5	        10	        20
                    -20	  -0.27560	  -0.47800	  -0.51380	  -0.53080	  -0.53140	  -0.53480	  -0.54020	  -0.53100	  -0.47080
                     -2	  -0.37960	  -0.42640	  -0.42900	  -0.43320	  -0.43360	  -0.44220	  -0.44800	  -0.46000	  -0.45060
                      8	  -0.31120	  -0.34700	  -0.34560	  -0.34260	  -0.34680	  -0.35180	  -0.37140	  -0.38160	  -0.37020
                     18	  -0.18760	  -0.25320	  -0.24440	  -0.24780	  -0.23040	  -0.25640	  -0.26240	  -0.27580	  -0.27860
                     28	  -0.11260	  -0.05840	  -0.08560	  -0.11540	  -0.13120	  -0.12340	  -0.11080	  -0.11660	  -0.15500
                     50	  -0.00240	  -0.00020	  -0.02080	  -0.01600	  -0.00880	  -0.01400	  -0.03240	  -0.02980	  -0.04200
                     60	   0.02140	   0.02020	   0.03620	   0.03280	   0.02040	   0.01600	   0.01560	   0.00860	   0.00320
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              </tableData>
              <tableData breakPoint="-12">
                              -20	       -10	        -5	        -2	         0	         2	         5	        10	        20
                    -20	  -0.19400	  -0.30760	  -0.33060	  -0.33660	  -0.33740	  -0.33760	  -0.34080	  -0.32900	  -0.30040
                     -2	  -0.25120	  -0.27340	  -0.27340	  -0.27480	  -0.27220	  -0.27820	  -0.28140	  -0.28680	  -0.27640
                      8	  -0.20380	  -0.22100	  -0.22020	  -0.21880	  -0.22200	  -0.22020	  -0.23440	  -0.23280	  -0.23000
                     18	  -0.12240	  -0.15720	  -0.15860	  -0.15400	  -0.15060	  -0.15660	  -0.16200	  -0.17820	  -0.16860
                     28	  -0.07800	  -0.02640	  -0.07780	  -0.07140	  -0.08780	  -0.07580	  -0.04460	  -0.06840	  -0.10360
                     50	  -0.01040	  -0.02060	  -0.03460	  -0.02280	   0.00720	  -0.00580	  -0.00480	   0.00760	  -0.02300
                     60	   0.00640	   0.00880	   0.01980	   0.02660	   0.00720	   0.00940	   0.00860	   0.02500	   0.01760
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              </tableData>
              <tableData breakPoint="-4">
                              -20	       -10	        -5	        -2	         0	         2	         5	        10	        20
                    -20	  -0.07500	  -0.10760	  -0.11480	  -0.11380	  -0.11660	  -0.11460	  -0.11780	  -0.11580	  -0.10600
                     -2	  -0.08900	  -0.09520	  -0.09340	  -0.09360	  -0.09240	  -0.09440	  -0.09660	  -0.09660	  -0.09220
                      8	  -0.07300	  -0.07960	  -0.07540	  -0.07440	  -0.07640	  -0.07540	  -0.08220	  -0.07200	  -0.07780
                     18	  -0.04100	  -0.04140	  -0.05360	  -0.05280	  -0.05160	  -0.05380	  -0.05260	  -0.06740	  -0.05020
                     28	  -0.03080	  -0.00700	  -0.01260	  -0.02140	  -0.02420	  -0.02900	  -0.01680	  -0.02340	  -0.03340
                     50	  -0.00700	  -0.02020	  -0.02700	  -0.01600	   0.01460	  -0.00120	   0.00480	   0.00800	  -0.00840
                     60	  -0.00260	  -0.00020	   0.00540	   0.01700	  -0.00840	   0.00160	   0.00140	   0.02820	   0.01200
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              </tableData>
              <tableData breakPoint="0">
                              -20	       -10	        -5	        -2	         0	         2	         5	        10	        20
                    -20	   0.00000	   0.00000	   0.00000	   0.00000	   0.00000	   0.00000	   0.00000	   0.00000	   0.00000
                     -2	   0.00000	   0.00000	   0.00000	   0.00000	   0.00000	   0.00000	   0.00000	   0.00000	   0.00000
                      8	   0.00000	   0.00000	   0.00000	   0.00000	   0.00000	   0.00000	   0.00000	   0.00000	   0.00000
                     18	   0.00000	   0.00000	   0.00000	   0.00000	   0.00000	   0.00000	   0.00000	   0.00000	   0.00000
                     28	   0.00000	   0.00000	   0.00000	   0.00000	   0.00000	   0.00000	   0.00000	   0.00000	   0.00000
                     50	   0.00000	   0.00000	   0.00000	   0.00000	   0.00000	   0.00000	   0.00000	   0.00000	   0.00000
                     60	   0.00000	   0.00000	   0.00000	   0.00000	   0.00000	   0.00000	   0.00000	   0.00000	   0.00000
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              </tableData>
              <tableData breakPoint="4">
                              -20	       -10	        -5	        -2	         0	         2	         5	        10	        20
                    -20	   0.10400	   0.11440	   0.11700	   0.11540	   0.11560	   0.11420	   0.11340	   0.10620	   0.07240
                     -2	   0.09220	   0.09660	   0.09620	   0.09460	   0.09220	   0.09380	   0.09300	   0.09520	   0.08920
                      8	   0.07540	   0.07180	   0.08220	   0.07540	   0.07540	   0.07440	   0.07300	   0.07940	   0.07060
                     18	   0.05040	   0.07160	   0.05280	   0.05040	   0.05760	   0.05180	   0.05340	   0.04320	   0.04020
                     28	   0.03680	   0.02680	   0.03160	   0.03280	   0.02640	   0.02060	   0.04000	   0.00780	   0.03440
                     50	  -0.00260	  -0.01740	  -0.01780	  -0.01040	   0.02060	   0.00240	   0.01380	   0.01300	  -0.00400
                     60	  -0.01240	  -0.00720	  -0.01120	  -0.00500	  -0.02560	  -0.00720	  -0.00920	   0.01920	   0.00300
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              </tableData>
              <tableData breakPoint="12">
                              -20	       -10	        -5	        -2	         0	         2	         5	        10	        20
                    -20	   0.29780	   0.32740	   0.34020	   0.33820	   0.33640	   0.33580	   0.32960	   0.30780	   0.19120
                     -2	   0.27640	   0.28680	   0.28120	   0.27840	   0.27200	   0.27500	   0.27320	   0.27340	   0.25160
                      8	   0.22740	   0.23460	   0.23480	   0.22020	   0.21820	   0.21720	   0.21900	   0.22200	   0.20140
                     18	   0.16880	   0.18100	   0.16100	   0.15300	   0.15860	   0.15280	   0.15840	   0.16040	   0.12140
                     28	   0.10260	   0.07340	   0.07380	   0.07640	   0.07160	   0.06980	   0.08120	   0.02680	   0.08360
                     50	   0.01500	  -0.01520	  -0.00680	  -0.00600	   0.02140	   0.00540	   0.02320	   0.01480	  -0.00180
                     60	  -0.01900	  -0.01360	  -0.02060	  -0.01440	  -0.03020	  -0.01700	  -0.02080	   0.01180	  -0.00780
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              </tableData>
              <tableData breakPoint="20">
                              -20	       -10	        -5	        -2	         0	         2	         5	        10	        20
                    -20	   0.47900	   0.52920	   0.54040	   0.53560	   0.53080	   0.52920	   0.51180	   0.48080	   0.26780
                     -2	   0.45060	   0.46000	   0.44780	   0.44320	   0.43260	   0.43340	   0.42900	   0.42600	   0.37920
                      8	   0.37100	   0.38000	   0.37300	   0.35180	   0.34260	   0.34400	   0.34820	   0.34540	   0.30860
                     18	   0.27620	   0.28800	   0.25660	   0.24360	   0.24440	   0.24200	   0.24720	   0.24940	   0.18000
                     28	   0.16560	   0.12920	   0.11600	   0.11620	   0.10880	   0.11780	   0.12080	   0.07020	   0.11680
                     50	   0.01760	  -0.00380	   0.00300	   0.00420	   0.01140	   0.00960	   0.02520	   0.01720	  -0.00400
                     60	  -0.01760	  -0.01080	  -0.03160	  -0.02240	  -0.01220	  -0.02540	  -0.02280	   0.00100	  -0.02200
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              </tableData>
          </table>
    </function>
    <function name="aero/c/CMNDRDMN">
    <description>YAWING MOMENT CHANGE DUE TO MACH DUE TO RUDDER DEFLECTION</description>
    <product>
          <property>fcs/rudder-pos-deg</property>
          <table>
            <independentVar lookup="row">velocities/mach</independentVar>
            <independentVar lookup="column">aero/alpha-deg</independentVar>
            <tableData>
                                -10	         -5	         -2	       0.01	          1	          2	          6	          7	         10
                    0.2	   0.00010	   0.00010	   0.00008	   0.00008	   0.00008	   0.00007	   0.00010	   0.00008	   0.00007
                    0.4	   0.00007	   0.00007	   0.00005	   0.00005	   0.00005	   0.00005	   0.00006	   0.00005	   0.00005
                    0.6	   0.00000	   0.00000	   0.00000	   0.00000	   0.00000	   0.00000	   0.00000	   0.00000	   0.00000
                    0.8	  -0.00014	  -0.00012	  -0.00011	  -0.00009	  -0.00009	  -0.00008	  -0.00012	  -0.00010	  -0.00008
                   0.86	  -0.00020	  -0.00018	  -0.00016	  -0.00014	  -0.00013	  -0.00012	  -0.00017	  -0.00015	  -0.00013
                   0.88	  -0.00023	  -0.00020	  -0.00018	  -0.00016	  -0.00015	  -0.00014	  -0.00019	  -0.00018	  -0.00015
                   0.91	  -0.00027	  -0.00023	  -0.00021	  -0.00019	  -0.00018	  -0.00018	  -0.00021	  -0.00022	  -0.00020
                  0.955	  -0.00036	  -0.00032	  -0.00030	  -0.00027	  -0.00023	  -0.00029	  -0.00029	  -0.00031	  -0.00033
                   0.98	  -0.00049	  -0.00045	  -0.00044	  -0.00039	  -0.00036	  -0.00046	  -0.00048	  -0.00049	  -0.00054
                   0.99	  -0.00066	  -0.00061	  -0.00060	  -0.00055	  -0.00054	  -0.00064	  -0.00065	  -0.00069	  -0.00072
                    1.4	  -0.00031	  -0.00035	  -0.00039	  -0.00037	  -0.00037	  -0.00041	  -0.00034	  -0.00033	  -0.00030
            </tableData>
          </table>
       </product>
    </function>
    <function name="aero/c/CMNFLAPS">
    <description>YAWING MOMENT INCREMENT DUE TO FLAPS</description>
    <product>
          <property>fcs/flap-pos-deg</property>
          <table>
            <independentVar lookup="row">aero/alpha-deg</independentVar>
            <independentVar lookup="column">aero/beta-deg</independentVar>
            <tableData>
                                -20	        -10	         -5	         -2	          0	          2	          5	         10	         20
                    -20	   0.00019	   0.00016	   0.00008	   0.00004	   0.00000	  -0.00004	  -0.00008	  -0.00016	  -0.00019
                     -2	  -0.00003	   0.00002	  -0.00001	  -0.00001	   0.00000	   0.00000	   0.00001	  -0.00001	   0.00003
                      8	  -0.00016	  -0.00015	  -0.00010	   0.00000	   0.00000	   0.00000	   0.00010	   0.00016	   0.00016
                     18	  -0.00004	  -0.00014	  -0.00011	  -0.00002	  -0.00001	   0.00002	   0.00008	   0.00014	   0.00004
                     28	   0.00011	  -0.00003	   0.00001	   0.00001	   0.00002	  -0.00001	  -0.00001	   0.00002	  -0.00012
                     50	   0.00008	   0.00012	  -0.00007	   0.00011	  -0.00003	  -0.00003	   0.00009	  -0.00008	  -0.00007
                     60	   0.00004	  -0.00006	  -0.00002	  -0.00004	   0.00001	   0.00002	   0.00003	   0.00003	  -0.00002
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            </tableData>
          </table>
       </product>
    </function>
    <function name="aero/c/CMNGEAR">
    <description>YAWING MOMENT INCREMENT DUE TO GEAR</description>
    <product>
          <property>gear/gear-pos-norm</property>
          <table>
            <independentVar lookup="row">aero/alpha-deg</independentVar>
            <independentVar lookup="column">aero/beta-deg</independentVar>
            <tableData>
                                -20	        -10	         -5	         -2	          0	          2	          5	         10	         20
                    -20	  -0.00374	  -0.00409	  -0.00399	  -0.00163	  -0.00023	   0.00144	   0.00397	   0.00430	   0.00389
                     -2	  -0.00474	  -0.00486	  -0.00459	  -0.00186	   0.00000	   0.00185	   0.00458	   0.00485	   0.00473
                      8	  -0.00412	  -0.00458	  -0.00447	  -0.00172	   0.00003	   0.00180	   0.00452	   0.00466	   0.00432
                     18	  -0.00294	  -0.00385	  -0.00410	  -0.00166	   0.00005	   0.00171	   0.00420	   0.00391	   0.00296
                     28	  -0.00216	  -0.00346	  -0.00402	  -0.00154	   0.00086	   0.00133	   0.00220	   0.00304	   0.00141
                     50	  -0.00003	  -0.00167	  -0.00164	   0.00044	   0.00030	  -0.00012	   0.00148	   0.00242	   0.00125
                     60	   0.00003	  -0.00037	  -0.00054	  -0.00069	   0.00046	   0.00028	  -0.00058	   0.00013	   0.00047
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            </tableData>
          </table>
       </product>
    </function>
    <function name="aero/c/CMNMN">
    <description>YAWING MOMENT INCREMENT DUE TO MACH</description>
          <table>
            <independentVar lookup="row">velocities/mach</independentVar>
            <independentVar lookup="column">aero/alpha-deg</independentVar>
            <tableData>
                                -10	         -5	         -2	       0.01	          1	          2	          6	          7	         10
                    0.2	  -0.00004	   0.00001	   0.00001	   0.00000	   0.00000	   0.00000	   0.00001	  -0.00002	   0.00001
                    0.4	  -0.00004	   0.00001	   0.00000	   0.00000	   0.00000	   0.00000	   0.00004	  -0.00002	   0.00001
                    0.6	   0.00001	   0.00001	   0.00000	   0.00000	   0.00000	   0.00000	   0.00000	  -0.00002	   0.00000
                    0.8	   0.00000	   0.00001	   0.00000	   0.00000	   0.00000	   0.00000	   0.00003	   0.00002	   0.00002
                   0.86	  -0.00005	   0.00001	   0.00000	   0.00000	   0.00000	   0.00000	   0.00003	   0.00002	   0.00004
                   0.88	  -0.00002	   0.00001	   0.00000	   0.00000	   0.00000	   0.00000	   0.00003	   0.00000	   0.00005
                   0.91	  -0.00001	   0.00001	   0.00000	   0.00000	   0.00000	   0.00000	   0.00003	  -0.00001	   0.00000
                  0.955	  -0.00002	   0.00000	   0.00000	   0.00000	   0.00000	   0.00000	   0.00004	  -0.00002	  -0.00001
                   0.98	  -0.00002	   0.00000	   0.00000	   0.00000	   0.00000	   0.00000	   0.00003	   0.00002	   0.00000
                   0.99	  -0.00004	   0.00000	   0.00000	   0.00000	   0.00000	   0.00000	   0.00004	   0.00001	   0.00003
                    1.4	   0.01116	   0.00130	   0.00022	   0.00014	   0.00000	  -0.00014	  -0.00371	  -0.00596	  -0.01676
            </tableData>
          </table>
    </function>
    <function name="aero/c/CMNNWDOOR">
    <description>YAWING MOMENT INCREMENT DUE TO NOSE DOOR</description>
    <product>
          <property>gear/gear-pos-norm</property>
          <table>
            <independentVar lookup="row">aero/alpha-deg</independentVar>
            <independentVar lookup="column">aero/beta-deg</independentVar>
            <tableData>
                                -20	        -10	         -5	         -2	          0	          2	          5	         10	         20
                    -20	   0.00198	   0.00116	  -0.00003	   0.00007	  -0.00005	  -0.00004	   0.00063	   0.00133	   0.00562
                     -2	  -0.00055	  -0.00043	   0.00018	   0.00081	   0.00147	   0.00211	   0.00293	   0.00545	   0.00957
                      8	  -0.00066	   0.00012	   0.00061	   0.00133	   0.00186	   0.00274	   0.00502	   0.00562	   0.01092
                     18	  -0.00089	   0.00048	   0.00196	   0.00289	   0.00357	   0.00445	   0.00564	   0.00767	   0.01117
                     28	  -0.00132	   0.00171	   0.00272	   0.00551	   0.00706	   0.00767	   0.00884	   0.01126	   0.01104
                     50	   0.00180	   0.00461	   0.00709	   0.01128	   0.01182	   0.01384	   0.01685	   0.01711	   0.01628
                     60	   0.00168	   0.00781	   0.01005	   0.01090	   0.01278	   0.01618	   0.01580	   0.01563	   0.01777
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            </tableData>
          </table>
       </product>
    </function>
    <function name="aero/c/CMNP">
    <description>YAW MOMENT DUE TO ROLL RATE</description>
    <product>
          <property>aero/pb</property>
          <table>
            <independentVar lookup="row">aero/alpha-deg</independentVar>
            <independentVar lookup="column">aero/beta-deg</independentVar>
            <tableData>
                                -20	        -10	         -5	         -2	          0	          2	          5	         10	         20
                    -20	   0.20683	   0.26782	   0.32134	   0.34008	   0.32373	   0.33490	   0.32500	   0.30908	   0.18097
                     -2	   0.05804	   0.05953	   0.05650	   0.05481	   0.05272	   0.05246	   0.05144	   0.04890	   0.04000
                      8	  -0.07006	  -0.09497	  -0.10722	  -0.10647	  -0.10967	  -0.11312	  -0.10711	  -0.11293	  -0.08143
                     18	  -0.11406	  -0.18073	  -0.21302	  -0.23520	  -0.21404	  -0.21036	  -0.21345	  -0.20672	  -0.11683
                     28	  -0.10238	  -0.19735	  -0.21810	  -0.24050	  -0.22884	  -0.22662	  -0.22895	  -0.18224	  -0.09333
                     50	   0.08434	  -0.03321	  -0.09598	  -0.14514	  -0.13684	  -0.12220	  -0.12558	  -0.21583	  -0.11698
                     60	  -0.01404	  -0.01660	  -0.02113	  -0.08764	  -0.03516	  -0.02769	  -0.03497	  -0.11539	  -0.06362
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            </tableData>
          </table>
       </product>
    </function>
    <function name="aero/c/CMNR">
    <description>YAW DAMPING DERIVATIVE</description>
    <product>
          <property>aero/rb</property>
          <table>
            <independentVar lookup="row">aero/alpha-deg</independentVar>
            <independentVar lookup="column">aero/beta-deg</independentVar>
            <tableData>
                                -20	        -10	         -5	         -2	          0	          2	          5	         10	         20
                    -20	   0.05195	   0.08027	   0.05530	   0.06733	   0.04574	   0.05664	   0.06053	   0.05048	   0.08351
                     -2	   0.16022	   0.17285	   0.15680	   0.15642	   0.15002	   0.15061	   0.15348	   0.16015	   0.15116
                      8	   0.14101	   0.12890	   0.13061	   0.10406	   0.11979	   0.10858	   0.10128	   0.13331	   0.13121
                     18	   0.08671	   0.02774	  -0.01114	  -0.00187	  -0.03145	  -0.03576	  -0.01687	  -0.02093	   0.07891
                     28	  -0.00242	  -0.07823	  -0.15893	  -0.17649	  -0.16365	  -0.25504	  -0.17844	  -0.13191	  -0.01856
                     50	  -0.24166	  -0.38934	  -0.32301	  -0.53952	  -0.55592	  -0.54763	  -0.38378	  -0.27791	   0.00379
                     60	  -0.19572	  -0.40846	  -0.58042	  -0.60046	  -0.59517	  -0.59940	  -0.59561	  -0.45331	  -0.11221
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            </tableData>
          </table>
       </product>
    </function>
  <axis name="LIFT">
    <function name="aero/coefficients/CLIFT">
      <sum>
          <property>aero/c/CFZB</property>
          <property>aero/c/CFZDAD</property>
          <property>aero/c/CFZDGE</property>
          <property>aero/c/CFZDRD</property>
          <property>aero/c/CFZFLAPS</property>
          <property>aero/c/CFZGEAR</property>
          <property>aero/c/CFZMN</property>
          <property>aero/c/CFZNWDOOR</property>
       </sum>
    </function>
    <function name="aero/force/LIFT">
    <product>
          <property>aero/qbar-psf</property>
          <property>metrics/Sw-sqft</property>
          <property>aero/coefficients/CLIFT</property>
       </product>
    </function>
  </axis>
  <axis name="DRAG">
    <function name="aero/coefficients/CDRAG">
      <sum>
          <property>aero/c/CFXB</property>
          <property>aero/c/CFXDAD</property>
          <property>aero/c/CFXDGE</property>
          <property>aero/c/CFXDRD</property>
          <property>aero/c/CFXFLAPS</property>
          <property>aero/c/CFXGEAR</property>
          <property>aero/c/CFXMN</property>
          <property>aero/c/CFXNWDOOR</property>
       </sum>
    </function>
    <function name="aero/force/DRAG">
    <product>
          <property>aero/qbar-psf</property>
          <property>metrics/Sw-sqft</property>
          <property>aero/coefficients/CDRAG</property>
       </product>
    </function>
  </axis>
  <axis name="SIDE">
    <function name="aero/coefficients/CSIDE">
      <sum>
          <property>aero/c/CFYB</property>
          <property>aero/c/CFYFLAPS</property>
          <property>aero/c/CFYGEAR</property>
          <property>aero/c/CFYMN</property>
          <property>aero/c/CFYNWDOOR</property>
          <property>aero/c/CFYP</property>
          <property>aero/c/CFYR</property>
          <property>aero/c/CYDAD</property>
          <property>aero/c/CYDADMN</property>
          <property>aero/c/CYDRD</property>
          <property>aero/c/CYDRDMN</property>
       </sum>
    </function>
    <function name="aero/force/SIDE">
    <product>
          <property>aero/qbar-psf</property>
          <property>metrics/Sw-sqft</property>
          <property>aero/coefficients/CSIDE</property>
       </product>
    </function>
  </axis>
  <axis name="PITCH">
    <function name="aero/coefficients/CPITCH">
      <sum>
          <property>aero/c/CMM1</property>
          <property>aero/c/CMMALPHADOT</property>
          <property>aero/c/CMMDAD</property>
          <property>aero/c/CMMDGE</property>
          <property>aero/c/CMMDRD</property>
          <property>aero/c/CMMFLAPS</property>
          <property>aero/c/CMMGEAR</property>
          <property>aero/c/CMMMN</property>
          <property>aero/c/CMMNWDOOR</property>
          <property>aero/c/CMMQ</property>
       </sum>
    </function>
    <function name="aero/force/PITCH">
    <product>
          <property>aero/qbar-psf</property>
          <property>metrics/Sw-sqft</property>
          <property>metrics/cbarw-ft</property>
          <property>aero/coefficients/CPITCH</property>
       </product>
    </function>
  </axis>
  <axis name="ROLL">
    <function name="aero/coefficients/CROLL">
      <sum>
          <property>aero/c/CML1</property>
          <property>aero/c/CMLBETADOT</property>
          <property>aero/c/CMLDAD</property>
          <property>aero/c/CMLDADMN</property>
          <property>aero/c/CMLDRD</property>
          <property>aero/c/CMLDRDMN</property>
          <property>aero/c/CMLFLAPS</property>
          <property>aero/c/CMLGEAR</property>
          <property>aero/c/CMLMN</property>
          <property>aero/c/CMLNWDOOR</property>
          <property>aero/c/CMLP</property>
          <property>aero/c/CMLR</property>
       </sum>
    </function>
    <function name="aero/force/ROLL">
    <product>
          <property>aero/qbar-psf</property>
          <property>metrics/Sw-sqft</property>
          <property>metrics/bw-ft</property>
          <property>aero/coefficients/CROLL</property>
       </product>
    </function>
  </axis>
  <axis name="YAW">
    <function name="aero/coefficients/CYAW">
      <sum>
          <property>aero/c/CMN1</property>
          <property>aero/c/CMNBETADOT</property>
          <property>aero/c/CMNDAD</property>
          <property>aero/c/CMNDADMN</property>
          <property>aero/c/CMNDRD</property>
          <property>aero/c/CMNDRDMN</property>
          <property>aero/c/CMNFLAPS</property>
          <property>aero/c/CMNGEAR</property>
          <property>aero/c/CMNMN</property>
          <property>aero/c/CMNNWDOOR</property>
          <property>aero/c/CMNP</property>
          <property>aero/c/CMNR</property>
       </sum>
    </function>
    <function name="aero/force/YAW">
    <product>
          <property>aero/qbar-psf</property>
          <property>metrics/Sw-sqft</property>
          <property>metrics/bw-ft</property>
          <property>aero/coefficients/CYAW</property>
       </product>
    </function>
  </axis>
</aerodynamics>
    <output name="c:/temp/JSBOut.csv" type="CSV" rate="10">
        <property caption="alpha-deg">aero/alpha-deg</property>
        <property caption="alphadot-rad_sec-limited">aero/alphadot-rad_sec-limited</property>
        <property caption="beta-deg">aero/beta-deg</property>
        <property caption="betadot-rad_sec-limited">aero/betadot-rad_sec-limited</property>
        <property caption="CFXB">aero/c/CFXB</property>
        <property caption="CFXDAD">aero/c/CFXDAD</property>
        <property caption="CFXDGE">aero/c/CFXDGE</property>
        <property caption="CFXDRD">aero/c/CFXDRD</property>
        <property caption="CFXFLAPS">aero/c/CFXFLAPS</property>
        <property caption="CFXGEAR">aero/c/CFXGEAR</property>
        <property caption="CFXMN">aero/c/CFXMN</property>
        <property caption="CFXNWDOOR">aero/c/CFXNWDOOR</property>
        <property caption="CFYB">aero/c/CFYB</property>
        <property caption="CFYFLAPS">aero/c/CFYFLAPS</property>
        <property caption="CFYGEAR">aero/c/CFYGEAR</property>
        <property caption="CFYMN">aero/c/CFYMN</property>
        <property caption="CFYNWDOOR">aero/c/CFYNWDOOR</property>
        <property caption="CFYP">aero/c/CFYP</property>
        <property caption="CFYR">aero/c/CFYR</property>
        <property caption="CFZB">aero/c/CFZB</property>
        <property caption="CFZDAD">aero/c/CFZDAD</property>
        <property caption="CFZDGE">aero/c/CFZDGE</property>
        <property caption="CFZDRD">aero/c/CFZDRD</property>
        <property caption="CFZFLAPS">aero/c/CFZFLAPS</property>
        <property caption="CFZGEAR">aero/c/CFZGEAR</property>
        <property caption="CFZMN">aero/c/CFZMN</property>
        <property caption="CFZNWDOOR">aero/c/CFZNWDOOR</property>
        <property caption="CML1">aero/c/CML1</property>
        <property caption="CMLBETADOT">aero/c/CMLBETADOT</property>
        <property caption="CMLDAD">aero/c/CMLDAD</property>
        <property caption="CMLDADMN">aero/c/CMLDADMN</property>
        <property caption="CMLDRD">aero/c/CMLDRD</property>
        <property caption="CMLDRDMN">aero/c/CMLDRDMN</property>
        <property caption="CMLFLAPS">aero/c/CMLFLAPS</property>
        <property caption="CMLGEAR">aero/c/CMLGEAR</property>
        <property caption="CMLMN">aero/c/CMLMN</property>
        <property caption="CMLNWDOOR">aero/c/CMLNWDOOR</property>
        <property caption="CMLP">aero/c/CMLP</property>
        <property caption="CMLR">aero/c/CMLR</property>
        <property caption="CMM1">aero/c/CMM1</property>
        <property caption="CMMALPHADOT">aero/c/CMMALPHADOT</property>
        <property caption="CMMDAD">aero/c/CMMDAD</property>
        <property caption="CMMDGE">aero/c/CMMDGE</property>
        <property caption="CMMDRD">aero/c/CMMDRD</property>
        <property caption="CMMFLAPS">aero/c/CMMFLAPS</property>
        <property caption="CMMGEAR">aero/c/CMMGEAR</property>
        <property caption="CMMMN">aero/c/CMMMN</property>
        <property caption="CMMNWDOOR">aero/c/CMMNWDOOR</property>
        <property caption="CMMQ">aero/c/CMMQ</property>
        <property caption="CMN1">aero/c/CMN1</property>
        <property caption="CMNBETADOT">aero/c/CMNBETADOT</property>
        <property caption="CMNDAD">aero/c/CMNDAD</property>
        <property caption="CMNDADMN">aero/c/CMNDADMN</property>
        <property caption="CMNDRD">aero/c/CMNDRD</property>
        <property caption="CMNDRDMN">aero/c/CMNDRDMN</property>
        <property caption="CMNFLAPS">aero/c/CMNFLAPS</property>
        <property caption="CMNGEAR">aero/c/CMNGEAR</property>
        <property caption="CMNMN">aero/c/CMNMN</property>
        <property caption="CMNNWDOOR">aero/c/CMNNWDOOR</property>
        <property caption="CMNP">aero/c/CMNP</property>
        <property caption="CMNR">aero/c/CMNR</property>
        <property caption="CYDAD">aero/c/CYDAD</property>
        <property caption="CYDADMN">aero/c/CYDADMN</property>
        <property caption="CYDRD">aero/c/CYDRD</property>
        <property caption="CYDRDMN">aero/c/CYDRDMN</property>
        <property caption="CDRAG">aero/coefficients/CDRAG</property>
        <property caption="CLIFT">aero/coefficients/CLIFT</property>
        <property caption="CPITCH">aero/coefficients/CPITCH</property>
        <property caption="CROLL">aero/coefficients/CROLL</property>
        <property caption="CSIDE">aero/coefficients/CSIDE</property>
        <property caption="CYAW">aero/coefficients/CYAW</property>
        <property caption="pb">aero/pb</property>
        <property caption="qb">aero/qb</property>
        <property caption="qbar-psf">aero/qbar-psf</property>
        <property caption="rb">aero/rb</property>
        <property caption="phi-deg">attitude/phi-deg</property>
        <property caption="psi-deg">attitude/psi-deg</property>
        <property caption="theta-deg">attitude/theta-deg</property>
        <property caption="aileron-pos-deg">fcs/aileron-pos-deg</property>
        <property caption="elevator-pos-deg">fcs/elevator-pos-deg</property>
        <property caption="flap-pos-deg">fcs/flap-pos-deg</property>
        <property caption="rudder-pos-deg">fcs/rudder-pos-deg</property>
        <property caption="fbx-total-lbs">forces/fbx-total-lbs</property>
        <property caption="fby-total-lbs">forces/fby-total-lbs</property>
        <property caption="fbz-total-lbs">forces/fbz-total-lbs</property>
        <property caption="gear-pos-norm">gear/gear-pos-norm</property>
        <property caption="l-total-lbsft">moments/l-total-lbsft</property>
        <property caption="m-total-lbsft">moments/m-total-lbsft</property>
        <property caption="n-total-lbsft">moments/n-total-lbsft</property>
        <property caption="h-agl-m">position/h-agl-m</property>
        <property caption="mach">velocities/mach</property>
        <property caption="p-aero-rad_sec">velocities/p-aero-rad_sec</property>
        <property caption="q-aero-rad_sec">velocities/q-aero-rad_sec</property>
        <property caption="r-aero-rad_sec">velocities/r-aero-rad_sec</property>
        <property caption="vt-fps">velocities/vt-fps</property>
    </output>
</fdm_config>
